<?xml version="1.0"?>
<?xml-stylesheet type="text/xsl" href="http://jsbsim.sourceforge.net/JSBSim.xsl"?>

<fdm_config name="Jaguar" version="2.0" release="ALPHA"
   xmlns:xsi="http://www.w3.org/2001/XMLSchema-instance"
   xsi:noNamespaceSchemaLocation="http://jsbsim.sourceforge.net/JSBSim.xsd">

 <fileheader>
  <author> Aeromatic v 3.3.10 </author>
  <filecreationdate> 16 Jun 2018 </filecreationdate>
  <version>$Revision: 1.80 $</version>
  <description> Models a Jaguar. </description>
 </fileheader>

<!--
  File:     Jaguar.xml
  Inputs:
    name:          Jaguar
    type:          Multi-engine Fighter Jet
    stall speed:   140.00kts
    max weight:    34600.00 lb
    length:        55.30 ft
    wing:
     span:         28.60 ft
     area:         258.00 sq-ft
     mean chord:   11.49 ft
     aspect ratio: 3.12:1
     taper ratio:  0.32:1
     incidence:    1.00 degrees
     dihedral:     -3.00 degrees
     sweep:        40.00 degrees

    no. engines:   2
    engine type:   Turbine Engine
    engine layout: aft fuselage

    control type:   Conventional with Yaw Damper

    gear type:     tricycle
    steering type: steering
    retractable?:  yes

  Outputs:
    wing loading:       134.11 lb/sq-ft
     - thickness ratio: 1.47%
    payload:            12037.80 lbs
    CL-alpha:           3.41 per radian
    CL-0:               0.40
    CL-max:             2.02
    CD-0:               0.01
    K:                  0.12
    Mcrit:              0.81

    min. turn radius    958.03 ft
    max. turn rate:     0.27 deg/s
-->

 <metrics>
   <wingarea  unit="FT2">   258.00 </wingarea>
   <wingspan  unit="FT" >    28.60 </wingspan>
   <wing_incidence unit="DEG"> 1.00 </wing_incidence>
   <chord     unit="FT" >    11.49 </chord>
   <htailarea unit="FT2">    63.00 </htailarea>
   <htailarm  unit="FT" >    18.00 </htailarm>
   <vtailarea  unit="FT2">   20.00 </vtailarea>
   <vtailarm  unit="FT" >    13.50 </vtailarm>
   <location name="AERORP" unit="IN">
      <x>   65.72 </x>
      <y>    0.00 </y>
      <z>  -16.59 </z>
   </location>
   <location name="EYEPOINT" unit="IN">
     <x>   132.72 </x>
     <y>     0.00 </y>
     <z>    38.00 </z>
   </location>
   <location name="VRP" unit="IN">
     <x>     0.0 </x>
     <y>     0.0 </y>
     <z>     0.0 </z>
   </location>
 </metrics>

 <mass_balance>
   <ixx unit="SLUG*FT2">   8224.94 </ixx>
   <iyy unit="SLUG*FT2">  42268.12 </iyy>
   <izz unit="SLUG*FT2">  35370.12 </izz>
   <emptywt unit="LBS" >  15400.00 </emptywt>
   <location name="CG" unit="IN">
     <x>   65.60 </x>
     <y>     0.00 </y>
     <z>   -16.59 </z>
   </location>
   <pointmass name="Payload">
    <description> 12037.80 LBS should bring model up to entered max weight </description>
    <weight unit="LBS"> 0 </weight>
    <location name="POINTMASS" unit="M">
     <x>   4.19068 </x>
     <y>   0 </y>
     <z>   -0.271295 </z>
   </location>
  </pointmass>
 </mass_balance>

 <propulsion>

   <engine file="Adour104">
    <location unit="M">
      <x>   4.85836 </x>
      <y>   0.476846 </y>
      <z>   -0.494731 </z>
    </location>
    <orient unit="DEG">
      <pitch>     0.00 </pitch>
       <roll>     0.00 </roll>
        <yaw>     0.00 </yaw>
    </orient>
    <feed> 0 </feed>
    <feed> 1 </feed>
    <feed> 2 </feed>
    <feed> 3 </feed>
    <feed> 4 </feed>
    <feed> 5 </feed>
    <feed> 6 </feed>
    <feed> 7 </feed>
    <feed> 8 </feed>
    <thruster file="direct">
     <sense> 1 </sense>
     <location unit="M">
      <x>   4.85836 </x>
      <y>   0.476846 </y>
      <z>   -0.494731 </z>
     </location>
     <orient unit="DEG">
       <pitch>     0.00 </pitch>
        <roll>     0.00 </roll>
         <yaw>     0.00 </yaw>
     </orient>
    </thruster>
  </engine>

   <engine file="Adour104">
    <location unit="M">
      <x>   4.85836 </x>
      <y>   -0.476846 </y>
      <z>   -0.494731 </z>
    </location>
    <orient unit="DEG">
      <pitch>     0.00 </pitch>
       <roll>     0.00 </roll>
        <yaw>     0.00 </yaw>
    </orient>
    <feed> 0 </feed>
    <feed> 1 </feed>
    <feed> 2 </feed>
    <feed> 3 </feed>
    <feed> 4 </feed>
    <feed> 5 </feed>
    <feed> 6 </feed>
    <feed> 7 </feed>
    <feed> 8 </feed>
    <thruster file="direct">
     <sense> 1 </sense>
     <location unit="M">
      <x>   4.85836 </x>
      <y>   -0.476846 </y>
      <z>   -0.494731 </z>
     </location>
     <orient unit="DEG">
       <pitch>     0.00 </pitch>
        <roll>     0.00 </roll>
         <yaw>     0.00 </yaw>
     </orient>
    </thruster>
  </engine>

  <tank type="FUEL" number="0">
     <location unit="IN">
     <x>   65.60 </x>
     <y>     0.00 </y>
     <z>   -16.59 </z>
     </location>
     <capacity unit="LBS"> 1558.67</capacity>
     <contents unit="LBS"> 1558.67 </contents>
  </tank>
  <tank type="FUEL" number="1">
     <location unit="IN">
     <x>   65.60 </x>
     <y>     0.00 </y>
     <z>   -16.59 </z>
     </location>
     <capacity unit="LBS"> 864.212 </capacity>
     <contents unit="LBS"> 864.212 </contents>
  </tank>

  <tank type="FUEL" number="2">
     <location unit="IN">
     <x>   65.60 </x>
     <y>     0.00 </y>
     <z>   -16.59 </z>
     </location>
     <capacity unit="LBS"> 1146.4 </capacity>
     <contents unit="LBS"> 1146.4 </contents>
  </tank>

  <tank type="FUEL" number="3">
     <location unit="IN">
     <x>   65.60 </x>
     <y>     0.00 </y>
     <z>   -16.59 </z>
     </location>
     <capacity unit="LBS"> 1962.11 </capacity>
     <contents unit="LBS"> 1962.11 </contents>
  </tank>

  <tank type="FUEL" number="4">
     <location unit="IN">
     <x>   65.60 </x>
     <y>     0.00 </y>
     <z>   -16.59 </z>
     </location>
     <capacity unit="LBS"> 820.12 </capacity>
     <contents unit="LBS"> 820.12 </contents>
  </tank>

  <tank type="FUEL" number="5">
     <location unit="IN">
     <x>   65.60 </x>
     <y>     0.00 </y>
     <z>   -16.59 </z>
     </location>
     <capacity unit="LBS"> 820.12 </capacity>
     <contents unit="LBS"> 820.12 </contents>
  </tank>

  <tank type="FUEL" number="6">
     <location unit="IN">
     <x>   65.60 </x>
     <y>     0.00 </y>
     <z>   -16.59 </z>
     </location>
     <capacity unit="LBS">  2037 </capacity>
     <contents unit="LBS"> 0 </contents>
  </tank>

  <tank type="FUEL" number="7">
     <location unit="IN">
     <x>   65.60 </x>
     <y>     0.00 </y>
     <z>   -16.59 </z>
     </location>
     <capacity unit="LBS">  2037 </capacity>
     <contents unit="LBS"> 0 </contents>
  </tank>

  <tank type="FUEL" number="8">
     <location unit="IN">
     <x>   65.60 </x>
     <y>     0.00 </y>
     <z>   -16.59 </z>
     </location>
     <capacity unit="LBS"> 2037 </capacity>
     <contents unit="LBS"> 0 </contents>
  </tank>

 </propulsion>

 <ground_reactions>

  <contact type="BOGEY" name="NOSE">
    <location unit="M">
      <x>    -3.57038 </x>
      <y>     0 </y>
      <z>   -2.50281 </z>
    </location>
    <static_friction>  0.80 </static_friction>
    <dynamic_friction> 0.50 </dynamic_friction>
    <rolling_friction> 0.02 </rolling_friction>
      <spring_coeff unit="LBS/FT"> 18000 </spring_coeff><!-- hardness of spring. Low value means gear collapses more per energy applied. High value might give jsbsim trouble. -->
      <damping_coeff unit="LBS/FT/SEC"> 6500 </damping_coeff><!-- higher value slows down how fast the gear absorbs energy -->
      <damping_coeff_rebound unit="LBS/FT/SEC"> 22000 </damping_coeff_rebound><!-- high value means the gear is slower to release the energy it stored when collapsed --> <!--  Nikolai V. Chr.  -->
    <max_steer unit="DEG"> 35.00 </max_steer>
    <brake_group> NONE </brake_group>
    <retractable> 1 </retractable>
  </contact>

  <contact type="BOGEY" name="LEFT_MAIN">
    <location unit="M">
      <x>   2.08638 </x>
      <y>   -1.42114 </y>
      <z>   -2.40743 </z>
    </location>
    <static_friction>  0.90 </static_friction>
    <dynamic_friction> 0.50 </dynamic_friction>
    <rolling_friction> 0.02 </rolling_friction>
      <spring_coeff unit="LBS/FT"> 20000 </spring_coeff>
      <damping_coeff unit="LBS/FT/SEC"> 7500 </damping_coeff>
      <damping_coeff_rebound unit="LBS/FT/SEC"> 35000 </damping_coeff_rebound>
    <max_steer unit="DEG">0</max_steer>
    <brake_group> LEFT </brake_group>
    <retractable> 1 </retractable>
  </contact>

  <contact type="BOGEY" name="RIGHT_MAIN">
    <location unit="M">
      <x>  2.08638 </x>
      <y>  1.42154 </y>
      <z> -2.40743 </z>
    </location>
    <static_friction>  0.90 </static_friction>
    <dynamic_friction> 0.50 </dynamic_friction>
    <rolling_friction> 0.02 </rolling_friction>
      <spring_coeff unit="LBS/FT"> 20000 </spring_coeff>
      <damping_coeff unit="LBS/FT/SEC"> 7500 </damping_coeff>
      <damping_coeff_rebound unit="LBS/FT/SEC"> 35000 </damping_coeff_rebound>
    <max_steer unit="DEG">0</max_steer>
    <brake_group> RIGHT </brake_group>
    <retractable> 1 </retractable>
  </contact>

  <contact type="STRUCTURE" name="LEFT_WING">
    <location unit="M">
     <x>   4.19068 </x>
     <y>  -4.3177 </y>
     <z>   -0.271297 </z>
    </location>
      <static_friction> 5.0 </static_friction>
      <dynamic_friction> 4.0 </dynamic_friction>
      <spring_coeff unit="LBS/FT"> 10000 </spring_coeff>
      <damping_coeff unit="LBS/FT/SEC"> 2000 </damping_coeff>
      <damping_coeff_rebound unit="LBS/FT/SEC"> 40000 </damping_coeff_rebound>
  </contact>

  <contact type="STRUCTURE" name="RIGHT_WING">
    <location unit="M">
     <x>   4.19068 </x>
     <y>   4.3177 </y>
     <z>   -0.271295 </z>
    </location>
      <static_friction> 5.0 </static_friction>
      <dynamic_friction> 4.0 </dynamic_friction>
      <spring_coeff unit="LBS/FT"> 10000 </spring_coeff>
      <damping_coeff unit="LBS/FT/SEC"> 2000 </damping_coeff>
      <damping_coeff_rebound unit="LBS/FT/SEC"> 40000 </damping_coeff_rebound>
  </contact>

    <contact type="STRUCTURE" name="RIGHT_HSTAB">
    <location unit="M">
     <x>   8.37068 </x>
     <y>   2.2536 </y>
     <z>   -0.37987 </z>
    </location>
      <static_friction> 5.0 </static_friction>
      <dynamic_friction> 4.0 </dynamic_friction>
      <spring_coeff unit="LBS/FT"> 10000 </spring_coeff>
      <damping_coeff unit="LBS/FT/SEC"> 2000 </damping_coeff>
      <damping_coeff_rebound unit="LBS/FT/SEC"> 40000 </damping_coeff_rebound>
  </contact>

    <contact type="STRUCTURE" name="LEFT_HSTAB">
    <location unit="M">
     <x>  8.37068  </x>
     <y>  -2.25345 </y>
     <z>   -0.37987 </z>
    </location>
      <static_friction> 5.0 </static_friction>
      <dynamic_friction> 4.0 </dynamic_friction>
      <spring_coeff unit="LBS/FT"> 10000 </spring_coeff>
      <damping_coeff unit="LBS/FT/SEC"> 2000 </damping_coeff>
      <damping_coeff_rebound unit="LBS/FT/SEC"> 40000 </damping_coeff_rebound>
  </contact>

    <contact type="STRUCTURE" name="VSTAB">
    <location unit="M">
     <x>   4.19068 </x>
     <y>   4.3177 </y>
     <z>   -0.271295 </z>
    </location>
      <static_friction> 5.0 </static_friction>
      <dynamic_friction> 4.0 </dynamic_friction>
      <spring_coeff unit="LBS/FT"> 10000 </spring_coeff>
      <damping_coeff unit="LBS/FT/SEC"> 2000 </damping_coeff>
      <damping_coeff_rebound unit="LBS/FT/SEC"> 40000 </damping_coeff_rebound>
  </contact>

    <contact type="STRUCTURE" name="VSTAB_REAR">
    <location unit="M">
     <x>   8.17472 </x>
     <y>   0 </y>
     <z>   2.67161 </z>
    </location>
      <static_friction> 5.0 </static_friction>
      <dynamic_friction> 4.0 </dynamic_friction>
      <spring_coeff unit="LBS/FT"> 10000 </spring_coeff>
      <damping_coeff unit="LBS/FT/SEC"> 2000 </damping_coeff>
      <damping_coeff_rebound unit="LBS/FT/SEC"> 40000 </damping_coeff_rebound>
  </contact>

    <contact type="STRUCTURE" name="VSTAB_FRONT">
    <location unit="M">
     <x>   6.48703 </x>
     <y>   0 </y>
     <z>   2.22255 </z>
    </location>
      <static_friction> 5.0 </static_friction>
      <dynamic_friction> 4.0 </dynamic_friction>
      <spring_coeff unit="LBS/FT"> 10000 </spring_coeff>
      <damping_coeff unit="LBS/FT/SEC"> 2000 </damping_coeff>
      <damping_coeff_rebound unit="LBS/FT/SEC"> 40000 </damping_coeff_rebound>
  </contact>

    <contact type="STRUCTURE" name="VSTAB_REAR_ANT">
    <location unit="M">
     <x>   8.35249 </x>
     <y>   0 </y>
     <z>   2.24092 </z>
    </location>
      <static_friction> 5.0 </static_friction>
      <dynamic_friction> 4.0 </dynamic_friction>
      <spring_coeff unit="LBS/FT"> 10000 </spring_coeff>
      <damping_coeff unit="LBS/FT/SEC"> 2000 </damping_coeff>
      <damping_coeff_rebound unit="LBS/FT/SEC"> 40000 </damping_coeff_rebound>
  </contact>

    <contact type="STRUCTURE" name="VSTAB_FRONT_ANT">
    <location unit="M">
     <x>   6.48703 </x>
     <y>   0 </y>
     <z>   2.22255 </z>
    </location>
      <static_friction> 5.0 </static_friction>
      <dynamic_friction> 4.0 </dynamic_friction>
      <spring_coeff unit="LBS/FT"> 10000 </spring_coeff>
      <damping_coeff unit="LBS/FT/SEC"> 2000 </damping_coeff>
      <damping_coeff_rebound unit="LBS/FT/SEC"> 40000 </damping_coeff_rebound>
  </contact>

    <contact type="STRUCTURE" name="REAR_UPPER_FUSELAGE">
    <location unit="M">
     <x>   3.29911 </x>
     <y>   0 </y>
     <z>   0.678344 </z>
    </location>
      <static_friction> 5.0 </static_friction>
      <dynamic_friction> 4.0 </dynamic_friction>
      <spring_coeff unit="LBS/FT"> 10000 </spring_coeff>
      <damping_coeff unit="LBS/FT/SEC"> 2000 </damping_coeff>
      <damping_coeff_rebound unit="LBS/FT/SEC"> 40000 </damping_coeff_rebound>
  </contact>

    <contact type="STRUCTURE" name="RIGHT_WING">
    <location unit="M">
     <x>   4.19068 </x>
     <y>   4.3177 </y>
     <z>   -0.271295 </z>
    </location>
      <static_friction> 5.0 </static_friction>
      <dynamic_friction> 4.0 </dynamic_friction>
      <spring_coeff unit="LBS/FT"> 10000 </spring_coeff>
      <damping_coeff unit="LBS/FT/SEC"> 2000 </damping_coeff>
      <damping_coeff_rebound unit="LBS/FT/SEC"> 40000 </damping_coeff_rebound>
  </contact>

    <contact type="STRUCTURE" name="CANOPY">
    <location unit="M">
     <x>  -2.87425 </x>
     <y>  0 </y>
     <z>   0.816824 </z>
    </location>
      <static_friction> 5.0 </static_friction>
      <dynamic_friction> 4.0 </dynamic_friction>
      <spring_coeff unit="LBS/FT"> 10000 </spring_coeff>
      <damping_coeff unit="LBS/FT/SEC"> 2000 </damping_coeff>
      <damping_coeff_rebound unit="LBS/FT/SEC"> 40000 </damping_coeff_rebound>
  </contact>

      <contact type="STRUCTURE" name="NOSE_ANT">
    <location unit="M">
     <x>  -8.51017 </x>
     <y>  0 </y>
     <z>  -0.856901 </z>
    </location>
      <static_friction> 5.0 </static_friction>
      <dynamic_friction> 4.0 </dynamic_friction>
      <spring_coeff unit="LBS/FT"> 10000 </spring_coeff>
      <damping_coeff unit="LBS/FT/SEC"> 2000 </damping_coeff>
      <damping_coeff_rebound unit="LBS/FT/SEC"> 40000 </damping_coeff_rebound>
  </contact>

      <contact type="STRUCTURE" name="NOSE">
    <location unit="M">
     <x>  -6.8457 </x>
     <y>  0 </y>
     <z>   -1.05104 </z>
    </location>
      <static_friction> 5.0 </static_friction>
      <dynamic_friction> 4.0 </dynamic_friction>
      <spring_coeff unit="LBS/FT"> 10000 </spring_coeff>
      <damping_coeff unit="LBS/FT/SEC"> 2000 </damping_coeff>
      <damping_coeff_rebound unit="LBS/FT/SEC"> 40000 </damping_coeff_rebound>
  </contact>

      <contact type="STRUCTURE" name="FRONT_LOWER_FUSELAGE">
    <location unit="M">
     <x>  -2.31506 </x>
     <y>  0 </y>
     <z>   -1.10459 </z>
    </location>
      <static_friction> 5.0 </static_friction>
      <dynamic_friction> 4.0 </dynamic_friction>
      <spring_coeff unit="LBS/FT"> 10000 </spring_coeff>
      <damping_coeff unit="LBS/FT/SEC"> 2000 </damping_coeff>
      <damping_coeff_rebound unit="LBS/FT/SEC"> 40000 </damping_coeff_rebound>
  </contact>

      <contact type="STRUCTURE" name="LEFT_STRAKE_FRONT">
    <location unit="M">
     <x>  -1.10459 </x>
     <y>  -0.784589 </y>
     <z>   -0.47487 </z>
    </location>
      <static_friction> 5.0 </static_friction>
      <dynamic_friction> 4.0 </dynamic_friction>
      <spring_coeff unit="LBS/FT"> 10000 </spring_coeff>
      <damping_coeff unit="LBS/FT/SEC"> 2000 </damping_coeff>
      <damping_coeff_rebound unit="LBS/FT/SEC"> 40000 </damping_coeff_rebound>
  </contact>

      <contact type="STRUCTURE" name="LEFT_STRAKE_REAR">
    <location unit="M">
     <x>  -1.47487 </x>
     <y>  -0.662111 </y>
     <z>   -0.26402 </z>
    </location>
      <static_friction> 5.0 </static_friction>
      <dynamic_friction> 4.0 </dynamic_friction>
      <spring_coeff unit="LBS/FT"> 10000 </spring_coeff>
      <damping_coeff unit="LBS/FT/SEC"> 2000 </damping_coeff>
      <damping_coeff_rebound unit="LBS/FT/SEC"> 40000 </damping_coeff_rebound>
  </contact>

      <contact type="STRUCTURE" name="RIGHT_STRAKE_FRONT">
    <location unit="M">
     <x>  4.47618 </x>
     <y>  0.784762 </y>
     <z>   -1.47487 </z>
    </location>
      <static_friction> 5.0 </static_friction>
      <dynamic_friction> 4.0 </dynamic_friction>
      <spring_coeff unit="LBS/FT"> 10000 </spring_coeff>
      <damping_coeff unit="LBS/FT/SEC"> 2000 </damping_coeff>
      <damping_coeff_rebound unit="LBS/FT/SEC"> 40000 </damping_coeff_rebound>
  </contact>

      <contact type="STRUCTURE" name="RIGHT_STRAKE_REAR">
    <location unit="M">
     <x>  -1.47487 </x>
     <y>  0.662285 </y>
     <z>   -1.26402 </z>
    </location>
      <static_friction> 5.0 </static_friction>
      <dynamic_friction> 4.0 </dynamic_friction>
      <spring_coeff unit="LBS/FT"> 10000 </spring_coeff>
      <damping_coeff unit="LBS/FT/SEC"> 2000 </damping_coeff>
      <damping_coeff_rebound unit="LBS/FT/SEC"> 40000 </damping_coeff_rebound>
  </contact>

      <contact type="STRUCTURE" name="LEFT_INTAKE">
    <location unit="M">
     <x>  -2.02736 </x>
     <y>  -0.986094 </y>
     <z>   0.209757 </z>
    </location>
      <static_friction> 5.0 </static_friction>
      <dynamic_friction> 4.0 </dynamic_friction>
      <spring_coeff unit="LBS/FT"> 10000 </spring_coeff>
      <damping_coeff unit="LBS/FT/SEC"> 2000 </damping_coeff>
      <damping_coeff_rebound unit="LBS/FT/SEC"> 40000 </damping_coeff_rebound>
  </contact>

       <contact type="STRUCTURE" name="RIGHT_INTAKE">
    <location unit="M">
     <x>  -2.02736 </x>
     <y>  0.986094 </y>
     <z>  0.209757 </z>
    </location>
      <static_friction> 5.0 </static_friction>
      <dynamic_friction> 4.0 </dynamic_friction>
      <spring_coeff unit="LBS/FT"> 10000 </spring_coeff>
      <damping_coeff unit="LBS/FT/SEC"> 2000 </damping_coeff>
      <damping_coeff_rebound unit="LBS/FT/SEC"> 40000 </damping_coeff_rebound>
  </contact>

 </ground_reactions>

 <system file="Propulsion"/>
 <system file="autoflight"/>
 <system file="jaguar-sas"/>
 <system file="Aircraftcontrol"/>
 <system file="jaguar-controls"/>
 <system file="electrical"/>
 <system file="hydraulics"/>
<!-- <system file="ArrestorHook"/>
 <system file="DragChute"/>
 <system file="Catapult"/> -->

 <flight_control name="none"/>


 <aerodynamics>

  <axis name="LIFT">

    <!-- Lift above 0.85 and below -0.85 is generalised -->
    <function name="aero/force/Lift_alpha">
      <description>Lift due to alpha</description>
      <product>
          <property>aero/qbar-psf</property>
          <property>metrics/Sw-sqft</property>
          <table>
            <independentVar lookup="row">aero/alpha-rad</independentVar>
            <tableData>
              -0.209    -1.03
              -0.175    -0.89
              -0.140    -0.64
              -0.105    -1.10
              -0.070    -0.27
              -0.035    -0.15
               0.000     0.08
               0.035     0.14
               0.070     0.39
               0.105     1.26
               0.140     0.94
               0.175     1.07
               0.209     1.13
               0.244     1.42
            </tableData>
          </table>
      </product>
    </function>

    <function name="aero/force/Lift_pitch_rate">
        <description>Lift due to pitch rate</description>
        <product>
          <property>aero/qbar-psf</property>
          <property>metrics/Sw-sqft</property>
          <property>velocities/q-aero-rad_sec</property>
          <property>aero/ci2vel</property>
          <value> 5.9 </value>
        </product>
      </function>

      <function name="aero/force/Lift_alpha_rate">
        <description>Lift due to alpha rate</description>
        <product>
           <property>aero/qbar-psf</property>
           <property>metrics/Sw-sqft</property>
           <property>aero/alphadot-rad_sec</property>
           <property>aero/ci2vel</property>
           <value> 3.588 </value>
        </product>
      </function>

    <function name="aero/force/Lift_left_elevon">
       <description>Lift due to left elevon Deflection</description>
       <product>
           <property>aero/qbar-psf</property>
           <property>metrics/Sw-sqft</property>
           <toradians><property>fcs/elevon-left-deg</property></toradians>
           <value> 0.452 </value>
       </product>
    </function>

    <function name="aero/force/Lift_right_elevon">
       <description>Lift due to right elevon Deflection</description>
       <product>
           <property>aero/qbar-psf</property>
           <property>metrics/Sw-sqft</property>
           <toradians><property>fcs/elevon-right-deg</property></toradians>
           <value> 0.452 </value>
       </product>
    </function>

    <function name="aero/force/Lift_flap">
       <description>Delta Lift due to flaps</description>
       <product>
           <property>aero/qbar-psf</property>
           <property>metrics/Sw-sqft</property>
           <property>fcs/flap-pos-deg</property>
           <value> 0.0135</value>
       </product>
    </function>

        <function name="aero/force/Lift_slats">
       <description>Delta Lift due to slats</description>
       <product>
           <property>aero/qbar-psf</property>
           <property>metrics/Sw-sqft</property>
           <toradians><property>fcs/slats-deg</property></toradians>
           <value> 0.00675 </value>
       </product>
    </function>

    <function name="aero/force/Lift_left_spoiler">
       <description>Delta Lift due to left spoiler</description>
       <product>
           <property>aero/qbar-psf</property>
           <property>metrics/Sw-sqft</property>
           <property>fcs/spoiler-left-deg</property>
           <value> -0.0026 </value>
       </product>
    </function>

    <function name="aero/force/Lift_right_spoiler">
       <description>Delta Lift due to right spoiler</description>
       <product>
           <property>aero/qbar-psf</property>
           <property>metrics/Sw-sqft</property>
           <property>fcs/spoiler-right-deg</property>
           <value> -0.0026 </value>
       </product>
    </function>

  </axis>

  <axis name="DRAG">

    <!-- CD0 is based on fuselage, wing, horizontal- en vertical tail -->
    <!-- Antennas, struts and wires are not taken into account        -->
    <!-- CD for gear (fixed and retractable) is defined below         -->
    <function name="aero/force/Drag_minimum">
       <description>Minimum drag</description>
       <product>
          <property>aero/qbar-psf</property>
          <property>metrics/Sw-sqft</property>
          <value> 0.0235 </value>
       </product>
    </function>

    <function name="aero/force/Drag_alpha">
       <description>Drag due to alpha</description>
       <product>
          <property>aero/qbar-psf</property>
          <property>metrics/Sw-sqft</property>
          <table>
            <independentVar lookup="row">aero/alpha-rad</independentVar>
            <tableData>
             -1.57       0.500
             -0.26       0.027
              0.00       0.000
              0.26       0.067
              0.80			 0.450
              1.57       1.200
            </tableData>
          </table>
       </product>
    </function>

    <function name="aero/force/Drag_induced">
       <description>Induced drag</description>
         <product>
           <property>aero/qbar-psf</property>
           <property>metrics/Sw-sqft</property>
           <property>aero/cl-squared</property>
           <value> 0.0515 </value>
         </product>
    </function>

    <function name="aero/force/Drag_mach">
       <description>Drag due to mach</description>
        <product>
          <property>aero/qbar-psf</property>
          <property>metrics/Sw-sqft</property>
          <table>
            <independentVar lookup="row">velocities/mach</independentVar>
            <tableData>
                0.00    0.0000
                0.81    0.0000
                1.10    0.0210
                1.80    0.0120
            </tableData>
          </table>
        </product>
    </function>

    <function name="aero/force/Drag_beta">
       <description>Drag due to sideslip</description>
       <product>
          <property>aero/qbar-psf</property>
          <property>metrics/Sw-sqft</property>
          <table>
            <independentVar lookup="row">aero/beta-rad</independentVar>
            <tableData>
              -1.57    1.2300
              -0.26    0.0500
               0.00    0.0000
               0.26    0.0500
               1.57    1.2300
            </tableData>
          </table>
       </product>
    </function>

    <function name="aero/force/Drag_left_elevon">
       <description>Drag due to left elevon Deflection</description>
       <product>
           <property>aero/qbar-psf</property>
           <property>metrics/Sw-sqft</property>
           <abs><toradians><property>fcs/elevon-left-deg</property></toradians></abs>
           <value> 0.035 </value>
       </product>
    </function>

    <function name="aero/force/Drag_right_elevon">
       <description>Drag due to right elevon Deflection</description>
       <product>
           <property>aero/qbar-psf</property>
           <property>metrics/Sw-sqft</property>
           <abs><toradians><property>fcs/elevon-right-deg</property></toradians></abs>
           <value> 0.035 </value>
       </product>
    </function>

    <function name="aero/force/Drag_gear">
       <description>Drag due to gear</description>
         <product>
           <property>aero/qbar-psf</property>
           <property>metrics/Sw-sqft</property>
           <property>gear/gear-pos-norm</property>
           <value> 0.0100 </value>
         </product>
    </function>

    <function name="aero/force/Drag_flap">
       <description>Drag due to flaps</description>
         <product>
           <property>aero/qbar-psf</property>
           <property>metrics/Sw-sqft</property>
           <property>fcs/flap-pos-deg</property>
           <value> 0.001475 </value>
         </product>
    </function>

        <function name="aero/force/Drag_slats">
       <description>Drag due to slats</description>
         <product>
           <property>aero/qbar-psf</property>
           <property>metrics/Sw-sqft</property>
           <toradians><property>fcs/slats-deg</property></toradians>
           <value> 0.00295 </value>
         </product>
    </function>

    <function name="aero/force/Drag_left_spoiler">
       <description>Drag due to left spoiler</description>
         <product>
           <property>aero/qbar-psf</property>
           <property>metrics/Sw-sqft</property>
           <toradians><property>fcs/spoiler-left-deg</property></toradians>
           <value> 0.0296 </value>
         </product>
    </function>

    <function name="aero/force/Drag_right_spoiler">
       <description>Drag due to right spoiler</description>
         <product>
           <property>aero/qbar-psf</property>
           <property>metrics/Sw-sqft</property>
           <toradians><property>fcs/spoiler-right-deg</property></toradians>
           <value> 0.0296 </value>
         </product>
    </function>

   <function name="aero/force/Drag_speed_brake">
       <description>Speed Brake</description>
       <product>
           <property>aero/qbar-psf</property>
           <property>metrics/Sw-sqft</property>
           <property>fcs/speedbrake-pos-deg</property>
           <value> 0.05 </value>
       </product>
    </function>

  </axis>

  <axis name="SIDE">

    <function name="aero/force/Side_beta">
       <description>Side force due to beta</description>
       <product>
           <property>aero/qbar-psf</property>
           <property>metrics/Sw-sqft</property>
           <property>aero/beta-rad</property>
           <value> -1.2330 </value>
       </product>
    </function>
    <function name="aero/force/Side_roll_rate">
       <description>Side force due to roll rate</description>
       <product>
           <property>aero/qbar-psf</property>
           <property>metrics/Sw-sqft</property>
           <property>aero/bi2vel</property>
           <property>velocities/p-aero-rad_sec</property>
           <table>
             <independentVar lookup="row">aero/Re</independentVar>
             <tableData>
                17307328   0.2160
                19038060   0.0159
                25960990   0.0069
                34828468   0.0071
             </tableData>
           </table>
       </product>
    </function>

    <function name="aero/force/Side_yaw_rate">
       <description>Side force due to yaw rate</description>
       <product>
           <property>aero/qbar-psf</property>
           <property>metrics/Sw-sqft</property>
           <property>aero/bi2vel</property>
           <property>velocities/r-aero-rad_sec</property>
           <value> 1.4227 </value>
       </product>
    </function>

    <function name="aero/force/Side_rudder">
       <description>Side force due to rudder</description>
       <product>
           <property>aero/qbar-psf</property>
           <property>metrics/Sw-sqft</property>
           <toradians><property>fcs/rudder-deg</property></toradians>
           <value> 0.3816 </value>
       </product>
    </function>

  </axis>

  <axis name="PITCH">

    <function name="aero/moment/Pitch_alpha">
       <description>Pitch moment due to alpha</description>
       <product>
           <property>aero/qbar-psf</property>
           <property>metrics/Sw-sqft</property>
           <property>metrics/cbarw-ft</property>
         <table>
           <independentVar lookup="row">aero/alpha-rad</independentVar>
           <tableData>
             -0.349     0.09743
             -0.175    -0.00098
              0.000     0.00501
              0.175    -0.03967
              0.349    -0.12421
              0.524    -0.21577
              0.698    -0.30868
              0.873    -0.41504
              1.047    -0.53339
           </tableData>
         </table>
       </product>
    </function>

    <function name="aero/moment/Pitch_left_elevon">
       <description>Pitch moment due to left elevon</description>
       <product>
          <property>aero/qbar-psf</property>
          <property>metrics/Sw-sqft</property>
          <property>metrics/cbarw-ft</property>
          <toradians><property>fcs/elevon-left-deg</property></toradians>
          <table>
            <independentVar lookup="row">velocities/mach</independentVar>
            <tableData>
              0.0    -0.2917
              1.6    -0.0087
            </tableData>
          </table>
       </product>
    </function>

    <function name="aero/moment/Pitch_right_elevon">
       <description>Pitch moment due to right elevon</description>
       <product>
          <property>aero/qbar-psf</property>
          <property>metrics/Sw-sqft</property>
          <property>metrics/cbarw-ft</property>
          <toradians><property>fcs/elevon-right-deg</property></toradians>
          <table>
            <independentVar lookup="row">velocities/mach</independentVar>
            <tableData>
              0.0    -0.2917
              2.0    -0.0087
            </tableData>
          </table>
       </product>
    </function>

    <function name="aero/moment/Pitch_damp">
       <description>Pitch moment due to pitch rate</description>
       <product>
           <property>aero/qbar-psf</property>
           <property>metrics/Sw-sqft</property>
           <property>metrics/cbarw-ft</property>
           <property>aero/ci2vel</property>
           <property>velocities/q-aero-rad_sec</property>
           <value> -18.3050 </value>
       </product>
    </function>

    <function name="aero/moment/Pitch_alphadot">
       <description>Pitch moment due to alpha rate</description>
       <product>
           <property>aero/qbar-psf</property>
           <property>metrics/Sw-sqft</property>
           <property>metrics/cbarw-ft</property>
           <property>aero/ci2vel</property>
           <property>aero/alphadot-rad_sec</property>
           <value> -9.8008 </value>
       </product>
    </function>

  </axis>

  <axis name="ROLL">

    <function name="aero/moment/Roll_beta">
       <description>Roll moment due to beta</description>
       <product>
           <property>aero/qbar-psf</property>
           <property>metrics/Sw-sqft</property>
           <property>metrics/bw-ft</property>
           <property>aero/beta-rad</property>
           <value>-0.0217</value>
       </product>
    </function>

    <function name="aero/moment/Roll_damp">
       <description>Roll moment due to roll rate</description>
       <product>
           <property>aero/qbar-psf</property>
           <property>metrics/Sw-sqft</property>
           <property>metrics/bw-ft</property>
           <property>aero/bi2vel</property>
           <property>velocities/p-aero-rad_sec</property>
           <value> -0.4241 </value>
       </product>
    </function>

    <function name="aero/moment/Roll_yaw">
       <description>Roll moment due to yaw rate</description>
       <product>
           <property>aero/qbar-psf</property>
           <property>metrics/Sw-sqft</property>
           <property>metrics/bw-ft</property>
           <property>aero/bi2vel</property>
           <property>velocities/r-aero-rad_sec</property>
           <value>0.0876</value>
       </product>
    </function>

    <function name="aero/moment/Roll_left_elevon">
       <description>Roll moment due to left elevon</description>
       <product>
          <property>aero/qbar-psf</property>
          <property>metrics/Sw-sqft</property>
          <property>metrics/bw-ft</property>
          <toradians><property>fcs/elevon-left-deg</property></toradians>
           <table>
            <independentVar lookup="row">velocities/mach</independentVar>
            <tableData>
              0.0    0.0278
              2.0    0.0096
            </tableData>
          </table>
       </product>
    </function>

    <function name="aero/moment/Roll_right_elevon">
       <description>Roll moment due to right elevon</description>
       <product>
          <property>aero/qbar-psf</property>
          <property>metrics/Sw-sqft</property>
          <property>metrics/bw-ft</property>
          <toradians><property>fcs/elevon-right-deg</property></toradians>
           <table>
            <independentVar lookup="row">velocities/mach</independentVar>
            <tableData>
              0.0    -0.0278
              2.0    -0.0096
            </tableData>
          </table>
       </product>
    </function>

    <function name="aero/moment/Roll_left_spoiler">
       <description>Roll moment due to left spoiler</description>
       <product>
          <property>aero/qbar-psf</property>
          <property>metrics/Sw-sqft</property>
          <property>metrics/bw-ft</property>
          <toradians><property>fcs/spoiler-left-deg</property></toradians>
           <table>
            <independentVar lookup="row">velocities/mach</independentVar>
            <tableData>
              0.0    -0.0312
              2.0    -0.0131
            </tableData>
          </table>
       </product>
    </function>

    <function name="aero/moment/Roll_right_spoiler">
       <description>Roll moment due to right spoiler</description>
       <product>
          <property>aero/qbar-psf</property>
          <property>metrics/Sw-sqft</property>
          <property>metrics/bw-ft</property>
          <toradians><property>fcs/spoiler-right-deg</property></toradians>
           <table>
            <independentVar lookup="row">velocities/mach</independentVar>
            <tableData>
              0.0    0.0312
              2.0    0.0131
            </tableData>
          </table>
       </product>
    </function>

    <function name="aero/moment/Roll_rudder">
       <description>Roll moment due to rudder</description>
       <product>
           <property>aero/qbar-psf</property>
           <property>metrics/Sw-sqft</property>
           <property>metrics/bw-ft</property>
           <toradians><property>fcs/rudder-deg</property></toradians>
           <value> 0.0012 </value>
       </product>
    </function>

  </axis>

  <axis name="YAW">

<!-- Stall initiator -->
    <function name="aero/moment/Yaw_alpha">
       <description>Yaw moment due to alpha</description>
       <product>
           <property>aero/qbar-psf</property>
           <property>metrics/Sw-sqft</property>
           <property>metrics/bw-ft</property>
           <property>aero/alpha-rad</property>
           <property>fcs/gear-no-wow</property>
           <table>
             <independentVar lookup="row">aero/beta-rad</independentVar>
             <independentVar lookup="column">aero/Re</independentVar>
             <tableData>
                         24453908 26899298
                 -0.3491  -0.1000   0.0000
                  0.3491   0.1000   0.0000
             </tableData>
           </table>
       </product>
    </function>


    <function name="aero/moment/Yaw_beta">
       <description>Yaw moment due to beta</description>
       <product>
           <property>aero/qbar-psf</property>
           <property>metrics/Sw-sqft</property>
           <property>metrics/bw-ft</property>
           <property>aero/beta-rad</property>
           <value> 0.05896 </value>
       </product>
    </function>

    <function name="aero/moment/Yaw_roll_rate">
       <description>Yaw moment due to roll rate</description>
       <product>
           <property>aero/qbar-psf</property>
           <property>metrics/Sw-sqft</property>
           <property>metrics/bw-ft</property>
           <property>aero/bi2vel</property>
           <property>velocities/p-rad_sec</property>
           <table>
             <independentVar lookup="row">aero/Re</independentVar>
             <tableData>
                17307328  -0.0749
                19038060  -0.0045
                25960990  -0.0016
                34828468  -0.0009
             </tableData>
           </table>
       </product>
    </function>

    <function name="aero/moment/Yaw_damp">
       <description>Yaw moment due to yaw rate</description>
       <product>
           <property>aero/qbar-psf</property>
           <property>metrics/Sw-sqft</property>
           <property>metrics/bw-ft</property>
           <property>aero/bi2vel</property>
           <property>velocities/r-aero-rad_sec</property>
           <value> -0.256 </value>
       </product>
    </function>

    <function name="aero/moment/Yaw_rudder">
       <description>Yaw moment due to rudder</description>
       <product>
           <property>aero/qbar-psf</property>
           <property>metrics/Sw-sqft</property>
           <property>metrics/bw-ft</property>
           <toradians><property>fcs/rudder-deg</property></toradians>
           <value> 0.0168 </value>
       </product>
    </function>

  </axis>

 </aerodynamics>

 <external_reactions>

  <force name="hook" frame="BODY">
   <location unit="FT">
    <x> 50.323 </x>
    <y> 0 </y>
    <z> -1.106</z>
   </location>
   <direction>
    <x>-0.9995</x>
    <y> 0 </y>
    <z> 0.01 </z>
   </direction>
  </force>

  <property value="0">systems/chute/chute-reef-pos-norm</property>
  <property value="0">systems/chute/chute-size-factor</property>

  <force name="chute" frame="WIND">
   <function>
    <product>
     <property>aero/qbar-psf</property>
     <property>systems/chute/chute-reef-pos-norm</property>
     <property>systems/chute/chute-size-factor</property>
     <value> 0.9 </value>
     <value> 115 </value>
    </product>
   </function>
   <location unit="FT">
    <x> 50.323 </x>
    <y> 0 </y>
    <z> 0 </z>
   </location>
   <direction>
    <x>-1 </x>
    <y> 0 </y>
    <z> 0 </z>
   </direction>
  </force>

  <force name="catapult" frame="BODY">
   <location unit="IN">
    <x> 86.268 </x>
    <y> 0 </y>
    <z> -79.632 </z>
   </location>
   <direction>
    <x> 1 </x>
    <y> 0 </y>
    <z> 0 </z>
   </direction>
  </force>

 </external_reactions>

</fdm_config>
