<?xml version="1.0"?>
<?xml-stylesheet type="text/xsl" href="http://raw.githubusercontent.com/JSBSim-Team/jsbsim/master/JSBSimScript.xsl"?>
<fdm_config name="SEPECAT-Jaguar" version="2.0" release="BETA"
   xmlns:xsi="http://www.w3.org/2001/XMLSchema-instance"
   xsi:noNamespaceSchemaLocation="http://raw.githubusercontent.com/JSBSim-Team/jsbsim/master/JSBSim.xsd">

    <fileheader>
        <author>Richard Harrison</author>
        <filecreationdate>2020-04-30</filecreationdate>
        <version>1.0</version>
        <copyright>Copyright (C) 2020 Richard Harrison, All rights reserved</copyright>
        <description></description>
        <note>Built using VSPAERO.Aircraft origin for measurements is the nose
ref: Data from Jane's All The World's Aircraft 1980–81,[28]
General characteristics
Crew: 1 (A and S) ; 2 (B and E)
Length: (A and S) with minor variations dependent on nose configuration:            16.83 m (55 ft 3 in)
        (B and E) with minor variations dependent on nose probe type (AAR or pitot) 17.53 m (57.5 ft)

Wing loading:                                                                      649.3  kg/m2 (133.0 lb/sq ft) maximum
Wingspan:                                                                            8.69 m (28 ft 6 in)
Height:                                                                              4.89 m (16 ft 1 in)
Wing area:                                                                          24.18 m2 (260.3 sq ft)
Aspect ratio:                                                                        3.12
Empty weight:                                                                     7000 kg (15432 lb)
Gross weight:                                                                    10954 kg (24149 lb) full internal fuel and 120 rpg
Max takeoff weight:                                                              15700 kg (34613 lb) with external stores

Fuel capacity: internal                                                           4200 l (1100 US gal; 920 imp gal)
               three drop tanks on inboard and centreline pylons                  1200 l (320 US gal; 260 imp gal) (each)

Mainplane
Span                                                        8.690m (28 ft 6.13 in)
Sweepback at 25% chord                                      40 deg. 2 mm
Thickness ratio                                             5 to 5.5%
Aspect ratio                                                3.12
Anhedral                                                    3 deg.
Total area                                                  24.03 m2 (258.66 ft2)

Tail unit Fin :
Sweepback at 25% chord                                      46 deg. 30 min
Thickness ratio                                             5%
Area (with rudder)                                          3.71 m2 (39.93 ft2)

Tailplane
Span                                                        4.530 m (14 ft 10.35 in)
Sweepback at 25% chord                                      40 deg. 20 min
Thickness ratio                                             5%
Anhedral                                                    10 deg.
Area                                                        3.97 m (42.73 ft2)

Landing gear
Wheel base                                                  5.69 1 m (18 ft 8.05 in)
Track                                                       2.400 m (7 ft 10.49in)
Nose undercarriage tyre                                     550 x 250 x 152
Main undercarriage tyre                                     615 x 225 x 254
Propulsion units
Mass                                                        811 kg (1784 lb)
Maximum thrust (dry)                                        2452 daN (5515 lbf)
Maximum thrust (with afterburnmer)                          3668 daN (8245 lbf)

Powerplant: 
Mass                                                                       867 kg (1915 lb)
2 × Rolls-Royce Turbomeca Adour Mk.102 afterburning turbofan engines:      22.75 kN (5110 lbf) (each dry)
                                                                           32.5   kN (7300 lbf) (each afterburner)
Performance
Maximum speed: at sea level                                    730 kt Mach 1.1
               at 11,000 m (36,000 ft)                         917 kt Mach 1.6
Landing speed:                                                 115 kt

Take-off run: typical tactical load                            580 m (1,900 ft)
Take-off run: typical tactical load to 15 m (49 ft):           940 m (3,080 ft)

Landing run typical tactical load from 15 m (49 ft):           785 m (2,575 ft)
Landing run: typical tactical load                             470 m (1,540 ft)

Combat range: hi-lo-hi (internal fuel)                         440 nm
              lo-lo-lo (internal fuel)                         310 nm
              hi-lo-hi (with external fuel)                    760 nm
              lo-lo-lo (with external fuel)                    490 nm

Ferry range:  with full internal and external tanks           1027 nm

Service ceiling:                                             14000 m (46,000 ft)

g limits:                                                     +8.6 (ultimate load +12)

Time to altitude: 9,145 m (30,003 ft) in 1 minute 30 seconds[141]

Thrust/weight:

Adour Mk.102: 0.422
Adour Mk.104: 0.464
Adour Mk.811: 0.486

Armament
Guns:               2 × 30 mm (1.181 in) calibre DEFA cannon with up to 150 rounds/gun
Hardpoints:         5 (4× under-wing and 1× center-line) with a capacity of 10,000 lb (4,500 kg),with provisions to carry combinations of:

Rockets: 
                    8× Matra rocket pods with 18× SNEB 68 mm rockets each
Missiles:
                    AS.37 Martel anti-radar missiles or
                    AS-30L laser guided air-to-ground missiles.
                    2× R550 Magic air-to-air missiles on overwing pylons
                    2× AIM-9 Sidewinder air-to-air missiles on overwing pylons
                    2× AIM-9 Sidewinder air-to-air missiles on outboard pylons

Bombs:
                    various unguided or laser-guided bombs or
                    2× WE177A nuclear bombs
                    1× AN-52 nuclear bomb

Other:
                    ECM protection pods
                    Reconnaissance Pod
                    ATLIS laser/electro-optical targeting pod
                    External drop tanks for extended range/loitering time
        </note>
        <note>Built with AeroTool 1.0.0.0: Options: AeroDetail=High, ExternalTanks, Flaps, Gear, GroundEffect, Mach, Speedbrake, WakeIterations=3</note>
        <limitation></limitation>
        <reference
            refID="ZDAT/AED/2019/11-01"
            author="Richard Harrison, rjh@zaretto.com"
            title="SEPECAT Jaguar Aerodynamic data built from vspaero; CG (8.0247, 0, -0.005)M"
            date="November, 2019"
            URL="http://www.zaretto.com/sites/zaretto.com/files/SEPECAT-Jaguar-data/rjh-zaretto-SEPECAT-Jaguar-aerodynamic-data-vspaero.pdf"
        />
        <reference
            refID="ZDAT/AED/2019/11-1"
            author="Richard Harrison, rjh@zaretto.com"
            title="SEPECAT-Jaguar Aerodynamic"
            date="November 2019"
            URL="http://www.zaretto.com/sites/zaretto.com/files/SEPECAT-Jaguar-data/rjh-zaretto-SEPECAT-Jaguar-aerodynamic-data.pdf"
        />
    </fileheader>
<metrics>
  <wingarea unit="M2">24.15</wingarea>
  <wingspan unit="M">8.543</wingspan>
  <wing_incidence>1.52</wing_incidence>
  <chord unit="M">3.317</chord>
  <htailarm>0</htailarm>
  <location unit="M" name="EYEPOINT">
    <x>3.371</x>
    <y>0</y>
    <z>0.965</z>
  </location>
  <location unit="M" name="VRP">
    <x>1.877</x>
    <y>0</y>
    <z>1.25</z>
  </location>
  <location unit="M" name="AERORP">
    <x>8.6247</x>
    <y>0</y>
    <z>-0.005</z>
  </location>
</metrics>

<mass_balance>
  <ixx>3418</ixx>
  <iyy>82395</iyy>
  <izz>61297</izz>
  <ixz>-804</ixz>
  <emptywt unit="KG">7000</emptywt>
  <location unit="M" name="CG">
    <x>8.0247</x>
    <y>0</y>
    <z>-0.005</z>
  </location>
  <pointmass name="pylon-left-over-wing">
    <weight unit="LBS">0</weight>
    <location unit="M" name="Pointmass pylon-left-over-wing">
      <x>8.8507</x>
      <y>-2.08</y>
      <z>0.12</z>
    </location>
  </pointmass>
  <pointmass name="pylon-left-outboard-wing">
    <weight unit="LBS">0</weight>
    <location unit="M" name="Pointmass pylon-left-outboard-wing">
      <x>9.0507</x>
      <y>-2.98</y>
      <z>-0.23</z>
    </location>
  </pointmass>
  <pointmass name="pylon-left-inboard-wing">
    <weight unit="LBS">0</weight>
    <location unit="M" name="Pointmass pylon-left-inboard-wing">
      <x>8.7507</x>
      <y>-2.08</y>
      <z>-0.23</z>
    </location>
  </pointmass>
  <pointmass name="pylon-fuselage">
    <weight unit="LBS">0</weight>
    <location unit="M" name="Pointmass pylon-fuselage">
      <x>8.6107</x>
      <y>0</y>
      <z>-0.875</z>
    </location>
  </pointmass>
  <pointmass name="pylon-right-inboard-wing">
    <weight unit="LBS">0</weight>
    <location unit="M" name="Pointmass pylon-right-inboard-wing">
      <x>8.7507</x>
      <y>2.08</y>
      <z>-0.23</z>
    </location>
  </pointmass>
  <pointmass name="pylon-right-outboard-wing">
    <weight unit="LBS">0</weight>
    <location unit="M" name="Pointmass pylon-right-outboard-wing">
      <x>9.0507</x>
      <y>2.98</y>
      <z>-0.23</z>
    </location>
  </pointmass>
  <pointmass name="pylon-right-over-wing">
    <weight unit="LBS">0</weight>
    <location unit="M" name="Pointmass pylon-right-over-wing">
      <x>8.8507</x>
      <y>2.08</y>
      <z>0.12</z>
    </location>
  </pointmass>
  <pointmass name="internal-gun">
    <weight unit="LBS">0</weight>
    <location unit="M" name="Pointmass internal-gun">
      <x>5.4147</x>
      <y>0</y>
      <z>-0.68</z>
    </location>
  </pointmass>
</mass_balance>

<propulsion>
  <engine file="Adour804">
    <location unit="M">
      <x>12.916</x>
      <y>-0.4127</y>
      <z>-0.2</z>
    </location>
    <orient unit="DEG">
      <roll>0</roll>
      <pitch>6</pitch>
      <yaw>0</yaw>
    </orient>
    <feed>8</feed>
    <feed>7</feed>
    <feed>6</feed>
    <feed>5</feed>
    <feed>4</feed>
    <feed>3</feed>
    <feed>2</feed>
    <feed>1</feed>
    <feed>0</feed>
    <thruster file="direct">
      <location unit="M">
        <x>12.916</x>
        <y>-0.4127</y>
        <z>-0.2</z>
      </location>
      <orient unit="DEG">
        <roll>0</roll>
        <pitch>6</pitch>
        <yaw>0</yaw>
      </orient>
    </thruster>
  </engine>
  <engine file="Adour804">
    <location unit="M">
      <x>12.916</x>
      <y>0.4127</y>
      <z>-0.2</z>
    </location>
    <orient unit="DEG">
      <roll>0</roll>
      <pitch>6</pitch>
      <yaw>0</yaw>
    </orient>
    <feed>8</feed>
    <feed>7</feed>
    <feed>6</feed>
    <feed>5</feed>
    <feed>4</feed>
    <feed>3</feed>
    <feed>2</feed>
    <feed>1</feed>
    <feed>0</feed>
    <thruster file="direct">
      <location unit="M">
        <x>12.916</x>
        <y>0.4127</y>
        <z>-0.2</z>
      </location>
      <orient unit="DEG">
        <roll>0</roll>
        <pitch>6</pitch>
        <yaw>0</yaw>
      </orient>
    </thruster>
  </engine>
  <tank number="0" type="FUEL">
    <!--0: FuselageFrontTank-->
    <location unit="M">
      <x>6.0827</x>
      <y>0</y>
      <z>0</z>
    </location>
    <capacity unit="LBS">1559</capacity>
    <standpipe unit="LBS">80</standpipe>
    <contents unit="LBS">1559</contents>
    <priority>3</priority>
  </tank>
  <tank number="1" type="FUEL">
    <!--1: FuselageCenterTank1-->
    <location unit="M">
      <x>7.6127</x>
      <y>0</y>
      <z>0</z>
    </location>
    <capacity unit="LBS">864</capacity>
    <standpipe unit="LBS">40</standpipe>
    <contents unit="LBS">864</contents>
    <priority>4</priority>
  </tank>
  <tank number="2" type="FUEL">
    <!--2: FuselageCenterTank2-->
    <location unit="M">
      <x>8.7257</x>
      <y>0</y>
      <z>0</z>
    </location>
    <capacity unit="LBS">1146</capacity>
    <standpipe unit="LBS">60</standpipe>
    <contents unit="LBS">1146</contents>
    <priority>4</priority>
  </tank>
  <tank number="3" type="FUEL">
    <!--3: FuselageRearTank-->
    <location unit="M">
      <x>11.0727</x>
      <y>0</y>
      <z>0</z>
    </location>
    <capacity unit="LBS">1962</capacity>
    <standpipe unit="LBS">100</standpipe>
    <contents unit="LBS">1962</contents>
    <priority>3</priority>
  </tank>
  <tank number="4" type="FUEL">
    <!--4: LeftWingTank-->
    <location unit="M">
      <x>9.2247</x>
      <y>-2.09</y>
      <z>0.005</z>
    </location>
    <capacity unit="LBS">820</capacity>
    <standpipe unit="LBS">40</standpipe>
    <contents unit="LBS">820</contents>
    <priority>2</priority>
  </tank>
  <tank number="5" type="FUEL">
    <!--5: RightWingTank-->
    <location unit="M">
      <x>9.2247</x>
      <y>2.09</y>
      <z>0.005</z>
    </location>
    <capacity unit="LBS">820</capacity>
    <standpipe unit="LBS">40</standpipe>
    <contents unit="LBS">820</contents>
    <priority>2</priority>
  </tank>
  <tank number="6" type="FUEL">
    <!--6: ExternalLeftWingTank-->
    <location unit="M">
      <x>8.7507</x>
      <y>-2.08</y>
      <z>-0.23</z>
    </location>
    <capacity unit="LBS">2037</capacity>
    <standpipe unit="LBS">100</standpipe>
    <contents unit="LBS">2037</contents>
    <priority>1</priority>
  </tank>
  <tank number="7" type="FUEL">
    <!--7: ExternalCentreTank-->
    <location unit="M">
      <x>8.6107</x>
      <y>0</y>
      <z>-0.875</z>
    </location>
    <capacity unit="LBS">2037</capacity>
    <standpipe unit="LBS">100</standpipe>
    <contents unit="LBS">2037</contents>
    <priority>2</priority>
  </tank>
  <tank number="8" type="FUEL">
    <!--8: ExternalRightWingTank-->
    <location unit="M">
      <x>8.7507</x>
      <y>2.08</y>
      <z>-0.23</z>
    </location>
    <capacity unit="LBS">2037</capacity>
    <standpipe unit="LBS">100</standpipe>
    <contents unit="LBS">2037</contents>
    <priority>1</priority>
  </tank>
</propulsion>

<system file="Propulsion"/>
<system file="autoflight"/>
<system file="jaguar-sas"/>
<system file="Aircraftcontrol"/>
<system file="jaguar-controls"/>
<system file="electrical"/>
<system file="hydraulics"/>
<ground_reactions file="Systems/ground-reactions"/>

<flight_control name="SEPECAT-Jaguar-FCS">
  <channel name="extra-aero">
        <!-- need %Cg in chord for moments [Xcg - Xref)/100] -->
        <summer name="cg-x-offset-chord-in">
            <input> inertia/cg-x-in</input>
            <input> -metrics/aero-rp-x-in</input>
            <output>inertia/cg-x-offset-chord-in</output>
        </summer>

        <!-- figure out the factor for the fuel tank aero -->
        <pure_gain name="cg-x-chord-percent">
            <description>Percent offset of the CoP from the CG</description>
            <input>inertia/cg-x-offset-chord-in</input>
            <gain> -0.01</gain>
            <clipto>
                <min> -1 </min>
                <max> 1 </max>
            </clipto>
            <output> inertia/cg-x-mac-percent </output>
        </pure_gain>

        <fcs_function name="pb">
            <description>PB Denormalization</description>
            <function>
                    <product>
                        <property>aero/bi2vel</property>
                        <property>velocities/p-aero-rad_sec</property>
                    </product>
            </function>
            <output>aero/pb</output>
        </fcs_function>

        <fcs_function name="cbarq-2vo">
            <description>For denormalization</description>
            <function>
                    <product>
                        <property>aero/ci2vel</property>
                        <property>velocities/q-aero-rad_sec</property>
                    </product>
            </function>
            <output>aero/qb</output>
        </fcs_function>

        <fcs_function name="rb-2vo">
            <description>For denormalization</description>
            <function>
                <product>
                        <property>aero/bi2vel</property>
                        <property>velocities/r-aero-rad_sec</property>
                    </product>
            </function>
            <output>aero/rb</output>
        </fcs_function>


        <fcs_function name="aero-cos-alpha">
            <function>
                <cos>
                    <property>aero/alpha-rad</property>
                </cos>
            </function>
            <output>aero/cos-alpha</output>
        </fcs_function>

        <fcs_function name="aero-sin-alpha">
            <function>
                <sin>
                    <property>aero/alpha-rad</property>
                </sin>
            </function>
            <output>aero/sin-alpha</output>
        </fcs_function>
        <fcs_function name="position/h-agl-m">
            <description>Height above ground (meters)</description>
            <function>
                    <product>
                        <property>position/h-agl-ft</property>
                        <value>0.3048</value>
                    </product>
            </function>
            <output>position/h-agl-m</output>
        </fcs_function>

       </channel>
</flight_control>
<aerodynamics>
    <function name="aero/c/CFXB">
    <description>BASE DRAG</description>
          <table>
            <independentVar lookup="row">aero/alpha-deg</independentVar>
            <independentVar lookup="column">aero/beta-deg</independentVar>
            <tableData>
                                -20	        -15	        -10	         -7	         -5	         -2	          0	          2	          5	          7	         10	         15	         20
                    -20	   0.19929	   0.19607	   0.19251	   0.19100	   0.19027	   0.18917	   0.19002	   0.18916	   0.19023	   0.19100	   0.19249	   0.19608	   0.19930
                    -10	   0.08672	   0.07564	   0.06734	   0.06418	   0.06244	   0.06126	   0.06082	   0.06126	   0.06244	   0.06418	   0.06733	   0.07565	   0.08672
                     -8	   0.07484	   0.06282	   0.05426	   0.05075	   0.04905	   0.04779	   0.04743	   0.04779	   0.04905	   0.05075	   0.05426	   0.06282	   0.07484
                     -4	   0.06083	   0.04824	   0.03925	   0.03554	   0.03379	   0.03231	   0.03205	   0.03231	   0.03379	   0.03554	   0.03925	   0.04824	   0.06083
                      0	   0.06043	   0.04775	   0.03856	   0.03469	   0.03361	   0.03201	   0.02814	   0.03201	   0.03361	   0.03469	   0.03856	   0.04774	   0.06043
                      2	   0.06617	   0.05285	   0.04480	   0.03959	   0.03741	   0.03647	   0.03598	   0.03647	   0.03741	   0.03959	   0.04480	   0.05285	   0.06618
                      4	   0.07307	   0.06237	   0.05122	   0.04798	   0.04620	   0.04487	   0.04466	   0.04487	   0.04620	   0.04798	   0.05122	   0.06238	   0.07307
                      6	   0.08502	   0.07227	   0.06254	   0.06315	   0.05713	   0.05589	   0.05666	   0.05589	   0.05713	   0.06315	   0.06253	   0.07227	   0.08502
                      8	   0.09926	   0.08645	   0.07839	   0.07473	   0.07315	   0.07200	   0.07177	   0.07200	   0.07315	   0.07474	   0.07839	   0.08645	   0.09926
                     10	   0.11604	   0.10456	   0.09622	   0.09280	   0.09139	   0.09039	   0.09021	   0.09039	   0.09138	   0.09279	   0.09622	   0.10458	   0.11605
                     12	   0.13465	   0.12511	   0.11758	   0.12986	   0.11165	   0.11182	   0.11190	   0.11182	   0.11164	   0.12985	   0.11759	   0.12513	   0.13464
                     14	   0.18360	   0.14840	   0.14310	   0.13875	   0.13731	   0.13632	   0.13630	   0.13632	   0.13730	   0.13874	   0.14308	   0.14844	   0.18362
                     16	   0.18354	   0.17582	   0.16886	   0.16594	   0.16450	   0.16375	   0.16396	   0.16374	   0.16452	   0.16597	   0.16886	   0.17580	   0.18355
                     18	   0.21108	   0.20670	   0.19968	   0.19574	   0.19451	   0.19383	   0.19426	   0.19385	   0.19447	   0.19573	   0.19970	   0.20684	   0.21108
                     20	   0.24338	   0.23847	   0.23125	   0.22867	   0.22639	   0.22649	   0.22647	   0.22643	   0.22638	   0.22864	   0.23123	   0.23845	   0.24340
                     24	   0.31154	   0.30717	   0.30101	   0.29755	   0.29607	   0.29399	   0.29331	   0.29395	   0.29603	   0.29748	   0.30093	   0.30721	   0.31158
                     28	   0.38800	   0.38170	   0.37609	   0.37010	   0.36815	   0.36502	   0.36664	   0.36500	   0.36803	   0.37028	   0.37607	   0.38199	   0.38804
                     30	   0.42637	   0.40372	   0.41710	   0.40977	   0.40684	   0.40580	   0.40674	   0.40567	   0.40679	   0.40954	   0.41709	   0.40376	   0.42651
                     35	   0.51848	   0.52598	   0.52197	   0.51865	   0.51607	   0.51452	   0.51433	   0.51448	   0.51602	   0.51870	   0.52212	   0.52525	   0.51867
                     45	   0.75561	   0.78268	   0.79047	   0.79448	   0.79257	   0.79131	   0.79189	   0.79091	   0.79225	   0.79481	   0.79063	   0.78217	   0.75597
                     50	   0.95906	   0.99447	   1.00921	   1.01348	   1.00909	   1.01029	   1.00877	   1.00952	   1.00904	   1.01341	   1.00944	   0.99474	   0.95927
                     55	   1.12790	   1.16397	   1.21196	   1.22708	   1.23136	   1.22724	   1.22662	   1.22711	   1.23159	   1.22773	   1.21243	   1.16423	   1.12811
                     60	   1.34550	   1.40885	   1.48063	   1.51451	   1.52424	   1.51172	   1.51183	   1.51208	   1.52436	   1.51386	   1.47996	   1.41204	   1.34775
            </tableData>
          </table>
    </function>
    <function name="aero/c/CFXBRK">
    <description>DRAG DUE TO SPEEDBRAKE</description>
    <product>
          <property>fcs/speedbrake-pos-norm</property>
          <table>
            <independentVar lookup="row">aero/alpha-deg</independentVar>
            <independentVar lookup="column">aero/beta-deg</independentVar>
            <tableData>
                                -20	        -15	        -10	         -7	         -5	         -2	          0	          2	          5	          7	         10	         15	         20
                    -20	   0.00613	   0.00759	   0.00878	   0.01501	   0.00729	   0.01618	   0.00767	   0.01618	   0.00732	   0.01508	   0.00878	   0.00752	   0.00614
                    -10	   0.01838	   0.01652	   0.01186	   0.01273	   0.01185	   0.01286	   0.01254	   0.01286	   0.01185	   0.01273	   0.01187	   0.01639	   0.01838
                     -8	   0.01374	   0.01348	   0.01337	   0.01333	   0.01309	   0.01298	   0.01310	   0.01298	   0.01309	   0.01333	   0.01337	   0.01347	   0.01373
                     -4	   0.01421	   0.01450	   0.01463	   0.01464	   0.01465	   0.01453	   0.01448	   0.01453	   0.01465	   0.01464	   0.01463	   0.01450	   0.01421
                      0	   0.01524	   0.01564	   0.01606	   0.01619	   0.01646	   0.01643	   0.01610	   0.01643	   0.01646	   0.01619	   0.01607	   0.01566	   0.01524
                      2	   0.01586	   0.01626	   0.01701	   0.01707	   0.01714	   0.01715	   0.01712	   0.01715	   0.01713	   0.01706	   0.01700	   0.01625	   0.01584
                      4	   0.01606	   0.01690	   0.01812	   0.01754	   0.01794	   0.01801	   0.01775	   0.01801	   0.01794	   0.01753	   0.01812	   0.01688	   0.01607
                      6	   0.01607	   0.01726	   0.01831	   0.01934	   0.01839	   0.02195	   0.01777	   0.02195	   0.01839	   0.01934	   0.01832	   0.01727	   0.01608
                      8	   0.01633	   0.01707	   0.01764	   0.01966	   0.01904	   0.01973	   0.01898	   0.01975	   0.01904	   0.01964	   0.01765	   0.01707	   0.01629
                     10	   0.01791	   0.01826	   0.01916	   0.01997	   0.01994	   0.02083	   0.02046	   0.02081	   0.01995	   0.01997	   0.01916	   0.01819	   0.01793
                     12	   0.01688	   0.01825	   0.01964	   0.02066	   0.02136	   0.02163	   0.02188	   0.02161	   0.02137	   0.02069	   0.01960	   0.01824	   0.01688
                     14	   0.01773	   0.01975	   0.02134	   0.02142	   0.02353	   0.02178	   0.02396	   0.02178	   0.02356	   0.02142	   0.02139	   0.01970	   0.01777
                     16	   0.01927	   0.02172	   0.02292	   0.02256	   0.02422	   0.02300	   0.02414	   0.02300	   0.02421	   0.02248	   0.02302	   0.02172	   0.01921
                     18	   0.02056	   0.02351	   0.02429	   0.02407	   0.02425	   0.02445	   0.02449	   0.02440	   0.02428	   0.02399	   0.02424	   0.02340	   0.02058
                     20	   0.02462	   0.02484	   0.02542	   0.02533	   0.02521	   0.02492	   0.02539	   0.02497	   0.02521	   0.02541	   0.02540	   0.02482	   0.02465
                     24	   0.03043	   0.02890	   0.02783	   0.02767	   0.02754	   0.02824	   0.02788	   0.02829	   0.02767	   0.02773	   0.02779	   0.02897	   0.03035
                     28	   0.03373	   0.03205	   0.03160	   0.03090	   0.03102	   0.03056	   0.03077	   0.03049	   0.03113	   0.03072	   0.03166	   0.03185	   0.03377
                     30	   0.03571	   0.03296	   0.03215	   0.03168	   0.03132	   0.03136	   0.03169	   0.03149	   0.03140	   0.03192	   0.03198	   0.03321	   0.03571
                     35	   0.03169	   0.03635	   0.03427	   0.03427	   0.03465	   0.03457	   0.03413	   0.03468	   0.03470	   0.03409	   0.03407	   0.03702	   0.03119
                     45	   0.03564	   0.03493	   0.03657	   0.03908	   0.03724	   0.03814	   0.03926	   0.03850	   0.03812	   0.03868	   0.03624	   0.03545	   0.03582
                     50	   0.03355	   0.03484	   0.03749	   0.03910	   0.04067	   0.04142	   0.04261	   0.04182	   0.04082	   0.03863	   0.03846	   0.03488	   0.03370
                     55	   0.03907	   0.03670	   0.04184	   0.04033	   0.04226	   0.04093	   0.03985	   0.04120	   0.04246	   0.04009	   0.04020	   0.03741	   0.03985
                     60	   0.04250	   0.04403	   0.03048	   0.04429	   0.03686	   0.04264	   0.04470	   0.04208	   0.04338	   0.04611	   0.03068	   0.04047	   0.04565
            </tableData>
          </table>
       </product>
    </function>
    <function name="aero/c/CFXDGE">
    <description>DRAG DUE TO GROUND EFFECT</description>
          <table>
            <independentVar lookup="row">position/h-agl-m</independentVar>
            <independentVar lookup="column">aero/alpha-deg</independentVar>
            <tableData>
                                  0	          2	          4	          6	          8	         10	         12	         14	         16	         20
                      1	  -0.00009	  -0.00036	  -0.00213	  -0.00562	  -0.00792	  -0.01113	  -0.01710	  -0.01668	  -0.02068	  -0.01615
                      2	  -0.00003	  -0.00004	  -0.00017	  -0.00057	  -0.00141	  -0.00314	  -0.00579	  -0.00989	  -0.01595	  -0.03950
                      3	  -0.00002	  -0.00002	  -0.00003	  -0.00009	  -0.00027	  -0.00073	  -0.00158	  -0.00296	  -0.00530	  -0.01333
                      8	  -0.00001	   0.00001	   0.00007	   0.00016	   0.00028	   0.00044	   0.00058	   0.00067	   0.00061	   0.00029
                     10	  -0.00001	   0.00001	   0.00006	   0.00015	   0.00027	   0.00044	   0.00059	   0.00072	   0.00078	   0.00073
                     30	   0.00000	   0.00000	   0.00000	   0.00000	   0.00000	   0.00000	   0.00000	   0.00000	   0.00000	   0.00000
            </tableData>
          </table>
    </function>
    <function name="aero/c/CFXDRD">
    <description>DRAG DUE TO RUDDER DEFLECTION</description>
    <product>
          <property>fcs/rudder-deg</property>
          <table>
            <independentVar lookup="row">aero/alpha-deg</independentVar>
            <independentVar lookup="column">aero/beta-deg</independentVar>
            <tableData>
                                -20	        -15	        -10	         -7	         -5	         -2	          0	          2	          5	          7	         10	         15	         20
                    -20	   0.00075	   0.00046	   0.00018	  -0.00001	  -0.00013	  -0.00030	  -0.00042	  -0.00052	  -0.00069	  -0.00079	  -0.00094	  -0.00116	  -0.00138
                    -10	   0.00080	   0.00049	   0.00018	   0.00000	  -0.00011	  -0.00029	  -0.00040	  -0.00051	  -0.00068	  -0.00078	  -0.00094	  -0.00119	  -0.00141
                     -8	   0.00081	   0.00050	   0.00019	   0.00001	  -0.00011	  -0.00028	  -0.00040	  -0.00051	  -0.00067	  -0.00078	  -0.00094	  -0.00119	  -0.00142
                     -4	   0.00082	   0.00051	   0.00021	   0.00003	  -0.00009	  -0.00026	  -0.00038	  -0.00049	  -0.00065	  -0.00077	  -0.00093	  -0.00118	  -0.00141
                      0	   0.00084	   0.00053	   0.00022	   0.00004	  -0.00006	  -0.00028	  -0.00036	  -0.00046	  -0.00066	  -0.00075	  -0.00091	  -0.00116	  -0.00141
                      2	   0.00085	   0.00053	   0.00025	   0.00005	  -0.00008	  -0.00024	  -0.00035	  -0.00048	  -0.00064	  -0.00075	  -0.00093	  -0.00116	  -0.00141
                      4	   0.00086	   0.00057	   0.00023	   0.00006	  -0.00006	  -0.00023	  -0.00035	  -0.00048	  -0.00063	  -0.00075	  -0.00088	  -0.00118	  -0.00139
                      6	   0.00090	   0.00058	   0.00022	   0.00032	  -0.00014	  -0.00045	  -0.00036	  -0.00024	  -0.00055	  -0.00101	  -0.00089	  -0.00117	  -0.00139
                      8	   0.00093	   0.00057	   0.00028	   0.00010	  -0.00002	  -0.00020	  -0.00035	  -0.00046	  -0.00062	  -0.00075	  -0.00092	  -0.00116	  -0.00139
                     10	   0.00095	   0.00061	   0.00029	   0.00011	  -0.00002	  -0.00018	  -0.00032	  -0.00043	  -0.00060	  -0.00074	  -0.00089	  -0.00112	  -0.00140
                     12	   0.00092	   0.00062	   0.00033	   0.00105	  -0.00010	  -0.00019	  -0.00031	  -0.00042	  -0.00053	  -0.00160	  -0.00092	  -0.00117	  -0.00137
                     14	   0.00149	   0.00064	   0.00040	   0.00017	   0.00002	  -0.00017	  -0.00029	  -0.00042	  -0.00058	  -0.00073	  -0.00094	  -0.00116	  -0.00185
                     16	   0.00097	   0.00069	   0.00037	   0.00018	   0.00003	  -0.00015	  -0.00027	  -0.00038	  -0.00056	  -0.00070	  -0.00087	  -0.00113	  -0.00133
                     18	   0.00100	   0.00072	   0.00033	   0.00019	   0.00004	  -0.00014	  -0.00026	  -0.00039	  -0.00054	  -0.00070	  -0.00081	  -0.00112	  -0.00131
                     20	   0.00100	   0.00077	   0.00042	   0.00021	   0.00005	  -0.00014	  -0.00024	  -0.00037	  -0.00057	  -0.00070	  -0.00089	  -0.00115	  -0.00129
                     24	   0.00111	   0.00080	   0.00045	   0.00023	   0.00007	  -0.00014	  -0.00022	  -0.00036	  -0.00055	  -0.00070	  -0.00088	  -0.00115	  -0.00135
                     28	   0.00104	   0.00065	   0.00037	   0.00016	   0.00007	  -0.00020	  -0.00024	  -0.00024	  -0.00053	  -0.00058	  -0.00078	  -0.00091	  -0.00122
                     30	   0.00099	   0.00058	   0.00035	   0.00019	   0.00008	  -0.00007	  -0.00021	  -0.00031	  -0.00045	  -0.00058	  -0.00072	  -0.00088	  -0.00120
                     35	   0.00086	   0.00068	   0.00036	   0.00021	   0.00010	  -0.00007	  -0.00017	  -0.00030	  -0.00045	  -0.00052	  -0.00066	  -0.00093	  -0.00108
                     45	   0.00067	   0.00050	   0.00031	   0.00013	   0.00012	  -0.00005	  -0.00013	  -0.00020	  -0.00029	  -0.00035	  -0.00043	  -0.00061	  -0.00070
                     50	   0.00065	   0.00046	   0.00023	   0.00015	   0.00006	  -0.00003	  -0.00009	  -0.00013	  -0.00030	  -0.00024	  -0.00033	  -0.00048	  -0.00057
                     55	   0.00055	   0.00041	   0.00022	   0.00011	   0.00007	   0.00004	  -0.00007	  -0.00009	  -0.00014	  -0.00017	  -0.00030	  -0.00035	  -0.00051
                     60	   0.00057	   0.00029	   0.00013	   0.00012	  -0.00022	   0.00007	  -0.00003	   0.00002	  -0.00006	  -0.00017	  -0.00018	  -0.00019	  -0.00026
            </tableData>
          </table>
       </product>
    </function>
    <function name="aero/c/CFXDRDMN">
    <description>DRAG DUE TO MACH DUE TO RUDDER DEFLECTION</description>
    <product>
          <property>fcs/rudder-deg</property>
          <table>
            <independentVar lookup="row">velocities/mach</independentVar>
            <independentVar lookup="column">aero/alpha-deg</independentVar>
            <tableData>
                                -10	         -5	         -2	       0.01	          1	          2	          6	          7	         10
                    0.2	   0.00026	   0.00009	   0.00006	   0.00005	   0.00009	   0.00011	   0.00022	   0.00026	   0.00037
                    0.4	   0.00017	   0.00006	   0.00004	   0.00004	   0.00006	   0.00007	   0.00015	   0.00017	   0.00024
                    0.6	   0.00000	   0.00000	   0.00000	   0.00000	   0.00000	   0.00000	   0.00000	   0.00000	   0.00000
                    0.8	  -0.00035	  -0.00011	  -0.00009	  -0.00007	  -0.00012	  -0.00015	  -0.00028	  -0.00033	  -0.00043
                   0.86	  -0.00053	  -0.00017	  -0.00013	  -0.00011	  -0.00019	  -0.00023	  -0.00042	  -0.00048	  -0.00061
                   0.88	  -0.00061	  -0.00019	  -0.00015	  -0.00013	  -0.00021	  -0.00026	  -0.00048	  -0.00054	  -0.00067
                   0.91	  -0.00075	  -0.00023	  -0.00018	  -0.00016	  -0.00026	  -0.00031	  -0.00056	  -0.00063	  -0.00076
                  0.955	  -0.00106	  -0.00032	  -0.00025	  -0.00023	  -0.00035	  -0.00042	  -0.00067	  -0.00072	  -0.00075
                   0.98	  -0.00146	  -0.00042	  -0.00031	  -0.00030	  -0.00044	  -0.00052	  -0.00069	  -0.00067	  -0.00044
                   0.99	  -0.00190	  -0.00052	  -0.00038	  -0.00040	  -0.00054	  -0.00061	  -0.00066	  -0.00056	   0.00002
                    1.1	  -0.00033	  -0.00217	  -0.00101	  -0.00122	  -0.00138	  -0.00181	  -0.00040	  -0.00040	  -0.00040
                    1.7	  -0.00370	  -0.00140	  -0.00063	  -0.00069	  -0.00069	  -0.00091	  -0.00327	  -0.00427	  -0.00051
                      2	  -0.00386	  -0.00126	  -0.00047	  -0.00052	  -0.00049	  -0.00066	  -0.00248	  -0.00323	  -0.00059
                    2.4	  -0.00316	  -0.00096	  -0.00032	  -0.00037	  -0.00030	  -0.00041	  -0.00164	  -0.00216	  -0.00418
            </tableData>
          </table>
       </product>
    </function>
    <function name="aero/c/CFXDSL">
    <description>DRAG DUE TO SLATS</description>
          <table>
            <independentVar lookup="row">aero/alpha-deg</independentVar>
            <independentVar lookup="column">fcs/slats-deg</independentVar>
            <tableData>
                                  0	         10	         23
                    -20	   0.00000	   0.00277	   0.00277
                    -10	   0.00000	   0.00053	   0.00053
                     -8	   0.00000	   0.00028	   0.00028
                     -4	   0.00000	   0.00006	   0.00006
                      0	   0.00000	   0.00072	   0.00072
                      2	   0.00000	   0.00046	   0.00046
                      4	   0.00000	   0.00075	   0.00075
                      6	   0.00000	   0.00121	   0.00121
                      8	   0.00000	   0.00172	   0.00173
                     10	   0.00000	   0.00234	   0.00234
                     12	   0.00000	   0.00302	   0.00302
                     14	   0.00000	   0.00356	   0.00356
                     16	   0.00000	   0.00431	   0.00430
                     18	   0.00000	   0.00541	   0.00540
                     20	   0.00000	   0.00723	   0.00723
                     24	   0.00000	   0.01221	   0.01221
                     28	   0.00000	   0.01727	   0.01728
                     30	   0.00000	   0.01773	   0.01764
                     35	   0.00000	   0.02250	   0.02250
                     45	   0.00000	   0.03467	   0.03472
                     50	   0.00000	   0.05361	   0.05373
                     55	   0.00000	   0.05741	   0.05712
                     60	   0.00000	   0.06425	   0.06528
            </tableData>
          </table>
    </function>
    <function name="aero/c/CFXDSPL">
    <description>DRAG DUE TO SPOILERS LEFT</description>
          <table>
            <independentVar lookup="row">aero/alpha-deg</independentVar>
            <independentVar lookup="column">aero/beta-deg</independentVar>
            <independentVar lookup="table">fcs/spoiler-left-deg</independentVar>
              <tableData breakPoint="0">
                              -20	       -15	       -10	        -7	        -5	        -2	         0	         2	         5	         7	        10	        15	        20
                    -20	   0.00000	   0.00000	   0.00000	   0.00000	   0.00000	   0.00000	   0.00000	   0.00000	   0.00000	   0.00000	   0.00000	   0.00000	   0.00000
                    -10	   0.00000	   0.00000	   0.00000	   0.00000	   0.00000	   0.00000	   0.00000	   0.00000	   0.00000	   0.00000	   0.00000	   0.00000	   0.00000
                     -8	   0.00000	   0.00000	   0.00000	   0.00000	   0.00000	   0.00000	   0.00000	   0.00000	   0.00000	   0.00000	   0.00000	   0.00000	   0.00000
                     -4	   0.00000	   0.00000	   0.00000	   0.00000	   0.00000	   0.00000	   0.00000	   0.00000	   0.00000	   0.00000	   0.00000	   0.00000	   0.00000
                      0	   0.00000	   0.00000	   0.00000	   0.00000	   0.00000	   0.00000	   0.00000	   0.00000	   0.00000	   0.00000	   0.00000	   0.00000	   0.00000
                      2	   0.00000	   0.00000	   0.00000	   0.00000	   0.00000	   0.00000	   0.00000	   0.00000	   0.00000	   0.00000	   0.00000	   0.00000	   0.00000
                      4	   0.00000	   0.00000	   0.00000	   0.00000	   0.00000	   0.00000	   0.00000	   0.00000	   0.00000	   0.00000	   0.00000	   0.00000	   0.00000
                      6	   0.00000	   0.00000	   0.00000	   0.00000	   0.00000	   0.00000	   0.00000	   0.00000	   0.00000	   0.00000	   0.00000	   0.00000	   0.00000
                      8	   0.00000	   0.00000	   0.00000	   0.00000	   0.00000	   0.00000	   0.00000	   0.00000	   0.00000	   0.00000	   0.00000	   0.00000	   0.00000
                     10	   0.00000	   0.00000	   0.00000	   0.00000	   0.00000	   0.00000	   0.00000	   0.00000	   0.00000	   0.00000	   0.00000	   0.00000	   0.00000
                     12	   0.00000	   0.00000	   0.00000	   0.00000	   0.00000	   0.00000	   0.00000	   0.00000	   0.00000	   0.00000	   0.00000	   0.00000	   0.00000
                     14	   0.00000	   0.00000	   0.00000	   0.00000	   0.00000	   0.00000	   0.00000	   0.00000	   0.00000	   0.00000	   0.00000	   0.00000	   0.00000
                     16	   0.00000	   0.00000	   0.00000	   0.00000	   0.00000	   0.00000	   0.00000	   0.00000	   0.00000	   0.00000	   0.00000	   0.00000	   0.00000
                     18	   0.00000	   0.00000	   0.00000	   0.00000	   0.00000	   0.00000	   0.00000	   0.00000	   0.00000	   0.00000	   0.00000	   0.00000	   0.00000
                     20	   0.00000	   0.00000	   0.00000	   0.00000	   0.00000	   0.00000	   0.00000	   0.00000	   0.00000	   0.00000	   0.00000	   0.00000	   0.00000
                     24	   0.00000	   0.00000	   0.00000	   0.00000	   0.00000	   0.00000	   0.00000	   0.00000	   0.00000	   0.00000	   0.00000	   0.00000	   0.00000
                     28	   0.00000	   0.00000	   0.00000	   0.00000	   0.00000	   0.00000	   0.00000	   0.00000	   0.00000	   0.00000	   0.00000	   0.00000	   0.00000
                     30	   0.00000	   0.00000	   0.00000	   0.00000	   0.00000	   0.00000	   0.00000	   0.00000	   0.00000	   0.00000	   0.00000	   0.00000	   0.00000
                     35	   0.00000	   0.00000	   0.00000	   0.00000	   0.00000	   0.00000	   0.00000	   0.00000	   0.00000	   0.00000	   0.00000	   0.00000	   0.00000
                     45	   0.00000	   0.00000	   0.00000	   0.00000	   0.00000	   0.00000	   0.00000	   0.00000	   0.00000	   0.00000	   0.00000	   0.00000	   0.00000
                     50	   0.00000	   0.00000	   0.00000	   0.00000	   0.00000	   0.00000	   0.00000	   0.00000	   0.00000	   0.00000	   0.00000	   0.00000	   0.00000
                     55	   0.00000	   0.00000	   0.00000	   0.00000	   0.00000	   0.00000	   0.00000	   0.00000	   0.00000	   0.00000	   0.00000	   0.00000	   0.00000
                     60	   0.00000	   0.00000	   0.00000	   0.00000	   0.00000	   0.00000	   0.00000	   0.00000	   0.00000	   0.00000	   0.00000	   0.00000	   0.00000
              </tableData>
              <tableData breakPoint="20">
                              -20	       -15	       -10	        -7	        -5	        -2	         0	         2	         5	         7	        10	        15	        20
                    -20	   0.02157	   0.02219	   0.02331	   0.02242	   0.02167	   0.02023	   0.01987	   0.01941	   0.01766	   0.01694	   0.01519	   0.01261	   0.00976
                    -10	   0.01676	   0.01600	   0.01444	   0.01353	   0.01293	   0.01157	   0.01098	   0.01035	   0.00919	   0.00856	   0.00763	   0.00561	   0.00378
                     -8	   0.01522	   0.01420	   0.01246	   0.01150	   0.01094	   0.00979	   0.00910	   0.00855	   0.00751	   0.00684	   0.00586	   0.00414	   0.00252
                     -4	   0.01125	   0.00985	   0.00828	   0.00720	   0.00669	   0.00577	   0.00514	   0.00453	   0.00364	   0.00300	   0.00231	   0.00095	  -0.00039
                      0	   0.00619	   0.00510	   0.00340	   0.00280	   0.00127	   0.00171	   0.00228	   0.00026	  -0.00025	  -0.00065	  -0.00123	  -0.00244	  -0.00347
                      2	   0.00336	   0.00140	  -0.00149	   0.00078	   0.00071	  -0.00052	  -0.00074	  -0.00130	  -0.00197	  -0.00242	  -0.00323	  -0.00416	  -0.00523
                      4	   0.00103	  -0.00161	  -0.00031	  -0.00098	  -0.00151	  -0.00231	  -0.00275	  -0.00307	  -0.00382	  -0.00426	  -0.00488	  -0.00592	  -0.00660
                      6	  -0.00209	  -0.00191	  -0.00201	  -0.00301	  -0.00330	  -0.00431	  -0.00469	  -0.00481	  -0.00557	  -0.00639	  -0.00680	  -0.00768	  -0.00842
                      8	  -0.00462	  -0.00425	  -0.00431	  -0.00446	  -0.00506	  -0.00609	  -0.00643	  -0.00688	  -0.00744	  -0.00788	  -0.00848	  -0.00939	  -0.01051
                     10	  -0.00522	  -0.00573	  -0.00571	  -0.00630	  -0.00688	  -0.00778	  -0.00819	  -0.00872	  -0.00933	  -0.00972	  -0.01025	  -0.01088	  -0.01158
                     12	  -0.00719	  -0.00607	  -0.00722	  -0.00649	  -0.00878	  -0.00967	  -0.01016	  -0.01062	  -0.01103	  -0.01286	  -0.01188	  -0.01277	  -0.01306
                     14	  -0.00798	  -0.00741	  -0.00856	  -0.00922	  -0.01039	  -0.01127	  -0.01165	  -0.01220	  -0.01290	  -0.01301	  -0.01386	  -0.01387	  -0.01542
                     16	  -0.00714	  -0.00859	  -0.00976	  -0.01093	  -0.01192	  -0.01304	  -0.01338	  -0.01394	  -0.01473	  -0.01490	  -0.01578	  -0.01599	  -0.01621
                     18	  -0.00900	  -0.00905	  -0.01047	  -0.01182	  -0.01334	  -0.01379	  -0.01521	  -0.01570	  -0.01662	  -0.01640	  -0.01754	  -0.01809	  -0.01738
                     20	  -0.00932	  -0.00938	  -0.01175	  -0.01337	  -0.01425	  -0.01513	  -0.01636	  -0.01724	  -0.01778	  -0.01828	  -0.01921	  -0.01887	  -0.01851
                     24	  -0.00768	  -0.01010	  -0.01207	  -0.01254	  -0.01459	  -0.01528	  -0.01626	  -0.01704	  -0.01910	  -0.02086	  -0.02130	  -0.02234	  -0.02096
                     28	  -0.00410	  -0.00911	  -0.01177	  -0.01084	  -0.01069	  -0.01336	  -0.01328	  -0.01553	  -0.01663	  -0.01909	  -0.02146	  -0.02473	  -0.02332
                     30	  -0.00795	  -0.00720	  -0.01140	  -0.01109	  -0.01028	  -0.01168	  -0.01344	  -0.01450	  -0.01612	  -0.01799	  -0.02179	  -0.02325	  -0.02392
                     35	  -0.00909	  -0.01070	  -0.00920	  -0.00926	  -0.00768	  -0.01036	  -0.01182	  -0.01188	  -0.01412	  -0.01620	  -0.01860	  -0.02510	  -0.02608
                     45	  -0.00904	  -0.01010	  -0.00812	  -0.01170	  -0.01069	  -0.00947	  -0.01072	  -0.01002	  -0.01505	  -0.01512	  -0.01882	  -0.02987	  -0.02674
                     50	  -0.01107	  -0.01202	  -0.01058	  -0.00960	  -0.00874	  -0.01049	  -0.00902	  -0.00927	  -0.01376	  -0.01891	  -0.02402	  -0.04146	  -0.03866
                     55	  -0.01254	  -0.00633	  -0.00412	  -0.01060	  -0.01204	  -0.01001	  -0.01383	  -0.01665	  -0.01897	  -0.02193	  -0.02786	  -0.03308	  -0.03434
                     60	  -0.01175	  -0.02100	  -0.02762	  -0.01545	  -0.01018	  -0.01587	  -0.01275	  -0.01910	  -0.02027	  -0.02868	  -0.04486	  -0.03858	  -0.03523
              </tableData>
              <tableData breakPoint="50">
                              -20	       -15	       -10	        -7	        -5	        -2	         0	         2	         5	         7	        10	        15	        20
                    -20	   0.03455	   0.03552	   0.03683	   0.03697	   0.03727	   0.03586	   0.03493	   0.03407	   0.03202	   0.03023	   0.02731	   0.02291	   0.01856
                    -10	   0.03067	   0.03003	   0.02807	   0.02656	   0.02548	   0.02324	   0.02236	   0.02131	   0.01942	   0.01823	   0.01651	   0.01285	   0.00929
                     -8	   0.02849	   0.02729	   0.02485	   0.02350	   0.02266	   0.02044	   0.01948	   0.01854	   0.01678	   0.01557	   0.01379	   0.01045	   0.00741
                     -4	   0.02271	   0.02074	   0.01835	   0.01699	   0.01597	   0.01438	   0.01337	   0.01242	   0.01083	   0.00968	   0.00820	   0.00549	   0.00277
                      0	   0.01457	   0.01265	   0.01027	   0.00963	   0.00598	   0.00779	   0.00752	   0.00613	   0.00479	   0.00386	   0.00254	   0.00002	  -0.00220
                      2	   0.00936	   0.00741	   0.00186	   0.00651	   0.00560	   0.00478	   0.00409	   0.00334	   0.00204	   0.00096	  -0.00049	  -0.00271	  -0.00501
                      4	   0.00526	   0.00618	   0.00470	   0.00378	   0.00320	   0.00181	   0.00103	   0.00042	  -0.00097	  -0.00191	  -0.00322	  -0.00543	  -0.00724
                      6	   0.00384	   0.00190	   0.00197	   0.00065	   0.00028	  -0.00134	  -0.00214	  -0.00243	  -0.00387	  -0.00542	  -0.00626	  -0.00827	  -0.01012
                      8	  -0.00335	  -0.00171	  -0.00121	  -0.00164	  -0.00249	  -0.00422	  -0.00480	  -0.00597	  -0.00717	  -0.00787	  -0.00916	  -0.01127	  -0.01254
                     10	  -0.00425	  -0.00367	  -0.00364	  -0.00456	  -0.00581	  -0.00710	  -0.00787	  -0.00898	  -0.01015	  -0.01100	  -0.01203	  -0.01346	  -0.01556
                     12	  -0.00737	  -0.00462	  -0.00578	  -0.00488	  -0.00900	  -0.01012	  -0.01107	  -0.01198	  -0.01293	  -0.01649	  -0.01507	  -0.01655	  -0.01759
                     14	  -0.00840	  -0.00672	  -0.00793	  -0.00968	  -0.01144	  -0.01287	  -0.01351	  -0.01486	  -0.01602	  -0.01683	  -0.01838	  -0.01937	  -0.02252
                     16	  -0.00735	  -0.00793	  -0.01028	  -0.01233	  -0.01395	  -0.01522	  -0.01673	  -0.01811	  -0.01926	  -0.02022	  -0.02155	  -0.02268	  -0.02318
                     18	  -0.00974	  -0.00924	  -0.01216	  -0.01444	  -0.01688	  -0.01780	  -0.01993	  -0.02110	  -0.02230	  -0.02310	  -0.02487	  -0.02586	  -0.02591
                     20	  -0.01042	  -0.01025	  -0.01325	  -0.01667	  -0.01870	  -0.02047	  -0.02236	  -0.02447	  -0.02493	  -0.02594	  -0.02770	  -0.02809	  -0.02816
                     24	  -0.00826	  -0.01296	  -0.01508	  -0.01790	  -0.02124	  -0.02196	  -0.02332	  -0.02544	  -0.02886	  -0.03004	  -0.03181	  -0.03333	  -0.03241
                     28	  -0.00318	  -0.01323	  -0.01746	  -0.01740	  -0.01743	  -0.02166	  -0.02306	  -0.02581	  -0.02794	  -0.03122	  -0.03428	  -0.03780	  -0.03674
                     30	  -0.00953	  -0.01070	  -0.01880	  -0.01657	  -0.01729	  -0.01978	  -0.02333	  -0.02508	  -0.02751	  -0.03041	  -0.03530	  -0.03727	  -0.03719
                     35	  -0.01577	  -0.01630	  -0.01560	  -0.01488	  -0.01493	  -0.01890	  -0.02001	  -0.02031	  -0.02582	  -0.02916	  -0.03393	  -0.04108	  -0.04233
                     45	  -0.01756	  -0.01993	  -0.01609	  -0.02083	  -0.01877	  -0.01773	  -0.01997	  -0.02068	  -0.02432	  -0.02757	  -0.03685	  -0.05142	  -0.04817
                     50	  -0.01527	  -0.01695	  -0.01753	  -0.01610	  -0.01902	  -0.02057	  -0.01991	  -0.02264	  -0.02900	  -0.03286	  -0.04454	  -0.06915	  -0.06634
                     55	  -0.02413	  -0.01202	  -0.01404	  -0.01653	  -0.01775	  -0.02174	  -0.03012	  -0.03379	  -0.03592	  -0.04104	  -0.05411	  -0.05569	  -0.06491
                     60	  -0.01715	  -0.03126	  -0.04167	  -0.02702	  -0.02511	  -0.03363	  -0.03533	  -0.03647	  -0.04663	  -0.05604	  -0.07737	  -0.05804	  -0.06695
              </tableData>
          </table>
    </function>
    <function name="aero/c/CFXDSPR">
    <description>DRAG DUE TO SPOILERS RIGHT</description>
          <table>
            <independentVar lookup="row">aero/alpha-deg</independentVar>
            <independentVar lookup="column">aero/beta-deg</independentVar>
            <independentVar lookup="table">fcs/spoiler-right-deg</independentVar>
              <tableData breakPoint="0">
                              -20	       -15	       -10	        -7	        -5	        -2	         0	         2	         5	         7	        10	        15	        20
                    -20	   0.00000	   0.00000	   0.00000	   0.00000	   0.00000	   0.00000	   0.00000	   0.00000	   0.00000	   0.00000	   0.00000	   0.00000	   0.00000
                    -10	   0.00000	   0.00000	   0.00000	   0.00000	   0.00000	   0.00000	   0.00000	   0.00000	   0.00000	   0.00000	   0.00000	   0.00000	   0.00000
                     -8	   0.00000	   0.00000	   0.00000	   0.00000	   0.00000	   0.00000	   0.00000	   0.00000	   0.00000	   0.00000	   0.00000	   0.00000	   0.00000
                     -4	   0.00000	   0.00000	   0.00000	   0.00000	   0.00000	   0.00000	   0.00000	   0.00000	   0.00000	   0.00000	   0.00000	   0.00000	   0.00000
                      0	   0.00000	   0.00000	   0.00000	   0.00000	   0.00000	   0.00000	   0.00000	   0.00000	   0.00000	   0.00000	   0.00000	   0.00000	   0.00000
                      2	   0.00000	   0.00000	   0.00000	   0.00000	   0.00000	   0.00000	   0.00000	   0.00000	   0.00000	   0.00000	   0.00000	   0.00000	   0.00000
                      4	   0.00000	   0.00000	   0.00000	   0.00000	   0.00000	   0.00000	   0.00000	   0.00000	   0.00000	   0.00000	   0.00000	   0.00000	   0.00000
                      6	   0.00000	   0.00000	   0.00000	   0.00000	   0.00000	   0.00000	   0.00000	   0.00000	   0.00000	   0.00000	   0.00000	   0.00000	   0.00000
                      8	   0.00000	   0.00000	   0.00000	   0.00000	   0.00000	   0.00000	   0.00000	   0.00000	   0.00000	   0.00000	   0.00000	   0.00000	   0.00000
                     10	   0.00000	   0.00000	   0.00000	   0.00000	   0.00000	   0.00000	   0.00000	   0.00000	   0.00000	   0.00000	   0.00000	   0.00000	   0.00000
                     12	   0.00000	   0.00000	   0.00000	   0.00000	   0.00000	   0.00000	   0.00000	   0.00000	   0.00000	   0.00000	   0.00000	   0.00000	   0.00000
                     14	   0.00000	   0.00000	   0.00000	   0.00000	   0.00000	   0.00000	   0.00000	   0.00000	   0.00000	   0.00000	   0.00000	   0.00000	   0.00000
                     16	   0.00000	   0.00000	   0.00000	   0.00000	   0.00000	   0.00000	   0.00000	   0.00000	   0.00000	   0.00000	   0.00000	   0.00000	   0.00000
                     18	   0.00000	   0.00000	   0.00000	   0.00000	   0.00000	   0.00000	   0.00000	   0.00000	   0.00000	   0.00000	   0.00000	   0.00000	   0.00000
                     20	   0.00000	   0.00000	   0.00000	   0.00000	   0.00000	   0.00000	   0.00000	   0.00000	   0.00000	   0.00000	   0.00000	   0.00000	   0.00000
                     24	   0.00000	   0.00000	   0.00000	   0.00000	   0.00000	   0.00000	   0.00000	   0.00000	   0.00000	   0.00000	   0.00000	   0.00000	   0.00000
                     28	   0.00000	   0.00000	   0.00000	   0.00000	   0.00000	   0.00000	   0.00000	   0.00000	   0.00000	   0.00000	   0.00000	   0.00000	   0.00000
                     30	   0.00000	   0.00000	   0.00000	   0.00000	   0.00000	   0.00000	   0.00000	   0.00000	   0.00000	   0.00000	   0.00000	   0.00000	   0.00000
                     35	   0.00000	   0.00000	   0.00000	   0.00000	   0.00000	   0.00000	   0.00000	   0.00000	   0.00000	   0.00000	   0.00000	   0.00000	   0.00000
                     45	   0.00000	   0.00000	   0.00000	   0.00000	   0.00000	   0.00000	   0.00000	   0.00000	   0.00000	   0.00000	   0.00000	   0.00000	   0.00000
                     50	   0.00000	   0.00000	   0.00000	   0.00000	   0.00000	   0.00000	   0.00000	   0.00000	   0.00000	   0.00000	   0.00000	   0.00000	   0.00000
                     55	   0.00000	   0.00000	   0.00000	   0.00000	   0.00000	   0.00000	   0.00000	   0.00000	   0.00000	   0.00000	   0.00000	   0.00000	   0.00000
                     60	   0.00000	   0.00000	   0.00000	   0.00000	   0.00000	   0.00000	   0.00000	   0.00000	   0.00000	   0.00000	   0.00000	   0.00000	   0.00000
              </tableData>
              <tableData breakPoint="20">
                              -20	       -15	       -10	        -7	        -5	        -2	         0	         2	         5	         7	        10	        15	        20
                    -20	   0.02157	   0.02219	   0.02331	   0.02242	   0.02167	   0.02023	   0.01987	   0.01941	   0.01766	   0.01694	   0.01519	   0.01261	   0.00976
                    -10	   0.01676	   0.01600	   0.01444	   0.01353	   0.01293	   0.01157	   0.01098	   0.01035	   0.00919	   0.00856	   0.00763	   0.00561	   0.00378
                     -8	   0.01522	   0.01420	   0.01246	   0.01150	   0.01094	   0.00979	   0.00910	   0.00855	   0.00751	   0.00684	   0.00586	   0.00414	   0.00252
                     -4	   0.01125	   0.00985	   0.00828	   0.00720	   0.00669	   0.00577	   0.00514	   0.00453	   0.00364	   0.00300	   0.00231	   0.00095	  -0.00039
                      0	   0.00619	   0.00510	   0.00340	   0.00280	   0.00127	   0.00171	   0.00228	   0.00026	  -0.00025	  -0.00065	  -0.00123	  -0.00244	  -0.00347
                      2	   0.00336	   0.00140	  -0.00149	   0.00078	   0.00071	  -0.00052	  -0.00074	  -0.00130	  -0.00197	  -0.00242	  -0.00323	  -0.00416	  -0.00523
                      4	   0.00103	  -0.00161	  -0.00031	  -0.00098	  -0.00151	  -0.00231	  -0.00275	  -0.00307	  -0.00382	  -0.00426	  -0.00488	  -0.00592	  -0.00660
                      6	  -0.00209	  -0.00191	  -0.00201	  -0.00301	  -0.00330	  -0.00431	  -0.00469	  -0.00481	  -0.00557	  -0.00639	  -0.00680	  -0.00768	  -0.00842
                      8	  -0.00462	  -0.00425	  -0.00431	  -0.00446	  -0.00506	  -0.00609	  -0.00643	  -0.00688	  -0.00744	  -0.00788	  -0.00848	  -0.00939	  -0.01051
                     10	  -0.00522	  -0.00573	  -0.00571	  -0.00630	  -0.00688	  -0.00778	  -0.00819	  -0.00872	  -0.00933	  -0.00972	  -0.01025	  -0.01088	  -0.01158
                     12	  -0.00719	  -0.00607	  -0.00722	  -0.00649	  -0.00878	  -0.00967	  -0.01016	  -0.01062	  -0.01103	  -0.01286	  -0.01188	  -0.01277	  -0.01306
                     14	  -0.00798	  -0.00741	  -0.00856	  -0.00922	  -0.01039	  -0.01127	  -0.01165	  -0.01220	  -0.01290	  -0.01301	  -0.01386	  -0.01387	  -0.01542
                     16	  -0.00714	  -0.00859	  -0.00976	  -0.01093	  -0.01192	  -0.01304	  -0.01338	  -0.01394	  -0.01473	  -0.01490	  -0.01578	  -0.01599	  -0.01621
                     18	  -0.00900	  -0.00905	  -0.01047	  -0.01182	  -0.01334	  -0.01379	  -0.01521	  -0.01570	  -0.01662	  -0.01640	  -0.01754	  -0.01809	  -0.01738
                     20	  -0.00932	  -0.00938	  -0.01175	  -0.01337	  -0.01425	  -0.01513	  -0.01636	  -0.01724	  -0.01778	  -0.01828	  -0.01921	  -0.01887	  -0.01851
                     24	  -0.00768	  -0.01010	  -0.01207	  -0.01254	  -0.01459	  -0.01528	  -0.01626	  -0.01704	  -0.01910	  -0.02086	  -0.02130	  -0.02234	  -0.02096
                     28	  -0.00410	  -0.00911	  -0.01177	  -0.01084	  -0.01069	  -0.01336	  -0.01328	  -0.01553	  -0.01663	  -0.01909	  -0.02146	  -0.02473	  -0.02332
                     30	  -0.00795	  -0.00720	  -0.01140	  -0.01109	  -0.01028	  -0.01168	  -0.01344	  -0.01450	  -0.01612	  -0.01799	  -0.02179	  -0.02325	  -0.02392
                     35	  -0.00909	  -0.01070	  -0.00920	  -0.00926	  -0.00768	  -0.01036	  -0.01182	  -0.01188	  -0.01412	  -0.01620	  -0.01860	  -0.02510	  -0.02608
                     45	  -0.00904	  -0.01010	  -0.00812	  -0.01170	  -0.01069	  -0.00947	  -0.01072	  -0.01002	  -0.01505	  -0.01512	  -0.01882	  -0.02987	  -0.02674
                     50	  -0.01107	  -0.01202	  -0.01058	  -0.00960	  -0.00874	  -0.01049	  -0.00902	  -0.00927	  -0.01376	  -0.01891	  -0.02402	  -0.04146	  -0.03866
                     55	  -0.01254	  -0.00633	  -0.00412	  -0.01060	  -0.01204	  -0.01001	  -0.01383	  -0.01665	  -0.01897	  -0.02193	  -0.02786	  -0.03308	  -0.03434
                     60	  -0.01175	  -0.02100	  -0.02762	  -0.01545	  -0.01018	  -0.01587	  -0.01275	  -0.01910	  -0.02027	  -0.02868	  -0.04486	  -0.03858	  -0.03523
              </tableData>
              <tableData breakPoint="50">
                              -20	       -15	       -10	        -7	        -5	        -2	         0	         2	         5	         7	        10	        15	        20
                    -20	   0.03455	   0.03552	   0.03683	   0.03697	   0.03727	   0.03586	   0.03493	   0.03407	   0.03202	   0.03023	   0.02731	   0.02291	   0.01856
                    -10	   0.03067	   0.03003	   0.02807	   0.02656	   0.02548	   0.02324	   0.02236	   0.02131	   0.01942	   0.01823	   0.01651	   0.01285	   0.00929
                     -8	   0.02849	   0.02729	   0.02485	   0.02350	   0.02266	   0.02044	   0.01948	   0.01854	   0.01678	   0.01557	   0.01379	   0.01045	   0.00741
                     -4	   0.02271	   0.02074	   0.01835	   0.01699	   0.01597	   0.01438	   0.01337	   0.01242	   0.01083	   0.00968	   0.00820	   0.00549	   0.00277
                      0	   0.01457	   0.01265	   0.01027	   0.00963	   0.00598	   0.00779	   0.00752	   0.00613	   0.00479	   0.00386	   0.00254	   0.00002	  -0.00220
                      2	   0.00936	   0.00741	   0.00186	   0.00651	   0.00560	   0.00478	   0.00409	   0.00334	   0.00204	   0.00096	  -0.00049	  -0.00271	  -0.00501
                      4	   0.00526	   0.00618	   0.00470	   0.00378	   0.00320	   0.00181	   0.00103	   0.00042	  -0.00097	  -0.00191	  -0.00322	  -0.00543	  -0.00724
                      6	   0.00384	   0.00190	   0.00197	   0.00065	   0.00028	  -0.00134	  -0.00214	  -0.00243	  -0.00387	  -0.00542	  -0.00626	  -0.00827	  -0.01012
                      8	  -0.00335	  -0.00171	  -0.00121	  -0.00164	  -0.00249	  -0.00422	  -0.00480	  -0.00597	  -0.00717	  -0.00787	  -0.00916	  -0.01127	  -0.01254
                     10	  -0.00425	  -0.00367	  -0.00364	  -0.00456	  -0.00581	  -0.00710	  -0.00787	  -0.00898	  -0.01015	  -0.01100	  -0.01203	  -0.01346	  -0.01556
                     12	  -0.00737	  -0.00462	  -0.00578	  -0.00488	  -0.00900	  -0.01012	  -0.01107	  -0.01198	  -0.01293	  -0.01649	  -0.01507	  -0.01655	  -0.01759
                     14	  -0.00840	  -0.00672	  -0.00793	  -0.00968	  -0.01144	  -0.01287	  -0.01351	  -0.01486	  -0.01602	  -0.01683	  -0.01838	  -0.01937	  -0.02252
                     16	  -0.00735	  -0.00793	  -0.01028	  -0.01233	  -0.01395	  -0.01522	  -0.01673	  -0.01811	  -0.01926	  -0.02022	  -0.02155	  -0.02268	  -0.02318
                     18	  -0.00974	  -0.00924	  -0.01216	  -0.01444	  -0.01688	  -0.01780	  -0.01993	  -0.02110	  -0.02230	  -0.02310	  -0.02487	  -0.02586	  -0.02591
                     20	  -0.01042	  -0.01025	  -0.01325	  -0.01667	  -0.01870	  -0.02047	  -0.02236	  -0.02447	  -0.02493	  -0.02594	  -0.02770	  -0.02809	  -0.02816
                     24	  -0.00826	  -0.01296	  -0.01508	  -0.01790	  -0.02124	  -0.02196	  -0.02332	  -0.02544	  -0.02886	  -0.03004	  -0.03181	  -0.03333	  -0.03241
                     28	  -0.00318	  -0.01323	  -0.01746	  -0.01740	  -0.01743	  -0.02166	  -0.02306	  -0.02581	  -0.02794	  -0.03122	  -0.03428	  -0.03780	  -0.03674
                     30	  -0.00953	  -0.01070	  -0.01880	  -0.01657	  -0.01729	  -0.01978	  -0.02333	  -0.02508	  -0.02751	  -0.03041	  -0.03530	  -0.03727	  -0.03719
                     35	  -0.01577	  -0.01630	  -0.01560	  -0.01488	  -0.01493	  -0.01890	  -0.02001	  -0.02031	  -0.02582	  -0.02916	  -0.03393	  -0.04108	  -0.04233
                     45	  -0.01756	  -0.01993	  -0.01609	  -0.02083	  -0.01877	  -0.01773	  -0.01997	  -0.02068	  -0.02432	  -0.02757	  -0.03685	  -0.05142	  -0.04817
                     50	  -0.01527	  -0.01695	  -0.01753	  -0.01610	  -0.01902	  -0.02057	  -0.01991	  -0.02264	  -0.02900	  -0.03286	  -0.04454	  -0.06915	  -0.06634
                     55	  -0.02413	  -0.01202	  -0.01404	  -0.01653	  -0.01775	  -0.02174	  -0.03012	  -0.03379	  -0.03592	  -0.04104	  -0.05411	  -0.05569	  -0.06491
                     60	  -0.01715	  -0.03126	  -0.04167	  -0.02702	  -0.02511	  -0.03363	  -0.03533	  -0.03647	  -0.04663	  -0.05604	  -0.07737	  -0.05804	  -0.06695
              </tableData>
          </table>
    </function>
    <function name="aero/c/CFXFLAPS">
    <description>DRAG DUE TO FLAPS INBOARD</description>
    <product>
          <property>fcs/flap-pos-deg</property>
          <table>
            <independentVar lookup="row">aero/alpha-deg</independentVar>
            <independentVar lookup="column">fcs/pitch-pos-deg</independentVar>
            <tableData>
                                -25	        -20	        -15	        -10	         -5	          0	          5	         10	         15
                    -20	  -0.00106	  -0.00111	  -0.00107	  -0.00109	  -0.00108	  -0.00109	  -0.00112	  -0.00113	  -0.00111
                    -10	  -0.00004	  -0.00008	  -0.00008	  -0.00011	  -0.00016	  -0.00019	  -0.00019	  -0.00016	  -0.00007
                     -8	   0.00010	   0.00007	   0.00007	   0.00003	  -0.00003	  -0.00003	  -0.00003	   0.00002	   0.00015
                     -4	   0.00040	   0.00036	   0.00031	   0.00029	   0.00025	   0.00022	   0.00025	   0.00040	   0.00045
                      0	   0.00057	   0.00053	   0.00049	   0.00045	   0.00039	   0.00006	   0.00057	   0.00064	   0.00064
                      2	   0.00063	   0.00057	   0.00052	   0.00047	  -0.00024	   0.00062	   0.00074	   0.00077	   0.00077
                      4	   0.00063	   0.00059	   0.00050	  -0.00019	   0.00068	   0.00084	   0.00088	   0.00090	   0.00091
                      6	   0.00064	   0.00048	  -0.00023	   0.00075	   0.00094	   0.00099	   0.00102	   0.00103	   0.00102
                      8	   0.00051	  -0.00016	   0.00076	   0.00103	   0.00111	   0.00113	   0.00115	   0.00115	   0.00114
                     10	  -0.00001	   0.00083	   0.00115	   0.00122	   0.00123	   0.00125	   0.00126	   0.00125	   0.00127
                     12	   0.00081	   0.00121	   0.00128	   0.00132	   0.00134	   0.00137	   0.00138	   0.00137	   0.00141
                     14	   0.00124	   0.00136	   0.00144	   0.00143	   0.00147	   0.00149	   0.00148	   0.00154	   0.00152
                     16	   0.00142	   0.00147	   0.00153	   0.00156	   0.00160	   0.00158	   0.00163	   0.00162	   0.00163
                     18	   0.00151	   0.00159	   0.00164	   0.00166	   0.00167	   0.00170	   0.00169	   0.00168	   0.00173
                     20	   0.00164	   0.00166	   0.00171	   0.00172	   0.00177	   0.00173	   0.00174	   0.00178	   0.00177
                     24	   0.00173	   0.00180	   0.00184	   0.00184	   0.00182	   0.00181	   0.00181	   0.00183	   0.00189
                     28	   0.00183	   0.00188	   0.00187	   0.00190	   0.00182	   0.00183	   0.00184	   0.00188	   0.00189
                     30	   0.00186	   0.00186	   0.00188	   0.00182	   0.00182	   0.00183	   0.00187	   0.00187	   0.00183
                     35	   0.00190	   0.00185	   0.00186	   0.00185	   0.00190	   0.00181	   0.00183	   0.00181	   0.00189
                     45	   0.00190	   0.00190	   0.00187	   0.00190	   0.00186	   0.00189	   0.00195	   0.00196	   0.00189
                     50	   0.00188	   0.00188	   0.00184	   0.00192	   0.00191	   0.00193	   0.00191	   0.00198	   0.00204
                     55	   0.00179	   0.00172	   0.00164	   0.00168	   0.00174	   0.00163	   0.00166	   0.00175	   0.00162
                     60	   0.00154	   0.00163	   0.00156	   0.00158	   0.00149	   0.00168	   0.00145	   0.00131	   0.00150
            </tableData>
          </table>
       </product>
    </function>
    <function name="aero/c/CFXFLAPSOB">
    <description>DRAG DUE TO FLAPS OUTBOARD</description>
    <product>
          <property>fcs/flap-ob-pos-deg</property>
          <table>
            <independentVar lookup="row">aero/alpha-deg</independentVar>
            <independentVar lookup="column">fcs/pitch-pos-deg</independentVar>
            <tableData>
                                -25	        -20	        -15	        -10	         -5	          0	          5	         10	         15
                    -20	   0.00330	   0.00231	   0.00138	   0.00053	  -0.00025	  -0.00097	  -0.00155	  -0.00200	  -0.00230
                    -10	   0.00310	   0.00232	   0.00161	   0.00096	   0.00040	  -0.00003	  -0.00034	  -0.00051	  -0.00058
                     -8	   0.00305	   0.00232	   0.00164	   0.00103	   0.00053	   0.00014	  -0.00011	  -0.00024	  -0.00027
                     -4	   0.00296	   0.00231	   0.00172	   0.00118	   0.00076	   0.00049	   0.00033	   0.00036	   0.00050
                      0	   0.00299	   0.00242	   0.00186	   0.00143	   0.00113	   0.00045	   0.00086	   0.00102	   0.00137
                      2	   0.00287	   0.00230	   0.00182	   0.00143	  -0.00011	   0.00094	   0.00101	   0.00125	   0.00162
                      4	   0.00281	   0.00228	   0.00183	  -0.00046	   0.00112	   0.00110	   0.00122	   0.00149	   0.00195
                      6	   0.00270	   0.00224	  -0.00070	   0.00132	   0.00122	   0.00124	   0.00140	   0.00176	   0.00229
                      8	   0.00258	  -0.00061	   0.00148	   0.00136	   0.00128	   0.00135	   0.00159	   0.00201	   0.00263
                     10	  -0.00009	   0.00162	   0.00149	   0.00133	   0.00131	   0.00145	   0.00177	   0.00228	   0.00288
                     12	   0.00171	   0.00165	   0.00144	   0.00130	   0.00134	   0.00156	   0.00195	   0.00247	   0.00317
                     14	   0.00179	   0.00146	   0.00127	   0.00121	   0.00131	   0.00161	   0.00203	   0.00264	   0.00335
                     16	   0.00140	   0.00112	   0.00100	   0.00102	   0.00121	   0.00152	   0.00205	   0.00270	   0.00347
                     18	   0.00094	   0.00075	   0.00070	   0.00079	   0.00102	   0.00144	   0.00201	   0.00271	   0.00351
                     20	   0.00049	   0.00036	   0.00037	   0.00051	   0.00081	   0.00131	   0.00192	   0.00267	   0.00354
                     24	  -0.00038	  -0.00036	  -0.00023	   0.00005	   0.00049	   0.00107	   0.00180	   0.00266	   0.00365
                     28	  -0.00117	  -0.00106	  -0.00079	  -0.00042	   0.00013	   0.00088	   0.00173	   0.00266	   0.00377
                     30	  -0.00158	  -0.00140	  -0.00112	  -0.00066	  -0.00001	   0.00079	   0.00166	   0.00272	   0.00384
                     35	  -0.00251	  -0.00221	  -0.00171	  -0.00106	  -0.00027	   0.00071	   0.00177	   0.00296	   0.00417
                     45	  -0.00444	  -0.00378	  -0.00295	  -0.00186	  -0.00081	   0.00061	   0.00182	   0.00316	   0.00450
                     50	  -0.00467	  -0.00377	  -0.00288	  -0.00157	  -0.00025	   0.00120	   0.00213	   0.00391	   0.00495
                     55	  -0.00563	  -0.00458	  -0.00340	  -0.00210	  -0.00071	   0.00085	   0.00208	   0.00331	   0.00466
                     60	  -0.00680	  -0.00552	  -0.00406	  -0.00257	  -0.00088	   0.00100	   0.00224	   0.00388	   0.00554
            </tableData>
          </table>
       </product>
    </function>
    <function name="aero/c/CFXGEAR">
    <description>DRAG DUE TO GEAR</description>
    <product>
          <property>gear/gear-pos-norm</property>
          <table>
            <independentVar lookup="row">aero/alpha-deg</independentVar>
            <independentVar lookup="column">aero/beta-deg</independentVar>
            <tableData>
                                -20	        -15	        -10	         -7	         -5	         -2	          0	          2	          5	          7	         10	         15	         20
                    -20	   0.00254	   0.00240	   0.00203	   0.00180	   0.00160	   0.00141	   0.00141	   0.00142	   0.00162	   0.00182	   0.00207	   0.00240	   0.00271
                    -10	   0.00188	   0.00169	   0.00132	   0.00096	   0.00079	   0.00062	   0.00058	   0.00062	   0.00079	   0.00096	   0.00133	   0.00168	   0.00187
                     -8	   0.00165	   0.00153	   0.00114	   0.00082	   0.00064	   0.00048	   0.00046	   0.00048	   0.00064	   0.00082	   0.00114	   0.00153	   0.00166
                     -4	   0.00116	   0.00117	   0.00084	   0.00057	   0.00043	   0.00029	   0.00026	   0.00029	   0.00043	   0.00057	   0.00084	   0.00117	   0.00116
                      0	   0.00064	   0.00079	   0.00062	   0.00044	   0.00033	   0.00021	   0.00021	   0.00021	   0.00033	   0.00044	   0.00062	   0.00080	   0.00063
                      2	   0.00045	   0.00072	   0.00057	   0.00042	   0.00033	   0.00025	   0.00023	   0.00025	   0.00033	   0.00042	   0.00057	   0.00072	   0.00043
                      4	   0.00044	   0.00064	   0.00048	   0.00047	   0.00040	   0.00033	   0.00033	   0.00033	   0.00040	   0.00047	   0.00048	   0.00063	   0.00044
                      6	   0.00060	   0.00068	   0.00054	   0.00056	   0.00053	   0.00049	   0.00049	   0.00049	   0.00054	   0.00057	   0.00055	   0.00068	   0.00061
                      8	   0.00140	   0.00110	   0.00102	   0.00091	   0.00079	   0.00070	   0.00071	   0.00070	   0.00080	   0.00091	   0.00103	   0.00110	   0.00142
                     10	   0.00384	   0.00211	   0.00204	   0.00155	   0.00116	   0.00105	   0.00103	   0.00105	   0.00117	   0.00158	   0.00204	   0.00208	   0.00384
                     12	   0.00544	   0.00418	   0.00234	   0.00186	   0.00153	   0.00149	   0.00136	   0.00149	   0.00154	   0.00186	   0.00234	   0.00417	   0.00547
                     14	   0.00591	   0.00517	   0.00546	   0.00243	   0.00266	   0.00200	   0.00197	   0.00200	   0.00268	   0.00243	   0.00551	   0.00509	   0.00589
                     16	   0.00647	   0.00559	   0.00405	   0.00333	   0.00321	   0.00246	   0.00264	   0.00247	   0.00317	   0.00331	   0.00410	   0.00563	   0.00647
                     18	   0.00716	   0.00645	   0.00311	   0.00420	   0.00375	   0.00321	   0.00322	   0.00319	   0.00376	   0.00421	   0.00303	   0.00635	   0.00714
                     20	   0.00774	   0.00677	   0.00454	   0.00490	   0.00430	   0.00389	   0.00379	   0.00392	   0.00432	   0.00495	   0.00457	   0.00673	   0.00767
                     24	   0.00919	   0.00795	   0.00633	   0.00586	   0.00538	   0.00506	   0.00444	   0.00506	   0.00542	   0.00597	   0.00640	   0.00816	   0.00910
                     28	   0.01125	   0.00913	   0.00739	   0.00685	   0.00604	   0.00642	   0.00656	   0.00637	   0.00618	   0.00659	   0.00747	   0.00884	   0.01120
                     30	   0.01379	   0.01082	   0.01003	   0.00767	   0.00552	   0.00753	   0.00708	   0.00763	   0.00562	   0.00809	   0.01004	   0.01071	   0.01371
                     35	   0.01557	   0.01355	   0.01303	   0.01025	   0.01082	   0.01076	   0.01053	   0.01098	   0.01087	   0.01028	   0.01274	   0.01439	   0.01540
                     45	   0.01748	   0.01598	   0.01547	   0.01041	   0.01744	   0.01657	   0.00833	   0.01729	   0.01793	   0.00991	   0.01560	   0.01597	   0.01799
                     50	   0.01616	   0.01541	   0.01394	   0.01159	   0.01232	   0.01228	   0.01251	   0.01295	   0.01258	   0.01177	   0.01344	   0.01479	   0.01581
                     55	   0.01763	   0.01310	   0.01477	   0.01174	   0.01135	   0.01063	   0.01098	   0.01060	   0.01119	   0.01127	   0.01384	   0.01454	   0.01768
                     60	   0.01594	   0.01759	   0.01176	   0.01018	   0.01034	   0.00969	   0.01365	   0.00962	   0.01041	   0.01087	   0.01263	   0.01425	   0.01295
            </tableData>
          </table>
       </product>
    </function>
    <function name="aero/c/CFXMN">
    <description>DRAG DUE TO MACH</description>
          <table>
            <independentVar lookup="row">velocities/mach</independentVar>
            <independentVar lookup="column">aero/alpha-deg</independentVar>
            <tableData>
                                -10	         -5	         -2	       0.01	          1	          2	          6	          7	         10
                    0.2	  -0.00417	  -0.00065	  -0.00018	   0.00005	  -0.00062	  -0.00112	  -0.00351	  -0.00423	  -0.00669
                    0.8	   0.00565	   0.00075	   0.00024	  -0.00010	   0.00092	   0.00155	   0.00446	   0.00543	   0.00750
                   0.91	   0.01171	   0.00145	   0.00046	  -0.00012	   0.00196	   0.00320	   0.00852	   0.00968	   0.01223
                   0.99	   0.03102	   0.00358	   0.00065	   0.00089	   0.00360	   0.00507	   0.00630	   0.00431	  -0.00800
                      2	   0.07240	   0.02028	   0.00464	   0.00574	   0.00506	   0.00859	   0.04568	   0.06088	   0.12107
                    2.4	   0.06056	   0.01651	   0.00358	   0.00466	   0.00325	   0.00550	   0.03085	   0.04121	   0.08158
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            </tableData>
          </table>
    </function>
    <function name="aero/c/CFXTANKC">
    <description>DRAG INCREMENT DUE TO CENTRE TANK</description>
    <product>
          <property>inertia/tank-centre-fitted</property>
          <table>
            <independentVar lookup="row">aero/alpha-deg</independentVar>
            <independentVar lookup="column">aero/beta-deg</independentVar>
            <tableData>
                                -20	        -15	        -10	         -7	         -5	         -2	          0	          2	          5	          7	         10	         15	         20
                    -20	   0.00246	   0.00246	   0.00251	   0.00252	   0.00253	   0.00252	   0.00254	   0.00254	   0.00256	   0.00254	   0.00254	   0.00247	   0.00245
                      0	   0.00254	   0.00254	   0.00255	   0.00256	   0.00256	   0.00256	   0.00256	   0.00256	   0.00256	   0.00256	   0.00255	   0.00255	   0.00254
                      8	   0.00223	   0.00255	   0.00255	   0.00255	   0.00256	   0.00256	   0.00255	   0.00256	   0.00257	   0.00257	   0.00255	   0.00256	   0.00218
                     16	   0.00256	   0.00250	   0.00255	   0.00255	   0.00256	   0.00255	   0.00254	   0.00256	   0.00252	   0.00252	   0.00252	   0.00256	   0.00255
                     28	   0.00250	   0.00239	   0.00243	   0.00270	   0.00246	   0.00252	   0.00254	   0.00261	   0.00252	   0.00258	   0.00256	   0.00198	   0.00246
                     50	   0.00172	   0.00155	   0.00156	   0.00150	   0.00163	   0.00200	   0.00176	   0.00262	   0.00152	   0.00163	   0.00160	   0.00183	   0.00220
                     60	   0.00222	   0.00559	   0.00061	   0.00070	   0.00197	   0.00306	   0.00338	   0.00104	   0.00197	   0.00104	  -0.00035	   0.00314	   0.00150
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            </tableData>
          </table>
       </product>
    </function>
    <function name="aero/c/CFXTANKL">
    <description>DRAG INCREMENT DUE TO LEFT WING TANK</description>
    <product>
          <property>inertia/tank-wing-left-fitted</property>
          <table>
            <independentVar lookup="row">aero/alpha-deg</independentVar>
            <independentVar lookup="column">aero/beta-deg</independentVar>
            <tableData>
                                -20	        -15	        -10	         -7	         -5	         -2	          0	          2	          5	          7	         10	         15	         20
                    -20	   0.00001	  -0.00001	  -0.00002	  -0.00002	  -0.00001	  -0.00003	  -0.00001	  -0.00001	   0.00001	  -0.00001	   0.00002	  -0.00002	  -0.00001
                      0	   0.00000	  -0.00001	   0.00000	   0.00000	   0.00000	   0.00000	   0.00000	   0.00000	   0.00000	   0.00000	   0.00000	   0.00001	   0.00000
                      8	   0.00001	   0.00000	   0.00000	   0.00000	   0.00000	   0.00000	  -0.00001	   0.00000	   0.00000	   0.00000	   0.00000	   0.00000	   0.00001
                     16	   0.00002	   0.00002	  -0.00003	   0.00001	   0.00000	   0.00000	   0.00001	   0.00001	  -0.00001	  -0.00001	   0.00000	   0.00002	   0.00000
                     28	   0.00003	  -0.00034	  -0.00011	   0.00013	  -0.00011	  -0.00012	   0.00005	  -0.00001	   0.00001	   0.00000	   0.00000	  -0.00008	  -0.00004
                     50	  -0.00036	  -0.00016	   0.00009	  -0.00030	  -0.00030	  -0.00048	   0.00007	   0.00059	   0.00032	  -0.00031	  -0.00008	  -0.00009	  -0.00019
                     60	   0.00257	   0.00047	  -0.00134	  -0.00121	   0.00005	  -0.00040	   0.00079	  -0.00053	  -0.00075	   0.00027	  -0.00262	  -0.00317	   0.00098
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            </tableData>
          </table>
       </product>
    </function>
    <function name="aero/c/CFXTANKR">
    <description>DRAG INCREMENT DUE TO RIGHT WING TANK</description>
    <product>
          <property>inertia/tank-wing-right-fitted</property>
          <table>
            <independentVar lookup="row">aero/alpha-deg</independentVar>
            <independentVar lookup="column">aero/beta-deg</independentVar>
            <tableData>
                                -20	        -15	        -10	         -7	         -5	         -2	          0	          2	          5	          7	         10	         15	         20
                    -20	   0.00001	  -0.00001	  -0.00002	  -0.00002	  -0.00001	  -0.00003	  -0.00001	  -0.00001	   0.00001	  -0.00001	   0.00002	  -0.00002	  -0.00001
                      0	   0.00000	  -0.00001	   0.00000	   0.00000	   0.00000	   0.00000	   0.00000	   0.00000	   0.00000	   0.00000	   0.00000	   0.00001	   0.00000
                      8	   0.00001	   0.00000	   0.00000	   0.00000	   0.00000	   0.00000	  -0.00001	   0.00000	   0.00000	   0.00000	   0.00000	   0.00000	   0.00001
                     16	   0.00002	   0.00002	  -0.00003	   0.00001	   0.00000	   0.00000	   0.00001	   0.00001	  -0.00001	  -0.00001	   0.00000	   0.00002	   0.00000
                     28	   0.00003	  -0.00034	  -0.00011	   0.00013	  -0.00011	  -0.00012	   0.00005	  -0.00001	   0.00001	   0.00000	   0.00000	  -0.00008	  -0.00004
                     50	  -0.00036	  -0.00016	   0.00009	  -0.00030	  -0.00030	  -0.00048	   0.00007	   0.00059	   0.00032	  -0.00031	  -0.00008	  -0.00009	  -0.00019
                     60	   0.00257	   0.00047	  -0.00134	  -0.00121	   0.00005	  -0.00040	   0.00079	  -0.00053	  -0.00075	   0.00027	  -0.00262	  -0.00317	   0.00098
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            </tableData>
          </table>
       </product>
    </function>
    <function name="aero/c/CFZB">
    <description>BASE LIFT</description>
          <table>
            <independentVar lookup="row">aero/alpha-deg</independentVar>
            <independentVar lookup="column">fcs/pitch-pos-deg</independentVar>
            <tableData>
                                -25	        -20	        -15	        -10	         -5	          0	          5	         10	         15
                    -20	  -1.24314	  -1.24334	  -1.22924	  -1.19841	  -1.13605	  -1.06443	  -0.98586	  -0.90661	  -0.82728
                      0	  -0.18429	  -0.14611	  -0.09244	  -0.02475	   0.05321	   0.13661	   0.21240	   0.29394	   0.36922
                      8	   0.36597	   0.40747	   0.47862	   0.53904	   0.61815	   0.70184	   0.78205	   0.85853	   0.92645
                     16	   0.88716	   0.93436	   0.99890	   1.08948	   1.17044	   1.25332	   1.33157	   1.40138	   1.45881
                     28	   1.40969	   1.48308	   1.55768	   1.63585	   1.71199	   1.78486	   1.84711	   1.88930	   1.91967
                     50	   1.62298	   1.68867	   1.75058	   1.79709	   1.83978	   1.88357	   1.88279	   1.85912	   1.82579
                     60	   1.51806	   1.56670	   1.59990	   1.61121	   1.63381	   1.65278	   1.62289	   1.57578	   1.52950
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            </tableData>
          </table>
    </function>
    <function name="aero/c/CFZBRK">
    <description>LIFT DUE TO SPEEDBRAKE</description>
    <product>
          <property>fcs/speedbrake-pos-norm</property>
          <table>
            <independentVar lookup="row">aero/alpha-deg</independentVar>
            <independentVar lookup="column">aero/beta-deg</independentVar>
            <tableData>
                                -20	        -15	        -10	         -7	         -5	         -2	          0	          2	          5	          7	         10	         15	         20
                    -20	   0.00281	   0.00756	   0.00772	   0.00498	   0.00260	   0.00268	   0.00144	   0.00266	   0.00252	   0.00485	   0.00771	   0.00809	   0.00272
                      0	   0.00484	   0.00415	   0.00211	   0.00147	   0.00119	   0.00242	   0.00194	   0.00243	   0.00121	   0.00147	   0.00196	   0.00430	   0.00489
                      8	   0.00688	   0.00199	   0.00284	   0.00322	   0.00397	   0.00447	   0.00390	   0.00446	   0.00401	   0.00292	   0.00290	   0.00184	   0.00684
                     16	   0.00905	   0.00641	   0.00403	   0.00541	   0.00742	   0.00581	   0.00622	   0.00583	   0.00705	   0.00500	   0.00446	   0.00635	   0.00924
                     28	   0.00702	   0.00669	   0.00690	   0.00470	   0.00476	   0.00503	   0.00553	   0.00539	   0.00526	   0.00436	   0.00727	   0.00649	   0.00743
                     50	   0.00041	   0.00120	  -0.00044	  -0.00094	   0.00258	   0.00054	   0.00106	   0.00050	   0.00246	   0.00024	  -0.00038	   0.00144	   0.00100
                     60	  -0.00222	  -0.00603	   0.00024	  -0.00078	   0.00102	  -0.00099	  -0.00018	  -0.00039	   0.00038	  -0.00078	   0.00091	  -0.00521	  -0.00229
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            </tableData>
          </table>
       </product>
    </function>
    <function name="aero/c/CFZDGE">
    <description>LIFT DUE TO GROUND EFFECT</description>
          <table>
            <independentVar lookup="row">position/h-agl-m</independentVar>
            <independentVar lookup="column">aero/alpha-deg</independentVar>
            <tableData>
                                  0	          2	          4	          6	          8	         10	         12	         14	         16	         20
                      1	   0.11388	   0.22673	   0.34251	   0.46149	   0.57113	   0.61009	   0.65274	   0.51263	   0.47879	   0.44571
                      2	   0.04395	   0.08828	   0.13347	   0.17578	   0.21557	   0.24948	   0.27386	   0.29773	   0.33551	   0.40844
                      3	   0.02345	   0.04545	   0.06884	   0.09258	   0.11437	   0.13427	   0.14950	   0.16070	   0.16565	   0.16752
                      8	   0.00346	   0.00656	   0.00963	   0.01243	   0.01403	   0.01485	   0.01392	   0.01114	   0.00551	  -0.00350
                     10	   0.00212	   0.00419	   0.00588	   0.00753	   0.00802	   0.00795	   0.00606	   0.00224	  -0.00282	  -0.01217
                     30	   0.00000	   0.00000	   0.00000	   0.00000	   0.00000	   0.00000	   0.00000	   0.00000	   0.00000	   0.00000
            </tableData>
          </table>
    </function>
    <function name="aero/c/CFZDRD">
    <description>LIFT DUE TO RUDDER DEFLECTION</description>
    <product>
          <property>fcs/rudder-deg</property>
          <table>
            <independentVar lookup="row">aero/alpha-deg</independentVar>
            <independentVar lookup="column">aero/beta-deg</independentVar>
            <tableData>
                                -20	        -15	        -10	         -7	         -5	         -2	          0	          2	          5	          7	         10	         15	         20
                    -20	   0.00042	   0.00018	  -0.00001	  -0.00011	  -0.00019	  -0.00029	  -0.00035	  -0.00041	  -0.00053	  -0.00061	  -0.00071	  -0.00084	  -0.00099
                      0	   0.00067	   0.00045	   0.00024	   0.00012	   0.00003	  -0.00023	  -0.00004	  -0.00039	  -0.00039	  -0.00042	  -0.00052	  -0.00075	  -0.00094
                      8	   0.00070	   0.00052	   0.00043	   0.00017	   0.00010	  -0.00006	  -0.00037	   0.00035	  -0.00048	  -0.00041	  -0.00052	  -0.00057	  -0.00105
                     16	   0.00064	   0.00041	   0.00030	   0.00015	   0.00002	   0.00018	   0.00003	  -0.00018	  -0.00010	  -0.00026	  -0.00031	  -0.00042	  -0.00066
                     28	   0.00051	   0.00044	   0.00026	   0.00011	   0.00010	   0.00005	  -0.00021	  -0.00005	  -0.00018	  -0.00010	  -0.00027	  -0.00025	  -0.00045
                     50	   0.00019	   0.00018	   0.00012	   0.00007	   0.00006	  -0.00003	   0.00003	   0.00006	  -0.00006	  -0.00003	   0.00000	  -0.00005	  -0.00008
                     60	   0.00006	   0.00013	  -0.00002	  -0.00003	  -0.00005	   0.00014	   0.00001	   0.00003	   0.00004	   0.00002	  -0.00002	  -0.00008	  -0.00003
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            </tableData>
          </table>
       </product>
    </function>
    <function name="aero/c/CFZDRDMN">
    <description>LIFT DUE TO MACH DUE TO RUDDER DEFLECTION</description>
    <product>
          <property>fcs/rudder-deg</property>
          <table>
            <independentVar lookup="row">velocities/mach</independentVar>
            <independentVar lookup="column">aero/alpha-deg</independentVar>
            <tableData>
                                -10	         -5	         -2	       0.01	          1	          2	          6	          7	         10
                    0.2	  -0.00149	  -0.00048	   0.00015	   0.00055	   0.00078	   0.00101	   0.00191	   0.00227	   0.00277
                    0.8	   0.00172	   0.00044	  -0.00030	  -0.00083	  -0.00106	  -0.00128	  -0.00247	  -0.00263	  -0.00293
                   0.91	   0.00303	   0.00070	  -0.00075	  -0.00175	  -0.00218	  -0.00267	  -0.00472	  -0.00144	  -0.00144
                   0.99	   0.00462	   0.00078	  -0.00177	  -0.00341	  -0.00420	  -0.00170	  -0.00170	  -0.00170	  -0.00170
                      2	   0.00170	   0.00170	   0.00493	   0.00330	   0.00256	   0.00179	  -0.00056	  -0.00077	  -0.00225
                    2.4	   0.00173	   0.00452	   0.00423	   0.00420	   0.00424	   0.00427	   0.00184	   0.00184	   0.00184
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            </tableData>
          </table>
       </product>
    </function>
    <function name="aero/c/CFZDSL">
    <description>LIFT DUE TO SLATS</description>
          <table>
            <independentVar lookup="row">aero/alpha-deg</independentVar>
            <independentVar lookup="column">fcs/slats-deg</independentVar>
            <tableData>
                                  0	         10	         23
                    -20	   0.00000	   0.00701	   0.00700
                      0	   0.00000	   0.00358	   0.00358
                      8	   0.00000	   0.00919	   0.00922
                     16	   0.00000	   0.01138	   0.01138
                     28	   0.00000	   0.05716	   0.05715
                     50	   0.00000	   0.06992	   0.07000
                     60	   0.00000	   0.04534	   0.04557
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            </tableData>
          </table>
    </function>
    <function name="aero/c/CFZDSPL">
    <description>LIFT DUE TO SPOILERS LEFT</description>
          <table>
            <independentVar lookup="row">aero/alpha-deg</independentVar>
            <independentVar lookup="column">aero/beta-deg</independentVar>
            <independentVar lookup="table">fcs/spoiler-left-deg</independentVar>
              <tableData breakPoint="0">
                              -20	       -15	       -10	        -7	        -5	        -2	         0	         2	         5	         7	        10	        15	        20
                    -20	   0.00000	   0.00000	   0.00000	   0.00000	   0.00000	   0.00000	   0.00000	   0.00000	   0.00000	   0.00000	   0.00000	   0.00000	   0.00000
                      0	   0.00000	   0.00000	   0.00000	   0.00000	   0.00000	   0.00000	   0.00000	   0.00000	   0.00000	   0.00000	   0.00000	   0.00000	   0.00000
                      8	   0.00000	   0.00000	   0.00000	   0.00000	   0.00000	   0.00000	   0.00000	   0.00000	   0.00000	   0.00000	   0.00000	   0.00000	   0.00000
                     16	   0.00000	   0.00000	   0.00000	   0.00000	   0.00000	   0.00000	   0.00000	   0.00000	   0.00000	   0.00000	   0.00000	   0.00000	   0.00000
                     28	   0.00000	   0.00000	   0.00000	   0.00000	   0.00000	   0.00000	   0.00000	   0.00000	   0.00000	   0.00000	   0.00000	   0.00000	   0.00000
                     50	   0.00000	   0.00000	   0.00000	   0.00000	   0.00000	   0.00000	   0.00000	   0.00000	   0.00000	   0.00000	   0.00000	   0.00000	   0.00000
                     60	   0.00000	   0.00000	   0.00000	   0.00000	   0.00000	   0.00000	   0.00000	   0.00000	   0.00000	   0.00000	   0.00000	   0.00000	   0.00000
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              </tableData>
              <tableData breakPoint="20">
                              -20	       -15	       -10	        -7	        -5	        -2	         0	         2	         5	         7	        10	        15	        20
                    -20	  -0.03814	  -0.05207	  -0.07260	  -0.07633	  -0.07637	  -0.07552	  -0.07697	  -0.07845	  -0.07504	  -0.07526	  -0.07042	  -0.06540	  -0.05777
                      0	  -0.07647	  -0.08342	  -0.08818	  -0.08968	  -0.08992	  -0.09475	  -0.09496	  -0.09370	  -0.09368	  -0.09092	  -0.08980	  -0.08374	  -0.07794
                      8	  -0.07318	  -0.08415	  -0.08936	  -0.08821	  -0.09067	  -0.09338	  -0.09318	  -0.09323	  -0.09159	  -0.09160	  -0.09242	  -0.08838	  -0.08232
                     16	  -0.06972	  -0.07480	  -0.08122	  -0.08428	  -0.08764	  -0.08992	  -0.08914	  -0.08937	  -0.08904	  -0.08693	  -0.08866	  -0.08179	  -0.07682
                     28	   0.00221	  -0.00333	  -0.01238	  -0.01619	  -0.01804	  -0.02791	  -0.02956	  -0.03802	  -0.04561	  -0.05378	  -0.06202	  -0.06934	  -0.06257
                     50	  -0.00494	  -0.00209	  -0.00111	  -0.00112	  -0.00382	  -0.00659	  -0.00576	  -0.00818	  -0.01472	  -0.01489	  -0.02274	  -0.03680	  -0.03212
                     60	  -0.00182	  -0.00764	  -0.00296	  -0.00402	  -0.00453	  -0.01106	  -0.00996	  -0.01602	  -0.01484	  -0.01807	  -0.02045	  -0.02118	  -0.01572
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              </tableData>
              <tableData breakPoint="50">
                              -20	       -15	       -10	        -7	        -5	        -2	         0	         2	         5	         7	        10	        15	        20
                    -20	  -0.04915	  -0.06751	  -0.09488	  -0.10994	  -0.11673	  -0.11870	  -0.11930	  -0.12126	  -0.12004	  -0.11798	  -0.11100	  -0.10327	  -0.09360
                      0	  -0.12331	  -0.13234	  -0.14315	  -0.14766	  -0.15119	  -0.15663	  -0.15634	  -0.15484	  -0.15492	  -0.15087	  -0.14961	  -0.14097	  -0.13109
                      8	  -0.12330	  -0.13863	  -0.14885	  -0.15108	  -0.15510	  -0.15794	  -0.15666	  -0.15922	  -0.15772	  -0.15519	  -0.15648	  -0.15093	  -0.13447
                     16	  -0.12379	  -0.13037	  -0.14218	  -0.14873	  -0.15292	  -0.15394	  -0.15568	  -0.15723	  -0.15431	  -0.15332	  -0.15390	  -0.14278	  -0.13314
                     28	  -0.03250	  -0.03826	  -0.05174	  -0.05931	  -0.06205	  -0.07754	  -0.08379	  -0.09372	  -0.10248	  -0.11409	  -0.12054	  -0.12519	  -0.11395
                     50	  -0.00738	  -0.00408	  -0.00154	  -0.00495	  -0.00637	  -0.01386	  -0.01997	  -0.02333	  -0.03372	  -0.03638	  -0.05545	  -0.07610	  -0.06347
                     60	  -0.00552	  -0.01745	  -0.00734	  -0.00819	  -0.01399	  -0.01974	  -0.02689	  -0.02907	  -0.03442	  -0.04296	  -0.04438	  -0.04301	  -0.03489
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              </tableData>
          </table>
    </function>
    <function name="aero/c/CFZDSPR">
    <description>LIFT DUE TO SPOILERS RIGHT</description>
          <table>
            <independentVar lookup="row">aero/alpha-deg</independentVar>
            <independentVar lookup="column">aero/beta-deg</independentVar>
            <independentVar lookup="table">fcs/spoiler-right-deg</independentVar>
              <tableData breakPoint="0">
                              -20	       -15	       -10	        -7	        -5	        -2	         0	         2	         5	         7	        10	        15	        20
                    -20	   0.00000	   0.00000	   0.00000	   0.00000	   0.00000	   0.00000	   0.00000	   0.00000	   0.00000	   0.00000	   0.00000	   0.00000	   0.00000
                      0	   0.00000	   0.00000	   0.00000	   0.00000	   0.00000	   0.00000	   0.00000	   0.00000	   0.00000	   0.00000	   0.00000	   0.00000	   0.00000
                      8	   0.00000	   0.00000	   0.00000	   0.00000	   0.00000	   0.00000	   0.00000	   0.00000	   0.00000	   0.00000	   0.00000	   0.00000	   0.00000
                     16	   0.00000	   0.00000	   0.00000	   0.00000	   0.00000	   0.00000	   0.00000	   0.00000	   0.00000	   0.00000	   0.00000	   0.00000	   0.00000
                     28	   0.00000	   0.00000	   0.00000	   0.00000	   0.00000	   0.00000	   0.00000	   0.00000	   0.00000	   0.00000	   0.00000	   0.00000	   0.00000
                     50	   0.00000	   0.00000	   0.00000	   0.00000	   0.00000	   0.00000	   0.00000	   0.00000	   0.00000	   0.00000	   0.00000	   0.00000	   0.00000
                     60	   0.00000	   0.00000	   0.00000	   0.00000	   0.00000	   0.00000	   0.00000	   0.00000	   0.00000	   0.00000	   0.00000	   0.00000	   0.00000
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              </tableData>
              <tableData breakPoint="20">
                              -20	       -15	       -10	        -7	        -5	        -2	         0	         2	         5	         7	        10	        15	        20
                    -20	  -0.03814	  -0.05207	  -0.07260	  -0.07633	  -0.07637	  -0.07552	  -0.07697	  -0.07845	  -0.07504	  -0.07526	  -0.07042	  -0.06540	  -0.05777
                      0	  -0.07647	  -0.08342	  -0.08818	  -0.08968	  -0.08992	  -0.09475	  -0.09496	  -0.09370	  -0.09368	  -0.09092	  -0.08980	  -0.08374	  -0.07794
                      8	  -0.07318	  -0.08415	  -0.08936	  -0.08821	  -0.09067	  -0.09338	  -0.09318	  -0.09323	  -0.09159	  -0.09160	  -0.09242	  -0.08838	  -0.08232
                     16	  -0.06972	  -0.07480	  -0.08122	  -0.08428	  -0.08764	  -0.08992	  -0.08914	  -0.08937	  -0.08904	  -0.08693	  -0.08866	  -0.08179	  -0.07682
                     28	   0.00221	  -0.00333	  -0.01238	  -0.01619	  -0.01804	  -0.02791	  -0.02956	  -0.03802	  -0.04561	  -0.05378	  -0.06202	  -0.06934	  -0.06257
                     50	  -0.00494	  -0.00209	  -0.00111	  -0.00112	  -0.00382	  -0.00659	  -0.00576	  -0.00818	  -0.01472	  -0.01489	  -0.02274	  -0.03680	  -0.03212
                     60	  -0.00182	  -0.00764	  -0.00296	  -0.00402	  -0.00453	  -0.01106	  -0.00996	  -0.01602	  -0.01484	  -0.01807	  -0.02045	  -0.02118	  -0.01572
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              </tableData>
              <tableData breakPoint="50">
                              -20	       -15	       -10	        -7	        -5	        -2	         0	         2	         5	         7	        10	        15	        20
                    -20	  -0.04915	  -0.06751	  -0.09488	  -0.10994	  -0.11673	  -0.11870	  -0.11930	  -0.12126	  -0.12004	  -0.11798	  -0.11100	  -0.10327	  -0.09360
                      0	  -0.12331	  -0.13234	  -0.14315	  -0.14766	  -0.15119	  -0.15663	  -0.15634	  -0.15484	  -0.15492	  -0.15087	  -0.14961	  -0.14097	  -0.13109
                      8	  -0.12330	  -0.13863	  -0.14885	  -0.15108	  -0.15510	  -0.15794	  -0.15666	  -0.15922	  -0.15772	  -0.15519	  -0.15648	  -0.15093	  -0.13447
                     16	  -0.12379	  -0.13037	  -0.14218	  -0.14873	  -0.15292	  -0.15394	  -0.15568	  -0.15723	  -0.15431	  -0.15332	  -0.15390	  -0.14278	  -0.13314
                     28	  -0.03250	  -0.03826	  -0.05174	  -0.05931	  -0.06205	  -0.07754	  -0.08379	  -0.09372	  -0.10248	  -0.11409	  -0.12054	  -0.12519	  -0.11395
                     50	  -0.00738	  -0.00408	  -0.00154	  -0.00495	  -0.00637	  -0.01386	  -0.01997	  -0.02333	  -0.03372	  -0.03638	  -0.05545	  -0.07610	  -0.06347
                     60	  -0.00552	  -0.01745	  -0.00734	  -0.00819	  -0.01399	  -0.01974	  -0.02689	  -0.02907	  -0.03442	  -0.04296	  -0.04438	  -0.04301	  -0.03489
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              </tableData>
          </table>
    </function>
    <function name="aero/c/CFZFLAPS">
    <description>LIFT DUE TO FLAPS INBOARD</description>
    <product>
          <property>fcs/flap-pos-deg</property>
          <table>
            <independentVar lookup="row">aero/alpha-deg</independentVar>
            <independentVar lookup="column">fcs/pitch-pos-deg</independentVar>
            <tableData>
                                -25	        -20	        -15	        -10	         -5	          0	          5	         10	         15
                    -20	   0.00694	   0.00681	   0.00643	   0.00616	   0.00600	   0.00589	   0.00578	   0.00565	   0.00557
                      0	   0.00606	   0.00567	   0.00527	   0.00503	   0.00508	   0.00488	   0.00509	   0.00504	   0.00517
                      8	   0.00460	   0.00478	   0.00398	   0.00459	   0.00554	   0.00485	   0.00499	   0.00516	   0.00524
                     16	   0.00469	   0.00519	   0.00581	   0.00421	   0.00439	   0.00456	   0.00490	   0.00493	   0.00514
                     28	   0.00225	   0.00238	   0.00223	   0.00237	   0.00225	   0.00232	   0.00244	   0.00263	   0.00274
                     50	   0.00065	   0.00075	   0.00068	   0.00075	   0.00089	   0.00076	   0.00086	   0.00100	   0.00102
                     60	   0.00045	   0.00035	   0.00035	   0.00040	   0.00032	   0.00045	   0.00045	   0.00049	   0.00046
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            </tableData>
          </table>
       </product>
    </function>
    <function name="aero/c/CFZFLAPSOB">
    <description>LIFT DUE TO FLAPS OUTBOARD</description>
    <product>
          <property>fcs/flap-ob-pos-deg</property>
          <table>
            <independentVar lookup="row">aero/alpha-deg</independentVar>
            <independentVar lookup="column">fcs/pitch-pos-deg</independentVar>
            <tableData>
                                -25	        -20	        -15	        -10	         -5	          0	          5	         10	         15
                    -20	   0.00268	   0.00266	   0.00296	   0.00380	   0.00540	   0.00752	   0.00958	   0.01178	   0.01406
                      0	  -0.00145	  -0.00041	   0.00115	   0.00287	   0.00533	   0.00750	   0.00957	   0.01179	   0.01393
                      8	  -0.00221	  -0.00069	   0.00061	   0.00214	   0.00484	   0.00692	   0.00907	   0.01128	   0.01337
                     16	  -0.00559	  -0.00418	  -0.00196	   0.00034	   0.00272	   0.00477	   0.00702	   0.00903	   0.01068
                     28	  -0.01007	  -0.00797	  -0.00573	  -0.00370	  -0.00158	   0.00062	   0.00239	   0.00369	   0.00469
                     50	  -0.00724	  -0.00515	  -0.00374	  -0.00220	  -0.00095	   0.00020	   0.00017	  -0.00031	  -0.00121
                     60	  -0.00362	  -0.00230	  -0.00125	  -0.00085	  -0.00020	   0.00030	  -0.00057	  -0.00187	  -0.00321
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            </tableData>
          </table>
       </product>
    </function>
    <function name="aero/c/CFZGEAR">
    <description>LIFT DUE TO GEAR</description>
    <product>
          <property>gear/gear-pos-norm</property>
          <table>
            <independentVar lookup="row">aero/alpha-deg</independentVar>
            <independentVar lookup="column">aero/beta-deg</independentVar>
            <tableData>
                                -20	        -15	        -10	         -7	         -5	         -2	          0	          2	          5	          7	         10	         15	         20
                    -20	  -0.01808	  -0.02232	  -0.02480	  -0.02638	  -0.02672	  -0.02697	  -0.02709	  -0.02705	  -0.02681	  -0.02648	  -0.02492	  -0.02246	  -0.01904
                      0	   0.00049	   0.00051	   0.00004	  -0.00007	  -0.00020	  -0.00017	  -0.00013	  -0.00019	  -0.00020	  -0.00002	   0.00004	   0.00051	   0.00054
                      8	   0.00993	   0.01121	   0.01150	   0.01152	   0.01170	   0.01171	   0.01175	   0.01172	   0.01174	   0.01143	   0.01150	   0.01126	   0.01015
                     16	   0.01913	   0.02084	   0.02143	   0.02155	   0.02184	   0.02201	   0.02196	   0.02203	   0.02158	   0.02133	   0.02162	   0.02088	   0.01918
                     28	   0.02944	   0.03029	   0.03163	   0.03196	   0.03093	   0.03066	   0.03087	   0.03081	   0.03130	   0.03130	   0.03198	   0.02979	   0.02961
                     50	   0.02467	   0.02673	   0.02508	   0.02345	   0.02365	   0.02323	   0.02367	   0.02296	   0.02274	   0.02374	   0.02527	   0.02376	   0.02467
                     60	   0.01726	   0.01882	   0.01743	   0.01750	   0.01852	   0.01423	   0.01745	   0.01570	   0.01835	   0.01768	   0.01805	   0.02068	   0.01741
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            </tableData>
          </table>
       </product>
    </function>
    <function name="aero/c/CFZMN">
    <description>LIFT DUE TO MACH</description>
          <table>
            <independentVar lookup="row">velocities/mach</independentVar>
            <independentVar lookup="column">aero/alpha-deg</independentVar>
            <tableData>
                                -10	         -5	         -2	       0.01	          1	          2	          6	          7	         10
                    0.2	   0.03057	   0.01008	  -0.00269	  -0.01259	  -0.01435	  -0.01989	  -0.03774	  -0.04193	  -0.05480
                    0.8	  -0.03530	  -0.00945	   0.00566	   0.01677	   0.01947	   0.02565	   0.04626	   0.05234	   0.06371
                   0.91	  -0.06198	  -0.01493	   0.01388	   0.03291	   0.04076	   0.05294	   0.09282	   0.10064	   0.12422
                   0.99	  -0.09558	  -0.01801	   0.03320	   0.06389	   0.08089	   0.10131	   0.16353	   0.17644	   0.21885
                      2	  -0.24432	  -0.14863	  -0.09487	  -0.06482	  -0.04917	  -0.03056	   0.01646	   0.02685	   0.05014
                    2.4	  -0.10082	  -0.08617	  -0.08067	  -0.08271	  -0.08283	  -0.08016	  -0.09566	  -0.10047	  -0.12100
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            </tableData>
          </table>
    </function>
    <function name="aero/c/CFZTANKC">
    <description>LIFT INCREMENT DUE TO CENTRE TANK</description>
    <product>
          <property>inertia/tank-centre-fitted</property>
          <table>
            <independentVar lookup="row">aero/alpha-deg</independentVar>
            <independentVar lookup="column">fcs/pitch-pos-deg</independentVar>
            <tableData>
                                -25	        -20	        -15	        -10	         -5	          0	          5	         10	         15
                    -20	   0.00018	   0.00018	   0.00018	   0.00018	   0.00018	   0.00018	   0.00018	   0.00018	   0.00018
                      0	   0.00007	   0.00007	   0.00007	   0.00007	   0.00007	   0.00007	   0.00007	   0.00007	   0.00007
                      8	  -0.00003	  -0.00003	  -0.00003	  -0.00003	  -0.00003	  -0.00003	  -0.00003	  -0.00003	  -0.00003
                     16	   0.00003	   0.00003	   0.00003	   0.00003	   0.00003	   0.00003	   0.00003	   0.00003	   0.00003
                     28	  -0.00001	  -0.00001	  -0.00001	  -0.00001	  -0.00001	  -0.00001	  -0.00001	  -0.00001	  -0.00001
                     50	  -0.00085	  -0.00085	  -0.00085	  -0.00085	  -0.00085	  -0.00085	  -0.00085	  -0.00085	  -0.00085
                     60	   0.00106	   0.00106	   0.00106	   0.00106	   0.00106	   0.00106	   0.00106	   0.00106	   0.00106
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            </tableData>
          </table>
       </product>
    </function>
    <function name="aero/c/CFZTANKL">
    <description>LIFT INCREMENT DUE TO LEFT WING TANK</description>
    <product>
          <property>inertia/tank-wing-left-fitted</property>
          <table>
            <independentVar lookup="row">aero/alpha-deg</independentVar>
            <independentVar lookup="column">fcs/pitch-pos-deg</independentVar>
            <tableData>
                                -25	        -20	        -15	        -10	         -5	          0	          5	         10	         15
                    -20	  -0.17880	  -0.17891	  -0.16479	  -0.13400	  -0.07161	   0.00005	   0.07872	   0.15771	   0.23720
                      0	  -0.32091	  -0.28272	  -0.22906	  -0.16136	  -0.08340	   0.00000	   0.07579	   0.15733	   0.23261
                      8	  -0.33570	  -0.29544	  -0.22410	  -0.16273	  -0.08364	  -0.00005	   0.08021	   0.15667	   0.22460
                     16	  -0.36697	  -0.31815	  -0.25380	  -0.16382	  -0.08289	   0.00001	   0.07829	   0.14817	   0.20557
                     28	  -0.37517	  -0.30166	  -0.22709	  -0.14892	  -0.07285	   0.00005	   0.06242	   0.10444	   0.13487
                     50	  -0.26069	  -0.19488	  -0.13283	  -0.08590	  -0.04361	  -0.00016	  -0.00093	  -0.02522	  -0.05778
                     60	  -0.13544	  -0.08560	  -0.05251	  -0.04150	  -0.01981	   0.00040	  -0.03143	  -0.07641	  -0.12376
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            </tableData>
          </table>
       </product>
    </function>
    <function name="aero/c/CFZTANKR">
    <description>LIFT INCREMENT DUE TO RIGHT WING TANK</description>
    <product>
          <property>inertia/tank-wing-right-fitted</property>
          <table>
            <independentVar lookup="row">aero/alpha-deg</independentVar>
            <independentVar lookup="column">fcs/pitch-pos-deg</independentVar>
            <tableData>
                                -25	        -20	        -15	        -10	         -5	          0	          5	         10	         15
                    -20	  -0.17880	  -0.17891	  -0.16479	  -0.13400	  -0.07161	   0.00005	   0.07872	   0.15771	   0.23720
                      0	  -0.32091	  -0.28272	  -0.22906	  -0.16136	  -0.08340	   0.00000	   0.07579	   0.15733	   0.23261
                      8	  -0.33570	  -0.29544	  -0.22410	  -0.16273	  -0.08364	  -0.00005	   0.08021	   0.15667	   0.22460
                     16	  -0.36697	  -0.31815	  -0.25380	  -0.16382	  -0.08289	   0.00001	   0.07829	   0.14817	   0.20557
                     28	  -0.37517	  -0.30166	  -0.22709	  -0.14892	  -0.07285	   0.00005	   0.06242	   0.10444	   0.13487
                     50	  -0.26069	  -0.19488	  -0.13283	  -0.08590	  -0.04361	  -0.00016	  -0.00093	  -0.02522	  -0.05778
                     60	  -0.13544	  -0.08560	  -0.05251	  -0.04150	  -0.01981	   0.00040	  -0.03143	  -0.07641	  -0.12376
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            </tableData>
          </table>
       </product>
    </function>
    <function name="aero/c/CMM1">
    <description>BASE PITCHING MOMENT</description>
          <table>
            <independentVar lookup="row">aero/alpha-deg</independentVar>
            <independentVar lookup="column">fcs/pitch-pos-deg</independentVar>
            <tableData>
                                -25	        -20	        -15	        -10	         -5	          0	          5	         10	         15
                    -20	   0.48199	   0.48099	   0.45574	   0.40599	   0.30255	   0.18401	   0.05615	  -0.07144	  -0.19684
                      0	   0.51233	   0.45013	   0.36221	   0.25113	   0.12031	  -0.00893	  -0.13932	  -0.26546	  -0.38616
                      8	   0.51378	   0.42981	   0.31636	   0.19283	   0.06320	  -0.06677	  -0.19785	  -0.32087	  -0.42945
                     16	   0.46404	   0.36572	   0.25200	   0.11593	  -0.01421	  -0.15121	  -0.27961	  -0.39322	  -0.48525
                     28	   0.36783	   0.24163	   0.11337	  -0.01840	  -0.14770	  -0.27157	  -0.37726	  -0.44833	  -0.50235
                     50	  -0.07652	  -0.18405	  -0.28969	  -0.37722	  -0.45439	  -0.54515	  -0.56477	  -0.55694	  -0.54332
                     60	  -0.31398	  -0.40002	  -0.46763	  -0.50942	  -0.56635	  -0.62304	  -0.61630	  -0.59395	  -0.57976
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            </tableData>
          </table>
    </function>
    <function name="aero/c/CMMALPHADOT">
    <description>PITCH DERIVATIVE MOMENT DUE TO ALPHA DOT</description>
    <product>
          <property>aero/alphadot-rad_sec</property>
          <table>
            <independentVar lookup="row">aero/alpha-deg</independentVar>
            <independentVar lookup="column">aero/beta-deg</independentVar>
            <tableData>
                                -20	        -15	        -10	         -7	         -5	         -2	          0	          2	          5	          7	         10	         15	         20
                    -20	  -0.64369	  -0.46759	  -0.74743	  -0.83416	  -0.75099	  -0.69002	  -0.75813	  -0.69040	  -0.75683	  -0.83462	  -0.75456	  -0.46473	  -0.65413
                      0	  -0.46696	  -0.41991	  -0.39064	  -0.33483	  -0.39168	  -0.31798	  -0.27204	  -0.31723	  -0.39131	  -0.33486	  -0.38763	  -0.42017	  -0.46480
                      8	  -0.59336	  -0.40166	  -0.46377	  -0.45019	  -0.48848	  -0.47147	  -0.53034	  -0.47084	  -0.48879	  -0.45008	  -0.46486	  -0.41477	  -0.59729
                     16	  -0.47894	  -0.53273	  -0.74592	  -0.66519	  -0.58983	  -0.66003	  -0.62678	  -0.65084	  -0.58111	  -0.66815	  -0.73970	  -0.54079	  -0.46991
                     28	  -0.69731	  -0.39194	  -0.64865	  -0.64802	  -0.75255	  -0.56565	  -0.58667	  -0.55756	  -0.75014	  -0.63818	  -0.70141	  -0.35918	  -0.67579
                     50	  -0.47677	  -0.35819	  -1.06174	  -0.79392	  -0.04666	  -0.31622	  -0.56467	  -0.42000	  -0.13422	  -0.81003	  -1.12352	  -0.35550	  -0.46624
                     60	  -0.53024	  -0.69477	  -0.09947	  -0.03679	  -0.23696	   0.47823	  -0.38668	   0.05318	  -0.16044	  -0.08650	  -0.27237	  -0.80037	  -0.29146
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            </tableData>
          </table>
       </product>
    </function>
    <function name="aero/c/CMMBRK">
    <description>PITCHING MOMENT DUE TO SPEEDBRAKE</description>
    <product>
          <property>fcs/speedbrake-pos-norm</property>
          <table>
            <independentVar lookup="row">aero/alpha-deg</independentVar>
            <independentVar lookup="column">aero/beta-deg</independentVar>
            <tableData>
                                -20	        -15	        -10	         -7	         -5	         -2	          0	          2	          5	          7	         10	         15	         20
                    -20	   0.00145	   0.00051	  -0.00387	   0.00376	   0.00507	   0.00387	   0.00223	   0.00388	   0.00516	   0.00386	  -0.00391	   0.00038	   0.00148
                      0	  -0.00283	   0.00235	   0.00421	   0.00371	   0.00584	   0.00479	   0.00370	   0.00479	   0.00585	   0.00365	   0.00424	   0.00233	  -0.00281
                      8	  -0.00177	   0.00158	   0.00135	   0.00212	   0.00022	   0.00033	   0.00119	   0.00032	   0.00014	   0.00209	   0.00130	   0.00168	  -0.00176
                     16	  -0.00600	  -0.00126	  -0.00042	  -0.00130	  -0.00450	  -0.00167	  -0.00250	  -0.00163	  -0.00402	  -0.00116	  -0.00072	  -0.00119	  -0.00625
                     28	  -0.00793	  -0.00794	  -0.00804	  -0.00472	  -0.00492	  -0.00610	  -0.00555	  -0.00671	  -0.00553	  -0.00386	  -0.00760	  -0.00815	  -0.00846
                     50	  -0.00550	  -0.00823	  -0.00379	  -0.00456	  -0.01100	  -0.00530	  -0.00558	  -0.00563	  -0.01020	  -0.00527	  -0.00390	  -0.00764	  -0.00592
                     60	  -0.00682	  -0.00378	  -0.01491	  -0.00914	  -0.01790	  -0.01018	  -0.00802	  -0.01064	  -0.01500	  -0.00883	  -0.01501	  -0.00171	  -0.00637
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            </tableData>
          </table>
       </product>
    </function>
    <function name="aero/c/CMMDGE">
    <description>PITCHING MOMENT DUE TO GROUND EFFECT</description>
          <table>
            <independentVar lookup="row">position/h-agl-m</independentVar>
            <independentVar lookup="column">aero/alpha-deg</independentVar>
            <tableData>
                                  0	          2	          4	          6	          8	         10	         12	         14	         16	         20
                      1	  -0.04290	  -0.09886	  -0.16652	  -0.25876	  -0.43458	  -0.52802	  -0.61614	  -0.49643	  -0.54438	  -0.64686
                      2	  -0.01740	  -0.04105	  -0.06770	  -0.10142	  -0.14065	  -0.18046	  -0.22417	  -0.27752	  -0.37512	  -0.61700
                      3	  -0.00906	  -0.02120	  -0.03341	  -0.05164	  -0.07237	  -0.09536	  -0.11699	  -0.14336	  -0.16323	  -0.20028
                      8	  -0.00097	  -0.00235	  -0.00447	  -0.00707	  -0.00963	  -0.01283	  -0.01553	  -0.01867	  -0.01890	  -0.02402
                     10	  -0.00050	  -0.00129	  -0.00282	  -0.00476	  -0.00650	  -0.00883	  -0.01041	  -0.01138	  -0.01233	  -0.01627
                     30	   0.00000	   0.00000	   0.00000	   0.00000	   0.00000	   0.00000	   0.00000	   0.00000	   0.00000	   0.00000
            </tableData>
          </table>
    </function>
    <function name="aero/c/CMMDRD">
    <description>PITCH MOMENT DUE TO RUDDER DEFLECTION</description>
    <product>
          <property>fcs/rudder-deg</property>
          <table>
            <independentVar lookup="row">aero/alpha-deg</independentVar>
            <independentVar lookup="column">aero/beta-deg</independentVar>
            <tableData>
                                -20	        -15	        -10	         -7	         -5	         -2	          0	          2	          5	          7	         10	         15	         20
                    -20	  -0.00178	  -0.00115	  -0.00057	  -0.00028	  -0.00002	   0.00032	   0.00052	   0.00071	   0.00105	   0.00129	   0.00160	   0.00199	   0.00241
                      0	  -0.00169	  -0.00121	  -0.00070	  -0.00037	  -0.00014	   0.00013	   0.00039	   0.00049	   0.00082	   0.00103	   0.00125	   0.00181	   0.00234
                      8	  -0.00144	  -0.00122	  -0.00061	  -0.00040	  -0.00010	   0.00010	   0.00026	   0.00033	   0.00075	   0.00091	   0.00102	   0.00142	   0.00184
                     16	  -0.00117	  -0.00088	  -0.00054	  -0.00026	  -0.00021	  -0.00013	   0.00008	   0.00024	   0.00030	   0.00054	   0.00063	   0.00095	   0.00120
                     28	  -0.00074	  -0.00054	  -0.00033	  -0.00021	  -0.00018	  -0.00009	   0.00008	   0.00005	   0.00020	   0.00018	   0.00031	   0.00035	   0.00065
                     50	  -0.00015	  -0.00019	  -0.00018	  -0.00014	  -0.00015	  -0.00008	  -0.00002	  -0.00005	   0.00003	   0.00009	  -0.00004	   0.00009	   0.00001
                     60	  -0.00006	  -0.00011	   0.00007	  -0.00006	  -0.00002	  -0.00032	  -0.00002	   0.00001	   0.00003	   0.00000	   0.00011	  -0.00003	  -0.00003
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            </tableData>
          </table>
       </product>
    </function>
    <function name="aero/c/CMMDRDMN">
    <description>PITCH MOMENT CHANGE DUE TO MACH DUE TO RUDDER DEFLECTION</description>
    <product>
          <property>fcs/rudder-deg</property>
          <table>
            <independentVar lookup="row">velocities/mach</independentVar>
            <independentVar lookup="column">aero/alpha-deg</independentVar>
            <tableData>
                                -10	         -5	         -2	       0.01	          1	          2	          6	          7	         10
                    0.2	   0.00025	   0.00012	   0.00003	  -0.00007	  -0.00010	  -0.00014	  -0.00027	  -0.00027	  -0.00029
                    0.8	  -0.00013	   0.00001	   0.00008	   0.00010	   0.00011	   0.00024	   0.00024	   0.00031	   0.00013
                   0.91	  -0.00010	   0.00012	   0.00030	   0.00035	   0.00044	   0.00041	   0.00054	   0.00088	   0.00063
                   0.99	  -0.00195	  -0.00018	   0.00115	   0.00199	   0.00253	   0.00304	   0.00480	   0.00062	   0.00062
                      2	  -0.00074	  -0.00074	  -0.00277	   0.00046	   0.00213	   0.00383	   0.00079	   0.00079	   0.00079
                    2.4	  -0.00079	  -0.00385	  -0.00112	   0.00079	   0.00185	   0.00293	   0.00085	   0.00085	   0.00085
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            </tableData>
          </table>
       </product>
    </function>
    <function name="aero/c/CMMDSL">
    <description>PITCH MOMENT DUE TO SLATS</description>
          <table>
            <independentVar lookup="row">aero/alpha-deg</independentVar>
            <independentVar lookup="column">fcs/slats-deg</independentVar>
            <tableData>
                                  0	         10	         23
                    -20	   0.00000	  -0.04629	  -0.04625
                      0	   0.00000	   0.00736	   0.00736
                      8	   0.00000	   0.02693	   0.02686
                     16	   0.00000	   0.04741	   0.04738
                     28	   0.00000	   0.04292	   0.04288
                     50	   0.00000	   0.02763	   0.02770
                     60	   0.00000	   0.03851	   0.03815
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            </tableData>
          </table>
    </function>
    <function name="aero/c/CMMDSPL">
    <description>PITCHING MOMENT DUE TO SPOILERS LEFT</description>
          <table>
            <independentVar lookup="row">aero/alpha-deg</independentVar>
            <independentVar lookup="column">aero/beta-deg</independentVar>
            <independentVar lookup="table">fcs/spoiler-left-deg</independentVar>
              <tableData breakPoint="0">
                              -20	       -15	       -10	        -7	        -5	        -2	         0	         2	         5	         7	        10	        15	        20
                    -20	   0.00000	   0.00000	   0.00000	   0.00000	   0.00000	   0.00000	   0.00000	   0.00000	   0.00000	   0.00000	   0.00000	   0.00000	   0.00000
                      0	   0.00000	   0.00000	   0.00000	   0.00000	   0.00000	   0.00000	   0.00000	   0.00000	   0.00000	   0.00000	   0.00000	   0.00000	   0.00000
                      8	   0.00000	   0.00000	   0.00000	   0.00000	   0.00000	   0.00000	   0.00000	   0.00000	   0.00000	   0.00000	   0.00000	   0.00000	   0.00000
                     16	   0.00000	   0.00000	   0.00000	   0.00000	   0.00000	   0.00000	   0.00000	   0.00000	   0.00000	   0.00000	   0.00000	   0.00000	   0.00000
                     28	   0.00000	   0.00000	   0.00000	   0.00000	   0.00000	   0.00000	   0.00000	   0.00000	   0.00000	   0.00000	   0.00000	   0.00000	   0.00000
                     50	   0.00000	   0.00000	   0.00000	   0.00000	   0.00000	   0.00000	   0.00000	   0.00000	   0.00000	   0.00000	   0.00000	   0.00000	   0.00000
                     60	   0.00000	   0.00000	   0.00000	   0.00000	   0.00000	   0.00000	   0.00000	   0.00000	   0.00000	   0.00000	   0.00000	   0.00000	   0.00000
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              </tableData>
              <tableData breakPoint="20">
                              -20	       -15	       -10	        -7	        -5	        -2	         0	         2	         5	         7	        10	        15	        20
                    -20	  -0.00159	   0.01251	   0.02666	   0.02920	   0.02999	   0.03129	   0.03519	   0.04012	   0.03689	   0.03987	   0.03664	   0.03763	   0.03439
                      0	   0.00015	   0.01205	   0.02082	   0.02647	   0.03307	   0.04390	   0.04503	   0.04374	   0.04532	   0.04594	   0.04751	   0.04649	   0.04533
                      8	  -0.00085	   0.00842	   0.01868	   0.02226	   0.02614	   0.03505	   0.03662	   0.04014	   0.03971	   0.04124	   0.04475	   0.04618	   0.04320
                     16	   0.00350	   0.01112	   0.01693	   0.02039	   0.02634	   0.03189	   0.03094	   0.03450	   0.03693	   0.03594	   0.04271	   0.04057	   0.04164
                     28	  -0.02057	  -0.01252	  -0.00541	   0.00178	  -0.00067	   0.00654	   0.00396	   0.01242	   0.01392	   0.02232	   0.02342	   0.03330	   0.03290
                     50	   0.01314	   0.00441	   0.00185	   0.00458	   0.00665	   0.01308	   0.01178	   0.01964	   0.02326	   0.00969	   0.01843	   0.02428	   0.02036
                     60	   0.00248	   0.00015	   0.00515	   0.01492	   0.00555	   0.01661	   0.00829	   0.02165	   0.01177	   0.01547	   0.01646	   0.01713	   0.01364
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              </tableData>
              <tableData breakPoint="50">
                              -20	       -15	       -10	        -7	        -5	        -2	         0	         2	         5	         7	        10	        15	        20
                    -20	  -0.00795	   0.01003	   0.02885	   0.03884	   0.04502	   0.05007	   0.05286	   0.05972	   0.06232	   0.06191	   0.05861	   0.05983	   0.05561
                      0	  -0.00270	   0.01506	   0.03385	   0.04443	   0.05674	   0.07390	   0.07157	   0.07118	   0.07206	   0.07485	   0.07864	   0.07970	   0.07644
                      8	   0.00131	   0.01639	   0.03198	   0.04047	   0.04561	   0.05937	   0.06076	   0.06676	   0.06727	   0.07017	   0.07472	   0.07858	   0.07518
                     16	   0.00828	   0.01781	   0.03066	   0.03636	   0.04627	   0.04784	   0.05624	   0.06158	   0.06129	   0.06429	   0.07174	   0.07111	   0.06830
                     28	  -0.02107	  -0.01265	   0.00312	   0.01274	   0.00590	   0.01981	   0.02332	   0.02906	   0.03595	   0.04822	   0.04993	   0.05952	   0.05714
                     50	   0.02014	   0.00806	   0.00279	   0.01361	   0.00778	   0.02391	   0.03591	   0.03247	   0.03477	   0.02413	   0.03879	   0.04517	   0.03638
                     60	   0.00833	   0.02455	   0.00358	   0.00894	   0.01985	   0.02418	   0.02015	   0.03107	   0.02178	   0.02550	   0.03249	   0.03206	   0.02433
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              </tableData>
          </table>
    </function>
    <function name="aero/c/CMMDSPR">
    <description>PITCHING MOMENT DUE TO SPOILERS RIGHT</description>
          <table>
            <independentVar lookup="row">aero/alpha-deg</independentVar>
            <independentVar lookup="column">aero/beta-deg</independentVar>
            <independentVar lookup="table">fcs/spoiler-right-deg</independentVar>
              <tableData breakPoint="0">
                              -20	       -15	       -10	        -7	        -5	        -2	         0	         2	         5	         7	        10	        15	        20
                    -20	   0.00000	   0.00000	   0.00000	   0.00000	   0.00000	   0.00000	   0.00000	   0.00000	   0.00000	   0.00000	   0.00000	   0.00000	   0.00000
                      0	   0.00000	   0.00000	   0.00000	   0.00000	   0.00000	   0.00000	   0.00000	   0.00000	   0.00000	   0.00000	   0.00000	   0.00000	   0.00000
                      8	   0.00000	   0.00000	   0.00000	   0.00000	   0.00000	   0.00000	   0.00000	   0.00000	   0.00000	   0.00000	   0.00000	   0.00000	   0.00000
                     16	   0.00000	   0.00000	   0.00000	   0.00000	   0.00000	   0.00000	   0.00000	   0.00000	   0.00000	   0.00000	   0.00000	   0.00000	   0.00000
                     28	   0.00000	   0.00000	   0.00000	   0.00000	   0.00000	   0.00000	   0.00000	   0.00000	   0.00000	   0.00000	   0.00000	   0.00000	   0.00000
                     50	   0.00000	   0.00000	   0.00000	   0.00000	   0.00000	   0.00000	   0.00000	   0.00000	   0.00000	   0.00000	   0.00000	   0.00000	   0.00000
                     60	   0.00000	   0.00000	   0.00000	   0.00000	   0.00000	   0.00000	   0.00000	   0.00000	   0.00000	   0.00000	   0.00000	   0.00000	   0.00000
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              </tableData>
              <tableData breakPoint="20">
                              -20	       -15	       -10	        -7	        -5	        -2	         0	         2	         5	         7	        10	        15	        20
                    -20	  -0.00159	   0.01251	   0.02666	   0.02920	   0.02999	   0.03129	   0.03519	   0.04012	   0.03689	   0.03987	   0.03664	   0.03763	   0.03439
                      0	   0.00015	   0.01205	   0.02082	   0.02647	   0.03307	   0.04390	   0.04503	   0.04374	   0.04532	   0.04594	   0.04751	   0.04649	   0.04533
                      8	  -0.00085	   0.00842	   0.01868	   0.02226	   0.02614	   0.03505	   0.03662	   0.04014	   0.03971	   0.04124	   0.04475	   0.04618	   0.04320
                     16	   0.00350	   0.01112	   0.01693	   0.02039	   0.02634	   0.03189	   0.03094	   0.03450	   0.03693	   0.03594	   0.04271	   0.04057	   0.04164
                     28	  -0.02057	  -0.01252	  -0.00541	   0.00178	  -0.00067	   0.00654	   0.00396	   0.01242	   0.01392	   0.02232	   0.02342	   0.03330	   0.03290
                     50	   0.01314	   0.00441	   0.00185	   0.00458	   0.00665	   0.01308	   0.01178	   0.01964	   0.02326	   0.00969	   0.01843	   0.02428	   0.02036
                     60	   0.00248	   0.00015	   0.00515	   0.01492	   0.00555	   0.01661	   0.00829	   0.02165	   0.01177	   0.01547	   0.01646	   0.01713	   0.01364
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              </tableData>
              <tableData breakPoint="50">
                              -20	       -15	       -10	        -7	        -5	        -2	         0	         2	         5	         7	        10	        15	        20
                    -20	  -0.00795	   0.01003	   0.02885	   0.03884	   0.04502	   0.05007	   0.05286	   0.05972	   0.06232	   0.06191	   0.05861	   0.05983	   0.05561
                      0	  -0.00270	   0.01506	   0.03385	   0.04443	   0.05674	   0.07390	   0.07157	   0.07118	   0.07206	   0.07485	   0.07864	   0.07970	   0.07644
                      8	   0.00131	   0.01639	   0.03198	   0.04047	   0.04561	   0.05937	   0.06076	   0.06676	   0.06727	   0.07017	   0.07472	   0.07858	   0.07518
                     16	   0.00828	   0.01781	   0.03066	   0.03636	   0.04627	   0.04784	   0.05624	   0.06158	   0.06129	   0.06429	   0.07174	   0.07111	   0.06830
                     28	  -0.02107	  -0.01265	   0.00312	   0.01274	   0.00590	   0.01981	   0.02332	   0.02906	   0.03595	   0.04822	   0.04993	   0.05952	   0.05714
                     50	   0.02014	   0.00806	   0.00279	   0.01361	   0.00778	   0.02391	   0.03591	   0.03247	   0.03477	   0.02413	   0.03879	   0.04517	   0.03638
                     60	   0.00833	   0.02455	   0.00358	   0.00894	   0.01985	   0.02418	   0.02015	   0.03107	   0.02178	   0.02550	   0.03249	   0.03206	   0.02433
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              </tableData>
          </table>
    </function>
    <function name="aero/c/CMMFLAPS">
    <description>PITCHING MOMENT DUE TO FLAPS INBOARD</description>
    <product>
          <property>fcs/flap-pos-deg</property>
          <table>
            <independentVar lookup="row">aero/alpha-deg</independentVar>
            <independentVar lookup="column">fcs/pitch-pos-deg</independentVar>
            <tableData>
                                -25	        -20	        -15	        -10	         -5	          0	          5	         10	         15
                    -20	  -0.00249	  -0.00232	  -0.00163	  -0.00112	  -0.00084	  -0.00064	  -0.00041	  -0.00016	  -0.00002
                      0	  -0.00090	  -0.00025	   0.00045	   0.00103	   0.00099	   0.00069	   0.00054	   0.00052	   0.00039
                      8	   0.00020	   0.00057	   0.00125	   0.00127	   0.00055	   0.00041	   0.00030	   0.00015	  -0.00015
                     16	   0.00063	   0.00015	   0.00006	   0.00070	   0.00035	   0.00021	  -0.00042	  -0.00050	  -0.00087
                     28	   0.00067	   0.00017	   0.00046	   0.00006	   0.00020	  -0.00004	  -0.00036	  -0.00079	  -0.00103
                     50	   0.00001	  -0.00025	  -0.00010	  -0.00020	  -0.00055	  -0.00018	  -0.00053	  -0.00081	  -0.00082
                     60	  -0.00023	  -0.00001	  -0.00017	  -0.00024	  -0.00007	  -0.00031	  -0.00057	  -0.00072	  -0.00044
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            </tableData>
          </table>
       </product>
    </function>
    <function name="aero/c/CMMFLAPSOB">
    <description>PITCHING MOMENT DUE TO FLAPS OUTBOARD</description>
    <product>
          <property>fcs/flap-ob-pos-deg</property>
          <table>
            <independentVar lookup="row">aero/alpha-deg</independentVar>
            <independentVar lookup="column">fcs/pitch-pos-deg</independentVar>
            <tableData>
                                -25	        -20	        -15	        -10	         -5	          0	          5	         10	         15
                    -20	   0.00439	   0.00442	   0.00396	   0.00261	  -0.00004	  -0.00355	  -0.00687	  -0.01038	  -0.01399
                      0	   0.01122	   0.00953	   0.00692	   0.00384	   0.00032	  -0.00332	  -0.00709	  -0.01071	  -0.01414
                      8	   0.01314	   0.01055	   0.00787	   0.00461	   0.00066	  -0.00278	  -0.00649	  -0.01005	  -0.01347
                     16	   0.01598	   0.01338	   0.00997	   0.00622	   0.00209	  -0.00136	  -0.00518	  -0.00859	  -0.01134
                     28	   0.01871	   0.01499	   0.01104	   0.00754	   0.00385	   0.00000	  -0.00308	  -0.00540	  -0.00724
                     50	   0.01344	   0.00993	   0.00756	   0.00471	   0.00239	   0.00011	  -0.00071	  -0.00074	  -0.00059
                     60	   0.00863	   0.00643	   0.00419	   0.00275	   0.00106	  -0.00031	  -0.00018	   0.00042	   0.00085
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            </tableData>
          </table>
       </product>
    </function>
    <function name="aero/c/CMMGEAR">
    <description>PITCHING MOMENT DUE TO GEAR</description>
    <product>
          <property>gear/gear-pos-norm</property>
          <table>
            <independentVar lookup="row">aero/alpha-deg</independentVar>
            <independentVar lookup="column">aero/beta-deg</independentVar>
            <tableData>
                                -20	        -15	        -10	         -7	         -5	         -2	          0	          2	          5	          7	         10	         15	         20
                    -20	   0.00936	   0.00781	   0.00452	   0.00312	   0.00201	   0.00129	   0.00106	   0.00136	   0.00206	   0.00309	   0.00456	   0.00775	   0.00951
                      0	   0.00730	   0.00501	   0.00240	   0.00118	   0.00053	  -0.00018	  -0.00030	  -0.00016	   0.00053	   0.00109	   0.00240	   0.00501	   0.00726
                      8	   0.00748	   0.00643	   0.00416	   0.00324	   0.00281	   0.00245	   0.00227	   0.00243	   0.00275	   0.00316	   0.00422	   0.00651	   0.00745
                     16	   0.00860	   0.00788	   0.00649	   0.00614	   0.00584	   0.00586	   0.00579	   0.00587	   0.00623	   0.00643	   0.00662	   0.00819	   0.00883
                     28	   0.00784	   0.00882	   0.00900	   0.00914	   0.01074	   0.01059	   0.01023	   0.01034	   0.01007	   0.01019	   0.00953	   0.00924	   0.00831
                     50	   0.00303	   0.00283	   0.00662	   0.00853	   0.00959	   0.00932	   0.00870	   0.00963	   0.01053	   0.00838	   0.00704	   0.00515	   0.00445
                     60	  -0.00023	  -0.00130	   0.00310	   0.00245	   0.00394	   0.00922	   0.00776	   0.00638	   0.00402	   0.00218	   0.00246	  -0.00178	   0.00026
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            </tableData>
          </table>
       </product>
    </function>
    <function name="aero/c/CMMMN">
    <description>PITCHING MOMENT DUE TO MACH</description>
          <table>
            <independentVar lookup="row">velocities/mach</independentVar>
            <independentVar lookup="column">aero/alpha-deg</independentVar>
            <tableData>
                                -10	         -5	         -2	       0.01	          1	          2	          6	          7	         10
                    0.2	  -0.00609	  -0.00331	  -0.00122	  -0.00019	   0.00109	   0.00115	   0.00402	   0.00394	   0.00507
                    0.8	   0.00409	   0.00068	  -0.00070	  -0.00127	  -0.00288	  -0.00334	  -0.00634	  -0.00868	  -0.00327
                   0.91	   0.00426	  -0.00123	  -0.00467	  -0.00558	  -0.01009	  -0.01101	  -0.01891	  -0.01733	  -0.01358
                   0.99	   0.04449	   0.00759	  -0.01903	  -0.03850	  -0.05076	  -0.06137	  -0.09728	  -0.10224	  -0.12790
                      2	   0.28881	   0.13794	   0.04238	  -0.02336	  -0.05795	  -0.09127	  -0.21645	  -0.24895	  -0.03736
                    2.4	   0.13907	   0.06338	   0.01024	  -0.02912	  -0.05130	  -0.07246	  -0.15434	  -0.17744	  -0.24352
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            </tableData>
          </table>
    </function>
    <function name="aero/c/CMMQ">
    <description>PITCH DAMPING DERIVATIVE</description>
    <product>
          <property>aero/qb</property>
          <table>
            <independentVar lookup="row">aero/alpha-deg</independentVar>
            <independentVar lookup="column">aero/beta-deg</independentVar>
            <tableData>
                                -20	        -15	        -10	         -7	         -5	         -2	          0	          2	          5	          7	         10	         15	         20
                    -20	  -5.77225	  -5.85686	  -6.15551	  -6.44745	  -6.21117	  -6.19675	  -6.37212	  -6.19403	  -6.22328	  -6.44311	  -6.16504	  -5.84119	  -5.77488
                      0	  -6.42759	  -6.50133	  -6.69795	  -6.73506	  -6.86417	  -6.72236	  -6.81609	  -6.72528	  -6.86762	  -6.73540	  -6.69198	  -6.50170	  -6.42878
                      8	  -6.74089	  -6.83246	  -6.95761	  -7.04310	  -7.15977	  -7.25316	  -7.20899	  -7.25199	  -7.16201	  -7.04332	  -6.93258	  -6.84076	  -6.75299
                     16	  -6.73531	  -6.94526	  -7.17833	  -7.41903	  -7.42058	  -7.30261	  -7.53234	  -7.30032	  -7.42037	  -7.41827	  -7.18292	  -6.95141	  -6.72864
                     28	  -6.67362	  -6.40404	  -6.80330	  -6.66975	  -6.81464	  -6.51707	  -6.73655	  -6.51432	  -6.78296	  -6.67958	  -6.86180	  -6.44544	  -6.67135
                     50	  -5.08650	  -5.24597	  -5.58187	  -5.53635	  -4.62996	  -4.96207	  -5.24110	  -4.97679	  -4.68253	  -5.57783	  -5.53277	  -5.19344	  -5.12061
                     60	  -5.84852	  -5.88490	  -4.77001	  -4.48349	  -4.26875	  -4.45161	  -5.08880	  -4.54785	  -4.21821	  -4.88071	  -4.93037	  -5.93181	  -5.52632
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            </tableData>
          </table>
       </product>
    </function>
    <function name="aero/c/CMMTANKC">
    <description>PITCHING MOMENT INCREMENT DUE TO CENTRE TANK</description>
    <product>
          <property>inertia/tank-centre-fitted</property>
          <table>
            <independentVar lookup="row">aero/alpha-deg</independentVar>
            <independentVar lookup="column">fcs/pitch-pos-deg</independentVar>
            <tableData>
                                -25	        -20	        -15	        -10	         -5	          0	          5	         10	         15
                    -20	  -0.00181	  -0.00181	  -0.00181	  -0.00181	  -0.00181	  -0.00181	  -0.00181	  -0.00181	  -0.00181
                      0	  -0.00010	  -0.00010	  -0.00010	  -0.00010	  -0.00010	  -0.00010	  -0.00010	  -0.00010	  -0.00010
                      8	   0.00077	   0.00077	   0.00077	   0.00077	   0.00077	   0.00077	   0.00077	   0.00077	   0.00077
                     16	   0.00135	   0.00135	   0.00135	   0.00135	   0.00135	   0.00135	   0.00135	   0.00135	   0.00135
                     28	   0.00183	   0.00183	   0.00183	   0.00183	   0.00183	   0.00183	   0.00183	   0.00183	   0.00183
                     50	   0.00086	   0.00086	   0.00086	   0.00086	   0.00086	   0.00086	   0.00086	   0.00086	   0.00086
                     60	   0.00028	   0.00028	   0.00028	   0.00028	   0.00028	   0.00028	   0.00028	   0.00028	   0.00028
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            </tableData>
          </table>
       </product>
    </function>
    <function name="aero/c/CMMTANKL">
    <description>PITCHING MOMENT INCREMENT DUE TO LEFT WING TANK</description>
    <product>
          <property>inertia/tank-wing-left-fitted</property>
          <table>
            <independentVar lookup="row">aero/alpha-deg</independentVar>
            <independentVar lookup="column">fcs/pitch-pos-deg</independentVar>
            <tableData>
                                -25	        -20	        -15	        -10	         -5	          0	          5	         10	         15
                    -20	   0.29791	   0.29683	   0.27173	   0.22195	   0.11837	  -0.00012	  -0.12816	  -0.25548	  -0.38094
                      0	   0.52128	   0.45905	   0.37116	   0.26006	   0.12924	   0.00000	  -0.13039	  -0.25652	  -0.37723
                      8	   0.58027	   0.49651	   0.38386	   0.25963	   0.12986	   0.00009	  -0.13104	  -0.25407	  -0.36267
                     16	   0.61565	   0.51628	   0.40293	   0.26722	   0.13701	  -0.00002	  -0.12842	  -0.24206	  -0.33411
                     28	   0.63951	   0.51305	   0.38482	   0.25317	   0.12376	   0.00001	  -0.10580	  -0.17678	  -0.23094
                     50	   0.46881	   0.36124	   0.25552	   0.16789	   0.09081	   0.00045	  -0.01916	  -0.00993	   0.00201
                     60	   0.31028	   0.22229	   0.15471	   0.11297	   0.05757	  -0.00028	   0.00914	   0.02849	   0.04404
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            </tableData>
          </table>
       </product>
    </function>
    <function name="aero/c/CMMTANKR">
    <description>PITCHING MOMENT INCREMENT DUE TO RIGHT WING TANK</description>
    <product>
          <property>inertia/tank-wing-right-fitted</property>
          <table>
            <independentVar lookup="row">aero/alpha-deg</independentVar>
            <independentVar lookup="column">fcs/pitch-pos-deg</independentVar>
            <tableData>
                                -25	        -20	        -15	        -10	         -5	          0	          5	         10	         15
                    -20	   0.29791	   0.29683	   0.27173	   0.22195	   0.11837	  -0.00012	  -0.12816	  -0.25548	  -0.38094
                      0	   0.52128	   0.45905	   0.37116	   0.26006	   0.12924	   0.00000	  -0.13039	  -0.25652	  -0.37723
                      8	   0.58027	   0.49651	   0.38386	   0.25963	   0.12986	   0.00009	  -0.13104	  -0.25407	  -0.36267
                     16	   0.61565	   0.51628	   0.40293	   0.26722	   0.13701	  -0.00002	  -0.12842	  -0.24206	  -0.33411
                     28	   0.63951	   0.51305	   0.38482	   0.25317	   0.12376	   0.00001	  -0.10580	  -0.17678	  -0.23094
                     50	   0.46881	   0.36124	   0.25552	   0.16789	   0.09081	   0.00045	  -0.01916	  -0.00993	   0.00201
                     60	   0.31028	   0.22229	   0.15471	   0.11297	   0.05757	  -0.00028	   0.00914	   0.02849	   0.04404
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            </tableData>
          </table>
       </product>
    </function>
    <function name="aero/c/CML1">
    <description>BASE ROLLING MOMENT</description>
          <table>
            <independentVar lookup="row">aero/alpha-deg</independentVar>
            <independentVar lookup="column">aero/beta-deg</independentVar>
            <tableData>
                                -20	        -15	        -10	         -7	         -5	         -2	          0	          2	          5	          7	         10	         15	         20
                    -20	  -0.11115	  -0.08673	  -0.05880	  -0.04106	  -0.02940	  -0.01186	   0.00001	   0.01185	   0.02939	   0.04106	   0.05880	   0.08676	   0.11115
                      0	  -0.01512	  -0.01099	  -0.00705	  -0.00460	  -0.00336	  -0.00118	   0.00000	   0.00118	   0.00336	   0.00460	   0.00705	   0.01100	   0.01513
                      8	   0.03083	   0.02530	   0.01866	   0.01325	   0.00972	   0.00418	   0.00000	  -0.00418	  -0.00971	  -0.01326	  -0.01867	  -0.02529	  -0.03083
                     16	   0.07568	   0.05878	   0.04174	   0.03017	   0.02212	   0.00982	   0.00000	  -0.00981	  -0.02212	  -0.03020	  -0.04173	  -0.05878	  -0.07569
                     28	   0.08729	   0.05737	   0.03029	   0.02019	   0.01416	   0.00571	   0.00006	  -0.00558	  -0.01416	  -0.02012	  -0.03015	  -0.05745	  -0.08727
                     50	   0.03555	   0.01276	   0.00120	  -0.00086	  -0.00002	   0.00071	   0.00013	  -0.00055	   0.00002	   0.00087	  -0.00127	  -0.01253	  -0.03553
                     60	   0.02199	   0.00207	  -0.00700	  -0.00728	  -0.00660	  -0.00433	   0.00022	   0.00435	   0.00638	   0.00716	   0.00741	  -0.00201	  -0.02197
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            </tableData>
          </table>
    </function>
    <function name="aero/c/CMLBETADOT">
    <description>ROLL MOMENT DERIVATIVE FOR BETA DOT</description>
    <product>
          <property>aero/betadot-rad_sec</property>
          <table>
            <independentVar lookup="row">aero/alpha-deg</independentVar>
            <independentVar lookup="column">aero/beta-deg</independentVar>
            <tableData>
                                -20	        -15	        -10	         -7	         -5	         -2	          0	          2	          5	          7	         10	         15	         20
                    -20	   0.26697	   0.24320	   0.33521	   0.33480	   0.32383	   0.34120	   0.33786	   0.33073	   0.33573	   0.32850	   0.33392	   0.27414	   0.29393
                      0	   0.03950	   0.04527	   0.03707	   0.05292	   0.02513	   0.04322	   0.02432	   0.03085	   0.01817	   0.04290	   0.03108	   0.06265	   0.06223
                      8	  -0.00796	  -0.13068	  -0.11800	  -0.10100	  -0.09062	  -0.11717	  -0.12238	  -0.11834	  -0.10176	  -0.08198	  -0.07871	  -0.16179	   0.07362
                     16	  -0.17078	  -0.19078	  -0.22485	  -0.23052	  -0.22216	  -0.26773	  -0.29102	  -0.26212	  -0.22852	  -0.22098	  -0.20709	  -0.22994	  -0.15872
                     28	  -0.32221	  -0.36256	  -0.18175	  -0.18296	  -0.18579	  -0.16322	  -0.15595	  -0.13151	  -0.16182	  -0.19732	  -0.25465	  -0.34370	  -0.31670
                     50	  -0.30264	  -0.21203	  -0.05058	   0.03684	   0.02626	   0.03051	  -0.06340	   0.01025	   0.04531	  -0.02561	  -0.09456	  -0.26971	  -0.32464
                     60	  -0.16763	  -0.09307	  -0.03572	   0.02034	   0.04274	   0.11922	   0.13119	   0.06809	   0.03194	   0.04710	  -0.08519	  -0.02914	  -0.28801
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            </tableData>
          </table>
       </product>
    </function>
    <function name="aero/c/CMLDRD">
    <description>ROLL MOMENT DUE TO RUDDER DEFLECTION</description>
    <product>
          <property>fcs/rudder-deg</property>
          <table>
            <independentVar lookup="row">aero/alpha-deg</independentVar>
            <independentVar lookup="column">aero/beta-deg</independentVar>
            <tableData>
                                -20	        -15	        -10	         -7	         -5	         -2	          0	          2	          5	          7	         10	         15	         20
                    -20	  -0.00063	  -0.00066	  -0.00066	  -0.00067	  -0.00067	  -0.00066	  -0.00066	  -0.00065	  -0.00064	  -0.00063	  -0.00062	  -0.00059	  -0.00051
                      0	  -0.00052	  -0.00054	  -0.00054	  -0.00055	  -0.00054	  -0.00053	  -0.00053	  -0.00053	  -0.00052	  -0.00052	  -0.00051	  -0.00047	  -0.00041
                      8	  -0.00047	  -0.00047	  -0.00052	  -0.00050	  -0.00050	  -0.00048	  -0.00047	  -0.00047	  -0.00047	  -0.00047	  -0.00047	  -0.00041	  -0.00040
                     16	  -0.00038	  -0.00040	  -0.00044	  -0.00044	  -0.00043	  -0.00043	  -0.00043	  -0.00043	  -0.00042	  -0.00041	  -0.00041	  -0.00037	  -0.00033
                     28	  -0.00035	  -0.00037	  -0.00038	  -0.00037	  -0.00037	  -0.00038	  -0.00038	  -0.00037	  -0.00035	  -0.00036	  -0.00035	  -0.00031	  -0.00026
                     50	  -0.00019	  -0.00021	  -0.00022	  -0.00022	  -0.00022	  -0.00023	  -0.00022	  -0.00022	  -0.00020	  -0.00019	  -0.00019	  -0.00017	  -0.00014
                     60	  -0.00010	  -0.00010	  -0.00012	  -0.00011	  -0.00010	  -0.00010	  -0.00012	  -0.00012	  -0.00008	  -0.00010	  -0.00008	  -0.00008	  -0.00006
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            </tableData>
          </table>
       </product>
    </function>
    <function name="aero/c/CMLDRDMN">
    <description>ROLL MOMENT CHANGE DUE TO MACH DUE TO RUDDER DEFLECTION</description>
    <product>
          <property>fcs/rudder-deg</property>
          <table>
            <independentVar lookup="row">velocities/mach</independentVar>
            <independentVar lookup="column">aero/alpha-deg</independentVar>
            <tableData>
                                -10	         -5	         -2	       0.01	          1	          2	          6	          7	         10
                    0.2	   0.00004	   0.00004	   0.00005	   0.00005	   0.00005	   0.00005	   0.00004	   0.00004	   0.00004
                    0.8	  -0.00007	  -0.00006	  -0.00006	  -0.00007	  -0.00006	  -0.00006	  -0.00005	  -0.00005	  -0.00006
                   0.91	  -0.00014	  -0.00013	  -0.00012	  -0.00012	  -0.00012	  -0.00011	  -0.00010	  -0.00012	  -0.00014
                   0.99	  -0.00014	  -0.00012	  -0.00012	  -0.00011	  -0.00011	  -0.00010	  -0.00009	  -0.00010	  -0.00014
                      2	   0.00025	   0.00014	   0.00011	   0.00011	   0.00010	   0.00011	   0.00011	   0.00010	   0.00008
                    2.4	   0.00029	   0.00022	   0.00020	   0.00019	   0.00019	   0.00019	   0.00018	   0.00018	   0.00017
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            </tableData>
          </table>
       </product>
    </function>
    <function name="aero/c/CMLDSL">
    <description>ROLL MOMENT DUE TO SLATS</description>
    <product>
          <property>aero/beta-deg</property>
          <table>
            <independentVar lookup="row">aero/alpha-deg</independentVar>
            <independentVar lookup="column">fcs/slats-deg</independentVar>
            <tableData>
                                  0	         10	         23
                    -20	   0.00000	   0.00001	   0.00001
                      0	   0.00000	   0.00000	   0.00000
                      8	   0.00000	   0.00000	   0.00000
                     16	   0.00000	   0.00001	  -0.00003
                     28	   0.00000	   0.00009	   0.00007
                     50	   0.00000	   0.00014	   0.00012
                     60	   0.00000	   0.00004	   0.00038
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            </tableData>
          </table>
       </product>
    </function>
    <function name="aero/c/CMLDSPL">
    <description>ROLL MOMENT DUE TO SPOILERS LEFT</description>
          <table>
            <independentVar lookup="row">aero/alpha-deg</independentVar>
            <independentVar lookup="column">aero/beta-deg</independentVar>
            <independentVar lookup="table">fcs/spoiler-left-deg</independentVar>
              <tableData breakPoint="0">
                              -20	       -15	       -10	        -7	        -5	        -2	         0	         2	         5	         7	        10	        15	        20
                    -20	   0.00000	   0.00000	   0.00000	   0.00000	   0.00000	   0.00000	   0.00000	   0.00000	   0.00000	   0.00000	   0.00000	   0.00000	   0.00000
                      0	   0.00000	   0.00000	   0.00000	   0.00000	   0.00000	   0.00000	   0.00000	   0.00000	   0.00000	   0.00000	   0.00000	   0.00000	   0.00000
                      8	   0.00000	   0.00000	   0.00000	   0.00000	   0.00000	   0.00000	   0.00000	   0.00000	   0.00000	   0.00000	   0.00000	   0.00000	   0.00000
                     16	   0.00000	   0.00000	   0.00000	   0.00000	   0.00000	   0.00000	   0.00000	   0.00000	   0.00000	   0.00000	   0.00000	   0.00000	   0.00000
                     28	   0.00000	   0.00000	   0.00000	   0.00000	   0.00000	   0.00000	   0.00000	   0.00000	   0.00000	   0.00000	   0.00000	   0.00000	   0.00000
                     50	   0.00000	   0.00000	   0.00000	   0.00000	   0.00000	   0.00000	   0.00000	   0.00000	   0.00000	   0.00000	   0.00000	   0.00000	   0.00000
                     60	   0.00000	   0.00000	   0.00000	   0.00000	   0.00000	   0.00000	   0.00000	   0.00000	   0.00000	   0.00000	   0.00000	   0.00000	   0.00000
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              </tableData>
              <tableData breakPoint="20">
                              -20	       -15	       -10	        -7	        -5	        -2	         0	         2	         5	         7	        10	        15	        20
                    -20	  -0.01267	  -0.01921	  -0.02457	  -0.02513	  -0.02479	  -0.02403	  -0.02395	  -0.02376	  -0.02231	  -0.02147	  -0.02072	  -0.01873	  -0.01604
                      0	  -0.03097	  -0.02987	  -0.03036	  -0.02987	  -0.02918	  -0.02847	  -0.02830	  -0.02751	  -0.02635	  -0.02570	  -0.02427	  -0.02190	  -0.01941
                      8	  -0.03140	  -0.03145	  -0.03152	  -0.03051	  -0.03005	  -0.02958	  -0.02919	  -0.02864	  -0.02776	  -0.02710	  -0.02577	  -0.02373	  -0.02001
                     16	  -0.03084	  -0.02922	  -0.02980	  -0.02990	  -0.02988	  -0.02982	  -0.02894	  -0.02862	  -0.02773	  -0.02697	  -0.02591	  -0.02384	  -0.02131
                     28	  -0.00465	  -0.00318	  -0.00359	  -0.00478	  -0.00596	  -0.00810	  -0.00930	  -0.01072	  -0.01456	  -0.01721	  -0.02137	  -0.02183	  -0.01987
                     50	  -0.00380	  -0.00567	  -0.00485	  -0.00592	  -0.00641	  -0.00647	  -0.00783	  -0.00768	  -0.00885	  -0.00880	  -0.00995	  -0.01514	  -0.01407
                     60	  -0.00320	   0.00027	  -0.00583	  -0.00622	  -0.00689	  -0.00553	  -0.00671	  -0.00786	  -0.00893	  -0.00977	  -0.01223	  -0.01332	  -0.00984
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              </tableData>
              <tableData breakPoint="50">
                              -20	       -15	       -10	        -7	        -5	        -2	         0	         2	         5	         7	        10	        15	        20
                    -20	  -0.01573	  -0.02304	  -0.03121	  -0.03605	  -0.03799	  -0.03794	  -0.03738	  -0.03729	  -0.03554	  -0.03393	  -0.03272	  -0.02983	  -0.02582
                      0	  -0.05051	  -0.04925	  -0.04979	  -0.04912	  -0.04835	  -0.04690	  -0.04690	  -0.04559	  -0.04374	  -0.04275	  -0.04048	  -0.03646	  -0.03250
                      8	  -0.05253	  -0.05181	  -0.05287	  -0.05182	  -0.05121	  -0.05005	  -0.04955	  -0.04857	  -0.04690	  -0.04600	  -0.04386	  -0.04055	  -0.03645
                     16	  -0.05487	  -0.05231	  -0.05297	  -0.05283	  -0.05225	  -0.05198	  -0.05047	  -0.04980	  -0.04809	  -0.04696	  -0.04509	  -0.04146	  -0.03713
                     28	  -0.02106	  -0.01754	  -0.01744	  -0.01984	  -0.02197	  -0.02486	  -0.02690	  -0.02918	  -0.03301	  -0.03683	  -0.04057	  -0.03935	  -0.03569
                     50	  -0.00697	  -0.00975	  -0.00844	  -0.00954	  -0.01007	  -0.01192	  -0.01285	  -0.01449	  -0.01714	  -0.01950	  -0.02341	  -0.03098	  -0.02692
                     60	  -0.00624	  -0.00199	  -0.00739	  -0.01027	  -0.01183	  -0.01176	  -0.01399	  -0.01713	  -0.01747	  -0.01944	  -0.02344	  -0.02476	  -0.02068
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              </tableData>
          </table>
    </function>
    <function name="aero/c/CMLDSPR">
    <description>ROLL MOMENT DUE TO SPOILERS RIGHT</description>
          <table>
            <independentVar lookup="row">aero/alpha-deg</independentVar>
            <independentVar lookup="column">aero/beta-deg</independentVar>
            <independentVar lookup="table">fcs/spoiler-right-deg</independentVar>
              <tableData breakPoint="0">
                              -20	       -15	       -10	        -7	        -5	        -2	         0	         2	         5	         7	        10	        15	        20
                    -20	   0.00000	   0.00000	   0.00000	   0.00000	   0.00000	   0.00000	   0.00000	   0.00000	   0.00000	   0.00000	   0.00000	   0.00000	   0.00000
                      0	   0.00000	   0.00000	   0.00000	   0.00000	   0.00000	   0.00000	   0.00000	   0.00000	   0.00000	   0.00000	   0.00000	   0.00000	   0.00000
                      8	   0.00000	   0.00000	   0.00000	   0.00000	   0.00000	   0.00000	   0.00000	   0.00000	   0.00000	   0.00000	   0.00000	   0.00000	   0.00000
                     16	   0.00000	   0.00000	   0.00000	   0.00000	   0.00000	   0.00000	   0.00000	   0.00000	   0.00000	   0.00000	   0.00000	   0.00000	   0.00000
                     28	   0.00000	   0.00000	   0.00000	   0.00000	   0.00000	   0.00000	   0.00000	   0.00000	   0.00000	   0.00000	   0.00000	   0.00000	   0.00000
                     50	   0.00000	   0.00000	   0.00000	   0.00000	   0.00000	   0.00000	   0.00000	   0.00000	   0.00000	   0.00000	   0.00000	   0.00000	   0.00000
                     60	   0.00000	   0.00000	   0.00000	   0.00000	   0.00000	   0.00000	   0.00000	   0.00000	   0.00000	   0.00000	   0.00000	   0.00000	   0.00000
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              </tableData>
              <tableData breakPoint="20">
                              -20	       -15	       -10	        -7	        -5	        -2	         0	         2	         5	         7	        10	        15	        20
                    -20	   0.01267	   0.01921	   0.02457	   0.02513	   0.02479	   0.02403	   0.02395	   0.02376	   0.02231	   0.02147	   0.02072	   0.01873	   0.01604
                      0	   0.03097	   0.02987	   0.03036	   0.02987	   0.02918	   0.02847	   0.02830	   0.02751	   0.02635	   0.02570	   0.02427	   0.02190	   0.01941
                      8	   0.03140	   0.03145	   0.03152	   0.03051	   0.03005	   0.02958	   0.02919	   0.02864	   0.02776	   0.02710	   0.02577	   0.02373	   0.02001
                     16	   0.03084	   0.02922	   0.02980	   0.02990	   0.02988	   0.02982	   0.02894	   0.02862	   0.02773	   0.02697	   0.02591	   0.02384	   0.02131
                     28	   0.00465	   0.00318	   0.00359	   0.00478	   0.00596	   0.00810	   0.00930	   0.01072	   0.01456	   0.01721	   0.02137	   0.02183	   0.01987
                     50	   0.00380	   0.00567	   0.00485	   0.00592	   0.00641	   0.00647	   0.00783	   0.00768	   0.00885	   0.00880	   0.00995	   0.01514	   0.01407
                     60	   0.00320	  -0.00027	   0.00583	   0.00622	   0.00689	   0.00553	   0.00671	   0.00786	   0.00893	   0.00977	   0.01223	   0.01332	   0.00984
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              </tableData>
              <tableData breakPoint="50">
                              -20	       -15	       -10	        -7	        -5	        -2	         0	         2	         5	         7	        10	        15	        20
                    -20	   0.01573	   0.02304	   0.03121	   0.03605	   0.03799	   0.03794	   0.03738	   0.03729	   0.03554	   0.03393	   0.03272	   0.02983	   0.02582
                      0	   0.05051	   0.04925	   0.04979	   0.04912	   0.04835	   0.04690	   0.04690	   0.04559	   0.04374	   0.04275	   0.04048	   0.03646	   0.03250
                      8	   0.05253	   0.05181	   0.05287	   0.05182	   0.05121	   0.05005	   0.04955	   0.04857	   0.04690	   0.04600	   0.04386	   0.04055	   0.03645
                     16	   0.05487	   0.05231	   0.05297	   0.05283	   0.05225	   0.05198	   0.05047	   0.04980	   0.04809	   0.04696	   0.04509	   0.04146	   0.03713
                     28	   0.02106	   0.01754	   0.01744	   0.01984	   0.02197	   0.02486	   0.02690	   0.02918	   0.03301	   0.03683	   0.04057	   0.03935	   0.03569
                     50	   0.00697	   0.00975	   0.00844	   0.00954	   0.01007	   0.01192	   0.01285	   0.01449	   0.01714	   0.01950	   0.02341	   0.03098	   0.02692
                     60	   0.00624	   0.00199	   0.00739	   0.01027	   0.01183	   0.01176	   0.01399	   0.01713	   0.01747	   0.01944	   0.02344	   0.02476	   0.02068
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              </tableData>
          </table>
    </function>
    <function name="aero/c/CMLDTD">
    <description>ROLL MOMENT DUE TO DIFFERENTIAL TAIL DEFLECTION</description>
    <product>
          <property>fcs/differential-elevator-pos-deg</property>
          <table>
            <independentVar lookup="row">aero/alpha-deg</independentVar>
            <independentVar lookup="column">fcs/pitch-pos-deg</independentVar>
            <tableData>
                                -25	        -20	        -15	        -10	         -5	          0	          5	         10	         15
                    -20	   0.00158	   0.00163	   0.00158	   0.00147	   0.00127	   0.00097	   0.00057	   0.00016	  -0.00016
                      0	   0.00095	   0.00127	   0.00169	   0.00171	   0.00159	   0.00152	   0.00137	   0.00112	   0.00090
                      8	   0.00072	   0.00107	   0.00136	   0.00158	   0.00171	   0.00164	   0.00146	   0.00125	   0.00119
                     16	   0.00030	   0.00073	   0.00109	   0.00143	   0.00159	   0.00164	   0.00157	   0.00144	   0.00136
                     28	  -0.00027	   0.00018	   0.00046	   0.00081	   0.00107	   0.00132	   0.00143	   0.00146	   0.00138
                     50	  -0.00055	  -0.00049	  -0.00044	  -0.00028	   0.00017	   0.00045	   0.00065	   0.00073	   0.00088
                     60	  -0.00036	  -0.00036	  -0.00054	  -0.00047	  -0.00027	  -0.00002	   0.00015	   0.00031	   0.00059
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            </tableData>
          </table>
       </product>
    </function>
    <function name="aero/c/CMLGEAR">
    <description>ROLL MOMENT DUE TO GEAR</description>
    <product>
          <property>gear/gear-pos-norm</property>
          <table>
            <independentVar lookup="row">aero/alpha-deg</independentVar>
            <independentVar lookup="column">aero/beta-deg</independentVar>
            <tableData>
                                -20	        -15	        -10	         -7	         -5	         -2	          0	          2	          5	          7	         10	         15	         20
                    -20	   0.00637	   0.00591	   0.00481	   0.00377	   0.00277	   0.00109	   0.00001	  -0.00111	  -0.00276	  -0.00376	  -0.00480	  -0.00588	  -0.00627
                      0	   0.00873	   0.00825	   0.00636	   0.00457	   0.00330	   0.00133	   0.00000	  -0.00133	  -0.00330	  -0.00457	  -0.00636	  -0.00824	  -0.00872
                      8	   0.00896	   0.00824	   0.00627	   0.00451	   0.00324	   0.00131	   0.00000	  -0.00132	  -0.00323	  -0.00452	  -0.00628	  -0.00824	  -0.00892
                     16	   0.00852	   0.00790	   0.00594	   0.00416	   0.00302	   0.00123	   0.00000	  -0.00122	  -0.00309	  -0.00420	  -0.00592	  -0.00790	  -0.00853
                     28	   0.00742	   0.00685	   0.00494	   0.00334	   0.00243	   0.00098	   0.00008	  -0.00075	  -0.00243	  -0.00329	  -0.00481	  -0.00695	  -0.00740
                     50	   0.00489	   0.00406	   0.00243	   0.00207	   0.00097	   0.00045	   0.00007	  -0.00035	  -0.00108	  -0.00206	  -0.00245	  -0.00399	  -0.00490
                     60	   0.00323	   0.00281	   0.00252	   0.00159	   0.00122	   0.00010	   0.00047	  -0.00033	  -0.00109	  -0.00150	  -0.00207	  -0.00301	  -0.00325
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            </tableData>
          </table>
       </product>
    </function>
    <function name="aero/c/CMLMN">
    <description>ROLL MOMENT DUE TO MACH</description>
          <table>
            <independentVar lookup="row">velocities/mach</independentVar>
            <independentVar lookup="column">aero/alpha-deg</independentVar>
            <tableData>
                                -10	         -5	         -2	       0.01	          1	          2	          6	          7	         10
                    0.2	   0.00000	   0.00000	   0.00000	   0.00000	   0.00000	   0.00000	   0.00000	   0.00001	   0.00000
                    0.8	   0.00000	   0.00000	   0.00000	   0.00000	   0.00000	   0.00000	   0.00000	   0.00001	   0.00000
                   0.91	   0.00001	   0.00000	   0.00000	   0.00000	   0.00000	   0.00000	   0.00000	   0.00003	   0.00000
                   0.99	   0.00000	   0.00000	   0.00000	   0.00000	   0.00000	   0.00000	   0.00000	   0.00001	   0.00000
                      2	  -0.00256	  -0.00058	  -0.00014	  -0.00003	  -0.00001	   0.00000	   0.00008	   0.00015	   0.00058
                    2.4	  -0.00128	  -0.00033	  -0.00009	  -0.00002	  -0.00001	   0.00000	   0.00000	   0.00002	   0.00010
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            </tableData>
          </table>
    </function>
    <function name="aero/c/CMLP">
    <description>ROLL DAMPING DERIVATIVE</description>
    <product>
          <property>aero/pb</property>
          <table>
            <independentVar lookup="row">aero/alpha-deg</independentVar>
            <independentVar lookup="column">aero/beta-deg</independentVar>
            <tableData>
                                -20	        -15	        -10	         -7	         -5	         -2	          0	          2	          5	          7	         10	         15	         20
                    -20	  -0.23218	  -0.25408	  -0.30313	  -0.30872	  -0.30508	  -0.30077	  -0.30409	  -0.30241	  -0.29811	  -0.30056	  -0.29062	  -0.24660	  -0.22643
                      0	  -0.43324	  -0.43979	  -0.44118	  -0.44023	  -0.44107	  -0.44075	  -0.44597	  -0.44503	  -0.44257	  -0.43982	  -0.44264	  -0.43558	  -0.42318
                      8	  -0.43765	  -0.48027	  -0.47844	  -0.47488	  -0.47582	  -0.48124	  -0.47803	  -0.48025	  -0.47384	  -0.47223	  -0.45766	  -0.47334	  -0.47257
                     16	  -0.39543	  -0.39672	  -0.41934	  -0.44367	  -0.45748	  -0.46913	  -0.46540	  -0.44288	  -0.41827	  -0.41196	  -0.40599	  -0.40159	  -0.39421
                     28	  -0.23063	  -0.24365	  -0.23011	  -0.20478	  -0.19870	  -0.20510	  -0.19918	  -0.18914	  -0.19694	  -0.20326	  -0.23238	  -0.24230	  -0.22404
                     50	  -0.26815	  -0.29339	  -0.31015	  -0.30979	  -0.29005	  -0.33037	  -0.32273	  -0.33163	  -0.30175	  -0.33454	  -0.33411	  -0.29446	  -0.28919
                     60	  -0.39556	  -0.34735	  -0.33029	  -0.37094	  -0.39670	  -0.37116	  -0.38741	  -0.40863	  -0.37515	  -0.37326	  -0.35520	  -0.39243	  -0.40074
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            </tableData>
          </table>
       </product>
    </function>
    <function name="aero/c/CMLR">
    <description>ROLL DERIVATIVE MOMENT DUE TO YAW RATE</description>
    <product>
          <property>aero/rb</property>
          <table>
            <independentVar lookup="row">aero/alpha-deg</independentVar>
            <independentVar lookup="column">aero/beta-deg</independentVar>
            <tableData>
                                -20	        -15	        -10	         -7	         -5	         -2	          0	          2	          5	          7	         10	         15	         20
                    -20	  -0.38032	  -0.35339	  -0.36965	  -0.35737	  -0.34632	  -0.34476	  -0.34510	  -0.34185	  -0.33939	  -0.33990	  -0.35364	  -0.33303	  -0.33287
                      0	   0.03216	   0.07798	   0.07795	   0.07940	   0.08671	   0.09168	   0.10463	   0.10594	   0.09279	   0.10267	   0.08424	   0.06716	   0.07670
                      8	   0.25342	   0.25588	   0.25914	   0.28322	   0.28063	   0.30563	   0.31796	   0.32443	   0.31049	   0.30588	   0.30998	   0.27924	   0.21404
                     16	   0.41641	   0.47308	   0.46085	   0.48115	   0.49403	   0.50182	   0.53744	   0.53883	   0.49818	   0.50534	   0.48544	   0.44422	   0.43127
                     28	   0.63030	   0.68488	   0.66492	   0.64396	   0.63441	   0.64313	   0.62805	   0.63932	   0.65141	   0.63691	   0.63414	   0.70288	   0.64740
                     50	   0.65594	   0.66141	   0.59186	   0.57130	   0.53558	   0.54386	   0.55760	   0.55418	   0.55834	   0.52331	   0.55576	   0.64351	   0.66997
                     60	   0.41179	   0.51060	   0.53944	   0.44935	   0.45262	   0.43384	   0.39949	   0.38499	   0.45322	   0.44148	   0.48868	   0.43188	   0.35363
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            </tableData>
          </table>
       </product>
    </function>
    <function name="aero/c/CMLTANKC">
    <description>ROLLING MOMENT INCREMENT DUE TO CENTRE TANK</description>
    <product>
          <property>inertia/tank-centre-fitted</property>
          <table>
            <independentVar lookup="row">aero/alpha-deg</independentVar>
            <independentVar lookup="column">aero/beta-deg</independentVar>
            <tableData>
                                -20	        -15	        -10	         -7	         -5	         -2	          0	          2	          5	          7	         10	         15	         20
                    -20	  -0.00020	  -0.00017	  -0.00012	  -0.00009	  -0.00008	  -0.00002	   0.00001	   0.00001	   0.00008	   0.00007	   0.00013	   0.00018	   0.00020
                      0	  -0.00026	  -0.00022	  -0.00013	  -0.00010	  -0.00006	  -0.00003	   0.00000	   0.00003	   0.00006	   0.00010	   0.00013	   0.00023	   0.00026
                      8	  -0.00002	  -0.00026	  -0.00016	  -0.00010	  -0.00008	  -0.00003	   0.00000	   0.00004	   0.00009	   0.00012	   0.00015	   0.00028	  -0.00025
                     16	  -0.00032	  -0.00024	  -0.00015	  -0.00009	  -0.00007	   0.00002	   0.00001	   0.00002	   0.00008	   0.00010	   0.00017	   0.00027	   0.00031
                     28	  -0.00008	  -0.00010	   0.00021	  -0.00013	  -0.00009	  -0.00004	   0.00013	   0.00016	   0.00005	   0.00007	   0.00007	   0.00002	   0.00008
                     50	   0.00017	   0.00031	  -0.00008	   0.00023	  -0.00034	   0.00004	   0.00013	   0.00005	   0.00026	  -0.00021	   0.00014	  -0.00020	  -0.00019
                     60	   0.00024	   0.00017	   0.00024	   0.00001	   0.00021	   0.00005	   0.00014	   0.00014	  -0.00041	  -0.00031	   0.00015	   0.00000	  -0.00009
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            </tableData>
          </table>
       </product>
    </function>
    <function name="aero/c/CMLTANKL">
    <description>ROLLING MOMENT INCREMENT DUE TO LEFT WING TANK</description>
    <product>
          <property>inertia/tank-wing-left-fitted</property>
          <table>
            <independentVar lookup="row">aero/alpha-deg</independentVar>
            <independentVar lookup="column">aero/beta-deg</independentVar>
            <tableData>
                                -20	        -15	        -10	         -7	         -5	         -2	          0	          2	          5	          7	         10	         15	         20
                    -20	  -0.00001	  -0.00002	  -0.00001	   0.00001	   0.00000	   0.00000	   0.00002	  -0.00001	   0.00002	   0.00000	   0.00000	   0.00001	   0.00000
                      0	   0.00000	   0.00001	   0.00000	   0.00000	   0.00000	   0.00000	   0.00000	   0.00000	   0.00000	   0.00000	   0.00000	   0.00000	   0.00001
                      8	  -0.00001	   0.00000	  -0.00001	  -0.00001	   0.00001	   0.00000	   0.00000	   0.00000	   0.00001	  -0.00001	   0.00000	   0.00000	   0.00002
                     16	  -0.00001	  -0.00001	   0.00002	   0.00002	   0.00000	  -0.00002	   0.00000	   0.00003	   0.00003	  -0.00001	   0.00000	   0.00000	   0.00000
                     28	   0.00001	   0.00006	   0.00014	   0.00003	  -0.00001	   0.00009	  -0.00004	   0.00016	  -0.00001	   0.00011	   0.00004	  -0.00003	   0.00000
                     50	  -0.00004	   0.00013	  -0.00024	   0.00012	  -0.00053	   0.00003	   0.00020	   0.00006	   0.00023	   0.00001	   0.00002	   0.00004	   0.00007
                     60	  -0.00005	  -0.00007	   0.00006	  -0.00007	  -0.00031	  -0.00017	   0.00018	   0.00029	   0.00015	  -0.00004	   0.00025	   0.00002	  -0.00038
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            </tableData>
          </table>
       </product>
    </function>
    <function name="aero/c/CMLTANKR">
    <description>ROLLING MOMENT INCREMENT DUE TO RIGHT WING TANK</description>
    <product>
          <property>inertia/tank-wing-right-fitted</property>
          <table>
            <independentVar lookup="row">aero/alpha-deg</independentVar>
            <independentVar lookup="column">aero/beta-deg</independentVar>
            <tableData>
                                -20	        -15	        -10	         -7	         -5	         -2	          0	          2	          5	          7	         10	         15	         20
                    -20	   0.00001	   0.00002	   0.00001	  -0.00001	   0.00000	   0.00000	  -0.00002	   0.00001	  -0.00002	   0.00000	   0.00000	  -0.00001	   0.00000
                      0	   0.00000	  -0.00001	   0.00000	   0.00000	   0.00000	   0.00000	   0.00000	   0.00000	   0.00000	   0.00000	   0.00000	   0.00000	  -0.00001
                      8	   0.00001	   0.00000	   0.00001	   0.00001	  -0.00001	   0.00000	   0.00000	   0.00000	  -0.00001	   0.00001	   0.00000	   0.00000	  -0.00002
                     16	   0.00001	   0.00001	  -0.00002	  -0.00002	   0.00000	   0.00002	   0.00000	  -0.00003	  -0.00003	   0.00001	   0.00000	   0.00000	   0.00000
                     28	  -0.00001	  -0.00006	  -0.00014	  -0.00003	   0.00001	  -0.00009	   0.00004	  -0.00016	   0.00001	  -0.00011	  -0.00004	   0.00003	   0.00000
                     50	   0.00004	  -0.00013	   0.00024	  -0.00012	   0.00053	  -0.00003	  -0.00020	  -0.00006	  -0.00023	  -0.00001	  -0.00002	  -0.00004	  -0.00007
                     60	   0.00005	   0.00007	  -0.00006	   0.00007	   0.00031	   0.00017	  -0.00018	  -0.00029	  -0.00015	   0.00004	  -0.00025	  -0.00002	   0.00038
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            </tableData>
          </table>
       </product>
    </function>
    <function name="aero/c/CFYB">
    <description>BASE SIDEFORCE</description>
          <table>
            <independentVar lookup="row">aero/alpha-deg</independentVar>
            <independentVar lookup="column">aero/beta-deg</independentVar>
            <independentVar lookup="table">fcs/pitch-pos-deg</independentVar>
              <tableData breakPoint="-25">
                              -20	       -15	       -10	        -7	        -5	        -2	         0	         2	         5	         7	        10	        15	        20
                    -20	   0.02276	   0.01643	   0.01103	   0.00819	   0.00503	   0.00221	  -0.00004	  -0.00234	  -0.00524	  -0.00806	  -0.01146	  -0.01651	  -0.02287
                      0	   0.10238	   0.07843	   0.05265	   0.03617	   0.02607	   0.01062	   0.00001	  -0.01064	  -0.02603	  -0.03615	  -0.05268	  -0.07828	  -0.10245
                      8	   0.06343	   0.04747	   0.02788	   0.01900	   0.01232	   0.00850	   0.00113	  -0.01195	  -0.01206	  -0.01888	  -0.02791	  -0.04763	  -0.06322
                     16	  -0.02891	  -0.02735	  -0.02034	  -0.01307	  -0.00999	  -0.00498	   0.00068	   0.00792	   0.00980	   0.01171	   0.02060	   0.02742	   0.02932
                     28	  -0.20366	  -0.15633	  -0.10742	  -0.07636	  -0.05602	  -0.02346	  -0.00094	   0.02397	   0.05591	   0.07634	   0.10741	   0.15548	   0.20319
                     50	  -0.55577	  -0.44918	  -0.31302	  -0.23292	  -0.15652	  -0.05727	   0.00480	   0.05639	   0.15708	   0.22951	   0.31349	   0.44916	   0.55550
                     60	  -0.71552	  -0.59585	  -0.42896	  -0.31419	  -0.21620	  -0.08122	   0.00456	   0.09381	   0.21727	   0.31446	   0.42852	   0.60250	   0.72134
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              </tableData>
              <tableData breakPoint="-20">
                              -20	       -15	       -10	        -7	        -5	        -2	         0	         2	         5	         7	        10	        15	        20
                    -20	   0.04027	   0.02901	   0.02071	   0.01431	   0.01013	   0.00397	  -0.00009	  -0.00397	  -0.01015	  -0.01434	  -0.02065	  -0.02883	  -0.03996
                      0	   0.12077	   0.09490	   0.06398	   0.04524	   0.03185	   0.01203	   0.00000	  -0.01203	  -0.03179	  -0.04524	  -0.06395	  -0.09478	  -0.12088
                      8	   0.07187	   0.05709	   0.03947	   0.02917	   0.02021	   0.01324	  -0.00080	  -0.01361	  -0.02017	  -0.02932	  -0.03841	  -0.05712	  -0.07171
                     16	  -0.02014	  -0.01967	  -0.01178	  -0.00863	  -0.00898	  -0.00946	  -0.00006	   0.00863	   0.00985	   0.00843	   0.01204	   0.01941	   0.02004
                     28	  -0.19727	  -0.15049	  -0.10204	  -0.07318	  -0.05438	  -0.02342	   0.00071	   0.02206	   0.05419	   0.07350	   0.10140	   0.15037	   0.19732
                     50	  -0.56722	  -0.45719	  -0.32009	  -0.23250	  -0.15888	  -0.06244	   0.00560	   0.05737	   0.15701	   0.23209	   0.32105	   0.45763	   0.56714
                     60	  -0.73651	  -0.60626	  -0.43384	  -0.31716	  -0.22177	  -0.09858	   0.00048	   0.08858	   0.21916	   0.31659	   0.43647	   0.60565	   0.73593
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              </tableData>
              <tableData breakPoint="-15">
                              -20	       -15	       -10	        -7	        -5	        -2	         0	         2	         5	         7	        10	        15	        20
                    -20	   0.06536	   0.05152	   0.03618	   0.02478	   0.01767	   0.00575	   0.00006	  -0.00571	  -0.01744	  -0.02454	  -0.03614	  -0.05154	  -0.06550
                      0	   0.14194	   0.11147	   0.07625	   0.05425	   0.03925	   0.01515	   0.00002	  -0.01519	  -0.03924	  -0.05425	  -0.07625	  -0.11147	  -0.14200
                      8	   0.09040	   0.07099	   0.04331	   0.03173	   0.02397	   0.00340	  -0.00017	  -0.00275	  -0.02468	  -0.03134	  -0.04302	  -0.07111	  -0.09040
                     16	  -0.00785	  -0.00876	  -0.00523	  -0.00409	  -0.00409	  -0.00417	  -0.00058	   0.00427	   0.00423	   0.00408	   0.00516	   0.00875	   0.00768
                     28	  -0.19607	  -0.14764	  -0.10108	  -0.07117	  -0.05287	  -0.02161	  -0.00021	   0.02181	   0.05264	   0.07160	   0.10090	   0.14815	   0.19587
                     50	  -0.58221	  -0.47109	  -0.33654	  -0.23722	  -0.17326	  -0.06163	  -0.00350	   0.05829	   0.17288	   0.23800	   0.33536	   0.47044	   0.58434
                     60	  -0.75467	  -0.62461	  -0.44163	  -0.32280	  -0.22503	  -0.08484	   0.00131	   0.08668	   0.22673	   0.32378	   0.44355	   0.62462	   0.75487
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              </tableData>
              <tableData breakPoint="-10">
                              -20	       -15	       -10	        -7	        -5	        -2	         0	         2	         5	         7	        10	        15	        20
                    -20	   0.09017	   0.07105	   0.04901	   0.03345	   0.02360	   0.00850	  -0.00014	  -0.00853	  -0.02367	  -0.03357	  -0.04892	  -0.07082	  -0.09033
                      0	   0.15483	   0.12255	   0.08359	   0.05942	   0.04164	   0.01689	   0.00001	  -0.01690	  -0.04188	  -0.05940	  -0.08359	  -0.12256	  -0.15485
                      8	   0.10116	   0.08071	   0.05425	   0.03773	   0.02569	   0.00671	   0.00003	  -0.00671	  -0.02579	  -0.03762	  -0.05426	  -0.08078	  -0.10101
                     16	  -0.00326	  -0.00240	  -0.00187	  -0.00179	  -0.00161	  -0.00295	   0.00006	   0.00285	   0.00168	   0.00179	   0.00182	   0.00265	   0.00326
                     28	  -0.20065	  -0.15107	  -0.10194	  -0.07305	  -0.05479	  -0.02190	  -0.00268	   0.02128	   0.05441	   0.07328	   0.10143	   0.15105	   0.20049
                     50	  -0.60375	  -0.48229	  -0.34590	  -0.24366	  -0.17816	  -0.07472	   0.00166	   0.06139	   0.17777	   0.24309	   0.34640	   0.48267	   0.60376
                     60	  -0.77034	  -0.63740	  -0.45427	  -0.33396	  -0.24623	  -0.09196	  -0.00210	   0.09041	   0.24118	   0.32766	   0.45516	   0.63715	   0.77135
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              </tableData>
              <tableData breakPoint="-5">
                              -20	       -15	       -10	        -7	        -5	        -2	         0	         2	         5	         7	        10	        15	        20
                    -20	   0.11023	   0.08654	   0.06170	   0.04217	   0.02928	   0.01119	  -0.00001	  -0.01114	  -0.02933	  -0.04201	  -0.06164	  -0.08661	  -0.11025
                      0	   0.16178	   0.12838	   0.08739	   0.06111	   0.04403	   0.01780	   0.00000	  -0.01779	  -0.04403	  -0.06111	  -0.08740	  -0.12837	  -0.16177
                      8	   0.10506	   0.08310	   0.05587	   0.03907	   0.02855	   0.01013	   0.00001	  -0.01035	  -0.02851	  -0.03911	  -0.05585	  -0.08309	  -0.10498
                     16	  -0.00556	  -0.00370	  -0.00289	  -0.00131	  -0.00173	  -0.00286	   0.00006	   0.00288	   0.00177	   0.00116	   0.00290	   0.00337	   0.00560
                     28	  -0.20906	  -0.15560	  -0.10573	  -0.07738	  -0.05557	  -0.02185	  -0.00015	   0.02198	   0.05605	   0.07732	   0.10545	   0.15706	   0.20925
                     50	  -0.62159	  -0.49806	  -0.35473	  -0.26090	  -0.18472	  -0.06728	   0.00342	   0.07097	   0.18454	   0.26197	   0.35030	   0.50070	   0.62152
                     60	  -0.78969	  -0.65216	  -0.46996	  -0.33829	  -0.23535	  -0.09963	   0.00680	   0.10104	   0.23817	   0.33326	   0.46996	   0.65304	   0.79027
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              </tableData>
              <tableData breakPoint="0">
                              -20	       -15	       -10	        -7	        -5	        -2	         0	         2	         5	         7	        10	        15	        20
                    -20	   0.12537	   0.09764	   0.06973	   0.04850	   0.03458	   0.01341	  -0.00010	  -0.01358	  -0.03402	  -0.04858	  -0.06968	  -0.09762	  -0.12539
                      0	   0.16523	   0.13090	   0.08974	   0.06295	   0.04506	   0.01828	   0.00000	  -0.01827	  -0.04506	  -0.06295	  -0.08974	  -0.13088	  -0.16524
                      8	   0.10466	   0.08160	   0.05551	   0.03901	   0.02828	   0.00995	   0.00003	  -0.00991	  -0.02831	  -0.03902	  -0.05548	  -0.08161	  -0.10467
                     16	  -0.01083	  -0.00700	  -0.00551	  -0.00424	  -0.00298	  -0.00325	  -0.00004	   0.00317	   0.00323	   0.00421	   0.00552	   0.00718	   0.01085
                     28	  -0.22200	  -0.16631	  -0.11346	  -0.08096	  -0.05816	  -0.02323	   0.00036	   0.02341	   0.05783	   0.08124	   0.11306	   0.16763	   0.22211
                     50	  -0.64948	  -0.51864	  -0.36865	  -0.26889	  -0.18475	  -0.07148	  -0.00408	   0.07230	   0.19369	   0.26907	   0.36801	   0.52327	   0.64670
                     60	  -0.82689	  -0.67764	  -0.48915	  -0.34684	  -0.24400	  -0.10315	  -0.00469	   0.10523	   0.24807	   0.34834	   0.47802	   0.67720	   0.82468
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              </tableData>
              <tableData breakPoint="5">
                              -20	       -15	       -10	        -7	        -5	        -2	         0	         2	         5	         7	        10	        15	        20
                    -20	   0.13572	   0.10554	   0.07535	   0.05279	   0.03687	   0.01470	  -0.00020	  -0.01472	  -0.03692	  -0.05283	  -0.07536	  -0.10556	  -0.13572
                      0	   0.16592	   0.13142	   0.08939	   0.06306	   0.04522	   0.01819	   0.00000	  -0.01819	  -0.04522	  -0.06306	  -0.08939	  -0.13140	  -0.16591
                      8	   0.09847	   0.07851	   0.05352	   0.03774	   0.02689	   0.01105	  -0.00005	  -0.01040	  -0.02689	  -0.03773	  -0.05351	  -0.07856	  -0.09845
                     16	  -0.01947	  -0.01410	  -0.01012	  -0.00676	  -0.00422	  -0.00513	   0.00012	   0.00498	   0.00408	   0.00672	   0.00998	   0.01403	   0.01953
                     28	  -0.23733	  -0.17973	  -0.12095	  -0.08541	  -0.06160	  -0.02486	  -0.00017	   0.02474	   0.06113	   0.08676	   0.12077	   0.17944	   0.23719
                     50	  -0.66493	  -0.53492	  -0.37423	  -0.27728	  -0.19500	  -0.07495	   0.00387	   0.07228	   0.19531	   0.27642	   0.37428	   0.53207	   0.66493
                     60	  -0.83000	  -0.67982	  -0.49256	  -0.34842	  -0.25450	  -0.10498	   0.00340	   0.10367	   0.25428	   0.35534	   0.49489	   0.67960	   0.83048
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              </tableData>
              <tableData breakPoint="10">
                              -20	       -15	       -10	        -7	        -5	        -2	         0	         2	         5	         7	        10	        15	        20
                    -20	   0.14210	   0.11065	   0.07856	   0.05551	   0.03876	   0.01541	   0.00000	  -0.01536	  -0.03942	  -0.05551	  -0.07855	  -0.11065	  -0.14255
                      0	   0.16071	   0.12725	   0.08681	   0.06099	   0.04363	   0.01781	   0.00000	  -0.01780	  -0.04363	  -0.06100	  -0.08682	  -0.12725	  -0.16067
                      8	   0.08797	   0.07237	   0.04886	   0.03495	   0.02531	   0.01071	   0.00000	  -0.01069	  -0.02562	  -0.03494	  -0.04885	  -0.07235	  -0.08794
                     16	  -0.03222	  -0.02464	  -0.01768	  -0.01237	  -0.00841	  -0.00437	  -0.00004	   0.00434	   0.00868	   0.01212	   0.01747	   0.02483	   0.03223
                     28	  -0.25389	  -0.19194	  -0.12771	  -0.09330	  -0.06526	  -0.02588	  -0.00068	   0.02592	   0.06487	   0.09241	   0.12962	   0.19325	   0.25344
                     50	  -0.67301	  -0.53997	  -0.38034	  -0.27787	  -0.19745	  -0.07665	  -0.00001	   0.07201	   0.19725	   0.28009	   0.38045	   0.54519	   0.67112
                     60	  -0.82993	  -0.68342	  -0.48938	  -0.34458	  -0.25105	  -0.10660	  -0.00214	   0.10534	   0.25190	   0.34744	   0.48870	   0.68428	   0.82951
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              </tableData>
              <tableData breakPoint="15">
                              -20	       -15	       -10	        -7	        -5	        -2	         0	         2	         5	         7	        10	        15	        20
                    -20	   0.14468	   0.11325	   0.08098	   0.05594	   0.03882	   0.01583	  -0.00006	  -0.01585	  -0.03963	  -0.05597	  -0.08101	  -0.11325	  -0.14510
                      0	   0.15259	   0.12153	   0.08258	   0.05850	   0.04153	   0.01731	   0.00001	  -0.01731	  -0.04153	  -0.05851	  -0.08258	  -0.12155	  -0.15259
                      8	   0.07693	   0.06380	   0.04220	   0.03046	   0.02204	   0.00870	  -0.00001	  -0.00874	  -0.02206	  -0.03011	  -0.04218	  -0.06381	  -0.07696
                     16	  -0.04749	  -0.03715	  -0.02530	  -0.01781	  -0.01372	  -0.00605	   0.00031	   0.00649	   0.01324	   0.01800	   0.02500	   0.03704	   0.04795
                     28	  -0.26582	  -0.20733	  -0.14301	  -0.10141	  -0.06983	  -0.02816	  -0.00118	   0.02790	   0.07079	   0.10166	   0.14106	   0.20691	   0.26578
                     50	  -0.67526	  -0.54892	  -0.38424	  -0.28088	  -0.20453	  -0.08049	   0.00152	   0.08328	   0.20303	   0.28112	   0.38725	   0.54703	   0.67529
                     60	  -0.82596	  -0.67583	  -0.47757	  -0.34982	  -0.25671	  -0.11664	   0.00359	   0.11552	   0.25744	   0.34667	   0.47412	   0.67726	   0.82262
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              </tableData>
          </table>
    </function>
    <function name="aero/c/CFYDSPL">
    <description>SIDEFORCE DUE TO SPOILERS LEFT</description>
          <table>
            <independentVar lookup="row">aero/alpha-deg</independentVar>
            <independentVar lookup="column">aero/beta-deg</independentVar>
            <independentVar lookup="table">fcs/spoiler-left-deg</independentVar>
              <tableData breakPoint="0">
                              -20	       -15	       -10	        -7	        -5	        -2	         0	         2	         5	         7	        10	        15	        20
                    -20	   0.00000	   0.00000	   0.00000	   0.00000	   0.00000	   0.00000	   0.00000	   0.00000	   0.00000	   0.00000	   0.00000	   0.00000	   0.00000
                      0	   0.00000	   0.00000	   0.00000	   0.00000	   0.00000	   0.00000	   0.00000	   0.00000	   0.00000	   0.00000	   0.00000	   0.00000	   0.00000
                      8	   0.00000	   0.00000	   0.00000	   0.00000	   0.00000	   0.00000	   0.00000	   0.00000	   0.00000	   0.00000	   0.00000	   0.00000	   0.00000
                     16	   0.00000	   0.00000	   0.00000	   0.00000	   0.00000	   0.00000	   0.00000	   0.00000	   0.00000	   0.00000	   0.00000	   0.00000	   0.00000
                     28	   0.00000	   0.00000	   0.00000	   0.00000	   0.00000	   0.00000	   0.00000	   0.00000	   0.00000	   0.00000	   0.00000	   0.00000	   0.00000
                     50	   0.00000	   0.00000	   0.00000	   0.00000	   0.00000	   0.00000	   0.00000	   0.00000	   0.00000	   0.00000	   0.00000	   0.00000	   0.00000
                     60	   0.00000	   0.00000	   0.00000	   0.00000	   0.00000	   0.00000	   0.00000	   0.00000	   0.00000	   0.00000	   0.00000	   0.00000	   0.00000
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              </tableData>
              <tableData breakPoint="20">
                              -20	       -15	       -10	        -7	        -5	        -2	         0	         2	         5	         7	        10	        15	        20
                    -20	  -0.01349	  -0.01864	  -0.02222	  -0.02479	  -0.02631	  -0.02681	  -0.02724	  -0.02856	  -0.02886	  -0.03031	  -0.02908	  -0.02853	  -0.02657
                      0	  -0.02495	  -0.02688	  -0.02764	  -0.02619	  -0.02659	  -0.02565	  -0.02620	  -0.02574	  -0.02495	  -0.02448	  -0.02253	  -0.02068	  -0.01699
                      8	  -0.02277	  -0.02480	  -0.02553	  -0.02717	  -0.02665	  -0.02464	  -0.02285	  -0.02203	  -0.02060	  -0.01998	  -0.01758	  -0.01491	  -0.01408
                     16	  -0.02178	  -0.02194	  -0.02230	  -0.02328	  -0.02234	  -0.02141	  -0.02075	  -0.01817	  -0.01670	  -0.01568	  -0.01377	  -0.00953	  -0.00530
                     28	   0.01505	   0.01233	   0.01402	   0.00724	   0.00470	   0.00342	   0.00666	   0.00377	  -0.00164	  -0.00003	  -0.00585	  -0.00112	   0.00304
                     50	   0.01040	   0.01614	   0.00773	   0.01073	   0.01254	   0.01503	   0.01429	   0.00321	   0.00697	   0.01322	   0.01307	   0.01081	   0.01282
                     60	   0.00360	   0.00633	   0.00365	   0.00810	   0.01545	   0.00741	   0.00948	   0.01107	   0.00466	   0.01297	   0.01597	   0.00717	   0.01252
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              </tableData>
              <tableData breakPoint="50">
                              -20	       -15	       -10	        -7	        -5	        -2	         0	         2	         5	         7	        10	        15	        20
                    -20	  -0.01775	  -0.02614	  -0.03148	  -0.03824	  -0.04047	  -0.04417	  -0.04552	  -0.04699	  -0.04856	  -0.05029	  -0.04864	  -0.04880	  -0.04566
                      0	  -0.04164	  -0.04472	  -0.04653	  -0.04529	  -0.04528	  -0.04468	  -0.04638	  -0.04580	  -0.04487	  -0.04427	  -0.04187	  -0.03874	  -0.03340
                      8	  -0.03573	  -0.04193	  -0.04603	  -0.04775	  -0.04659	  -0.04414	  -0.04177	  -0.04018	  -0.03913	  -0.03765	  -0.03455	  -0.03002	  -0.02743
                     16	  -0.03823	  -0.03745	  -0.04041	  -0.04305	  -0.04231	  -0.03931	  -0.03803	  -0.03387	  -0.03161	  -0.03066	  -0.02740	  -0.02176	  -0.01381
                     28	   0.00985	   0.00916	   0.00768	   0.00062	  -0.00373	  -0.00655	  -0.00329	  -0.00477	  -0.00899	  -0.00881	  -0.01150	  -0.00610	   0.00039
                     50	   0.02224	   0.03510	   0.02938	   0.03396	   0.02733	   0.03777	   0.02422	   0.01995	   0.01531	   0.02263	   0.01584	   0.01553	   0.02220
                     60	   0.01027	   0.01423	   0.00529	   0.02804	   0.02388	   0.02153	   0.01142	   0.02101	   0.01388	   0.01269	   0.02681	   0.01938	   0.02410
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              </tableData>
          </table>
    </function>
    <function name="aero/c/CFYDSPR">
    <description>SIDEFORCE DUE TO SPOILERS RIGHT</description>
          <table>
            <independentVar lookup="row">aero/alpha-deg</independentVar>
            <independentVar lookup="column">aero/beta-deg</independentVar>
            <independentVar lookup="table">fcs/spoiler-right-deg</independentVar>
              <tableData breakPoint="0">
                              -20	       -15	       -10	        -7	        -5	        -2	         0	         2	         5	         7	        10	        15	        20
                    -20	   0.00000	   0.00000	   0.00000	   0.00000	   0.00000	   0.00000	   0.00000	   0.00000	   0.00000	   0.00000	   0.00000	   0.00000	   0.00000
                      0	   0.00000	   0.00000	   0.00000	   0.00000	   0.00000	   0.00000	   0.00000	   0.00000	   0.00000	   0.00000	   0.00000	   0.00000	   0.00000
                      8	   0.00000	   0.00000	   0.00000	   0.00000	   0.00000	   0.00000	   0.00000	   0.00000	   0.00000	   0.00000	   0.00000	   0.00000	   0.00000
                     16	   0.00000	   0.00000	   0.00000	   0.00000	   0.00000	   0.00000	   0.00000	   0.00000	   0.00000	   0.00000	   0.00000	   0.00000	   0.00000
                     28	   0.00000	   0.00000	   0.00000	   0.00000	   0.00000	   0.00000	   0.00000	   0.00000	   0.00000	   0.00000	   0.00000	   0.00000	   0.00000
                     50	   0.00000	   0.00000	   0.00000	   0.00000	   0.00000	   0.00000	   0.00000	   0.00000	   0.00000	   0.00000	   0.00000	   0.00000	   0.00000
                     60	   0.00000	   0.00000	   0.00000	   0.00000	   0.00000	   0.00000	   0.00000	   0.00000	   0.00000	   0.00000	   0.00000	   0.00000	   0.00000
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              </tableData>
              <tableData breakPoint="20">
                              -20	       -15	       -10	        -7	        -5	        -2	         0	         2	         5	         7	        10	        15	        20
                    -20	   0.01349	   0.01864	   0.02222	   0.02479	   0.02631	   0.02681	   0.02724	   0.02856	   0.02886	   0.03031	   0.02908	   0.02853	   0.02657
                      0	   0.02495	   0.02688	   0.02764	   0.02619	   0.02659	   0.02565	   0.02620	   0.02574	   0.02495	   0.02448	   0.02253	   0.02068	   0.01699
                      8	   0.02277	   0.02480	   0.02553	   0.02717	   0.02665	   0.02464	   0.02285	   0.02203	   0.02060	   0.01998	   0.01758	   0.01491	   0.01408
                     16	   0.02178	   0.02194	   0.02230	   0.02328	   0.02234	   0.02141	   0.02075	   0.01817	   0.01670	   0.01568	   0.01377	   0.00953	   0.00530
                     28	  -0.01505	  -0.01233	  -0.01402	  -0.00724	  -0.00470	  -0.00342	  -0.00666	  -0.00377	   0.00164	   0.00003	   0.00585	   0.00112	  -0.00304
                     50	  -0.01040	  -0.01614	  -0.00773	  -0.01073	  -0.01254	  -0.01503	  -0.01429	  -0.00321	  -0.00697	  -0.01322	  -0.01307	  -0.01081	  -0.01282
                     60	  -0.00360	  -0.00633	  -0.00365	  -0.00810	  -0.01545	  -0.00741	  -0.00948	  -0.01107	  -0.00466	  -0.01297	  -0.01597	  -0.00717	  -0.01252
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              </tableData>
              <tableData breakPoint="50">
                              -20	       -15	       -10	        -7	        -5	        -2	         0	         2	         5	         7	        10	        15	        20
                    -20	   0.01775	   0.02614	   0.03148	   0.03824	   0.04047	   0.04417	   0.04552	   0.04699	   0.04856	   0.05029	   0.04864	   0.04880	   0.04566
                      0	   0.04164	   0.04472	   0.04653	   0.04529	   0.04528	   0.04468	   0.04638	   0.04580	   0.04487	   0.04427	   0.04187	   0.03874	   0.03340
                      8	   0.03573	   0.04193	   0.04603	   0.04775	   0.04659	   0.04414	   0.04177	   0.04018	   0.03913	   0.03765	   0.03455	   0.03002	   0.02743
                     16	   0.03823	   0.03745	   0.04041	   0.04305	   0.04231	   0.03931	   0.03803	   0.03387	   0.03161	   0.03066	   0.02740	   0.02176	   0.01381
                     28	  -0.00985	  -0.00916	  -0.00768	  -0.00062	   0.00373	   0.00655	   0.00329	   0.00477	   0.00899	   0.00881	   0.01150	   0.00610	  -0.00039
                     50	  -0.02224	  -0.03510	  -0.02938	  -0.03396	  -0.02733	  -0.03777	  -0.02422	  -0.01995	  -0.01531	  -0.02263	  -0.01584	  -0.01553	  -0.02220
                     60	  -0.01027	  -0.01423	  -0.00529	  -0.02804	  -0.02388	  -0.02153	  -0.01142	  -0.02101	  -0.01388	  -0.01269	  -0.02681	  -0.01938	  -0.02410
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              </tableData>
          </table>
    </function>
    <function name="aero/c/CFYDTD">
    <description>SIDE FORCE DUE TO DIFFERENTIAL TAIL DEFLECTION</description>
    <product>
          <property>fcs/differential-elevator-pos-deg</property>
          <table>
            <independentVar lookup="row">aero/alpha-deg</independentVar>
            <independentVar lookup="column">fcs/pitch-pos-deg</independentVar>
            <tableData>
                                -25	        -20	        -15	        -10	         -5	          0	          5	         10	         15
                    -20	  -0.01341	  -0.01775	  -0.01973	  -0.02109	  -0.02193	  -0.02207	  -0.02155	  -0.01852	  -0.01058
                      0	  -0.01310	  -0.01775	  -0.01981	  -0.01994	  -0.02033	  -0.02092	  -0.01921	  -0.01780	  -0.01240
                      8	  -0.01490	  -0.01599	  -0.01918	  -0.01969	  -0.02089	  -0.02152	  -0.02259	  -0.01625	  -0.01330
                     16	  -0.01360	  -0.01556	  -0.01795	  -0.01947	  -0.02075	  -0.02166	  -0.02104	  -0.02261	  -0.02381
                     28	  -0.01573	  -0.01698	  -0.01842	  -0.02231	  -0.02320	  -0.02503	  -0.02413	  -0.02373	  -0.02229
                     50	  -0.00953	  -0.00612	  -0.01774	  -0.01630	  -0.01770	  -0.02203	  -0.02921	  -0.01925	  -0.02331
                     60	  -0.00526	  -0.00061	  -0.01749	  -0.00851	  -0.01735	  -0.02895	  -0.03540	  -0.02814	  -0.02170
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            </tableData>
          </table>
       </product>
    </function>
    <function name="aero/c/CFYGEAR">
    <description>SIDEFORCE DUE TO GEAR</description>
    <product>
          <property>gear/gear-pos-norm</property>
          <property>aero/beta-deg</property>
          <table>
            <independentVar lookup="row">aero/alpha-deg</independentVar>
            <tableData>
                    -20		  -0.00326
                    -10		  -0.00352
                      2		  -0.00348
                     10		  -0.00328
                     18		  -0.00301
                     30		  -0.00244
                     55		   0.00024
                     60		  -0.00155
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            </tableData>
          </table>
       </product>
    </function>
    <function name="aero/c/CFYMN">
    <description>SIDEFORCE DUE TO MACH</description>
          <table>
            <independentVar lookup="row">velocities/mach</independentVar>
            <independentVar lookup="column">aero/alpha-deg</independentVar>
            <tableData>
                                -10	         -5	         -2	       0.01	          1	          2	          6	          7	         10
                    0.2	   0.00000	   0.00000	   0.00000	   0.00000	   0.00002	   0.00001	  -0.00002	   0.00003	   0.00003
                    0.8	  -0.00001	   0.00000	   0.00008	  -0.00001	   0.00002	   0.00000	  -0.00009	   0.00004	   0.00009
                   0.91	   0.00005	   0.00000	   0.00000	   0.00000	   0.00002	   0.00002	  -0.00002	   0.00009	   0.00003
                   0.99	  -0.00001	   0.00000	   0.00000	   0.00000	   0.00002	   0.00001	  -0.00004	   0.00002	   0.00006
                      2	   0.02860	   0.00625	   0.00142	   0.00029	   0.00010	   0.00000	  -0.00112	  -0.00195	  -0.00754
                    2.4	   0.01414	   0.00351	   0.00093	   0.00023	   0.00011	   0.00004	  -0.00005	  -0.00014	  -0.00140
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            </tableData>
          </table>
    </function>
    <function name="aero/c/CFYP">
    <description>SIDE FORCE DERIVATIVE MOMENT DUE TO ROLL RATE</description>
    <product>
          <property>aero/pb</property>
          <table>
            <independentVar lookup="row">aero/alpha-deg</independentVar>
            <independentVar lookup="column">aero/beta-deg</independentVar>
            <tableData>
                                -20	        -15	        -10	         -7	         -5	         -2	          0	          2	          5	          7	         10	         15	         20
                    -20	   0.19152	   0.22281	   0.23473	   0.21483	   0.21702	   0.23339	   0.22573	   0.22173	   0.21935	   0.19946	   0.20977	   0.18330	   0.18776
                      0	   0.23641	   0.24650	   0.24810	   0.25646	   0.26212	   0.25615	   0.26052	   0.26153	   0.25849	   0.26119	   0.25818	   0.24052	   0.20983
                      8	   0.23304	   0.28224	   0.31170	   0.29310	   0.39548	   0.36052	   0.32962	   0.30290	   0.32359	   0.30911	   0.29838	   0.29810	   0.31550
                     16	   0.24522	   0.30267	   0.34232	   0.36826	   0.40286	   0.42936	   0.41744	   0.37196	   0.35495	   0.38051	   0.34632	   0.30396	   0.21428
                     28	   0.15316	   0.25153	   0.24109	   0.28138	   0.32226	   0.29999	   0.33989	   0.31316	   0.33282	   0.28795	   0.30691	   0.23650	   0.16321
                     50	   0.42275	   0.51872	   0.58417	   0.86013	   0.79151	   0.72900	   0.56459	   0.69905	   1.05490	   0.74222	   0.68236	   0.41354	   0.33847
                     60	   0.40070	   0.43270	   0.83334	   0.62427	   0.65900	   0.73421	   0.62611	   0.75235	   0.66219	   0.63553	   0.78907	   0.66492	   0.61371
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            </tableData>
          </table>
       </product>
    </function>
    <function name="aero/c/CFYR">
    <description>SIDE FORCE DERIVATIVE MOMENT DUE TO YAW RATE</description>
    <product>
          <property>aero/rb</property>
          <table>
            <independentVar lookup="row">aero/alpha-deg</independentVar>
            <independentVar lookup="column">aero/beta-deg</independentVar>
            <tableData>
                                -20	        -15	        -10	         -7	         -5	         -2	          0	          2	          5	          7	         10	         15	         20
                    -20	   0.88435	   1.03067	   1.07563	   1.10246	   1.05753	   1.02702	   1.01433	   1.00918	   1.02362	   1.06578	   1.00269	   0.90182	   0.96781
                      0	   0.70742	   0.72987	   0.75334	   0.73259	   0.73474	   0.70821	   0.69661	   0.72042	   0.70372	   0.70310	   0.73537	   0.73271	   0.67622
                      8	   0.50317	   0.57428	   0.64186	   0.61615	   0.58695	   0.59110	   0.50191	   0.54321	   0.56693	   0.56429	   0.52009	   0.56835	   0.63534
                     16	   0.45794	   0.38762	   0.46726	   0.45257	   0.44032	   0.48640	   0.38598	   0.35278	   0.44338	   0.41799	   0.43237	   0.43089	   0.41208
                     28	   0.12593	   0.16558	   0.29225	   0.25809	   0.26688	   0.32129	   0.32019	   0.30955	   0.27780	   0.25385	   0.30370	   0.25630	   0.21504
                     50	   0.11651	  -0.03407	   0.16290	   0.20011	   0.16632	   0.10444	   0.01618	   0.16311	   0.16752	   0.35793	   0.25775	   0.02748	   0.02326
                     60	   0.22216	  -0.12222	  -0.10126	  -0.11948	  -0.18942	  -0.07213	  -0.22592	   0.06455	   0.08218	  -0.22210	   0.09503	  -0.14916	   0.15508
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            </tableData>
          </table>
       </product>
    </function>
    <function name="aero/c/CFYTANKC">
    <description>SIDEFORCE INCREMENT DUE TO CENTRE TANK</description>
    <product>
          <property>inertia/tank-centre-fitted</property>
          <table>
            <independentVar lookup="row">aero/alpha-deg</independentVar>
            <independentVar lookup="column">aero/beta-deg</independentVar>
            <independentVar lookup="table">fcs/pitch-pos-deg</independentVar>
              <tableData breakPoint="-25">
                              -20	       -15	       -10	        -7	        -5	        -2	         0	         2	         5	         7	        10	        15	        20
                    -20	   0.00211	   0.00151	   0.00089	   0.00067	   0.00119	   0.00014	   0.00000	  -0.00023	  -0.00121	  -0.00066	  -0.00092	  -0.00137	  -0.00221
                      0	  -0.00017	  -0.00021	  -0.00013	  -0.00010	  -0.00007	  -0.00004	   0.00000	   0.00004	   0.00007	   0.00010	   0.00014	   0.00017	   0.00025
                      8	  -0.00103	  -0.00106	  -0.00069	  -0.00057	  -0.00029	  -0.00055	  -0.00003	   0.00014	   0.00030	   0.00049	   0.00069	   0.00113	   0.00061
                     16	  -0.00235	  -0.00151	  -0.00160	  -0.00105	  -0.00080	  -0.00051	   0.00003	   0.00038	   0.00091	   0.00000	   0.00124	   0.00196	   0.00232
                     28	  -0.00352	  -0.00282	  -0.00610	  -0.00103	  -0.00142	  -0.00072	  -0.00242	   0.00150	   0.00136	   0.00076	   0.00234	   0.00274	   0.00321
                     50	  -0.00680	  -0.01069	   0.00148	  -0.00578	   0.00421	  -0.00077	  -0.00152	  -0.00033	  -0.00648	   0.00342	  -0.00162	   0.00649	   0.00659
                     60	  -0.00897	  -0.00290	  -0.00361	  -0.00030	  -0.01050	  -0.00002	  -0.00044	   0.00016	   0.00962	   0.00167	   0.00286	   0.00327	   0.00987
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              </tableData>
              <tableData breakPoint="-20">
                              -20	       -15	       -10	        -7	        -5	        -2	         0	         2	         5	         7	        10	        15	        20
                    -20	   0.00211	   0.00151	   0.00089	   0.00067	   0.00119	   0.00014	   0.00000	  -0.00023	  -0.00121	  -0.00066	  -0.00092	  -0.00137	  -0.00221
                      0	  -0.00017	  -0.00021	  -0.00013	  -0.00010	  -0.00007	  -0.00004	   0.00000	   0.00004	   0.00007	   0.00010	   0.00014	   0.00017	   0.00025
                      8	  -0.00103	  -0.00106	  -0.00069	  -0.00057	  -0.00029	  -0.00055	  -0.00003	   0.00014	   0.00030	   0.00049	   0.00069	   0.00113	   0.00061
                     16	  -0.00235	  -0.00151	  -0.00160	  -0.00105	  -0.00080	  -0.00051	   0.00003	   0.00038	   0.00091	   0.00000	   0.00124	   0.00196	   0.00232
                     28	  -0.00352	  -0.00282	  -0.00610	  -0.00103	  -0.00142	  -0.00072	  -0.00242	   0.00150	   0.00136	   0.00076	   0.00234	   0.00274	   0.00321
                     50	  -0.00680	  -0.01069	   0.00148	  -0.00578	   0.00421	  -0.00077	  -0.00152	  -0.00033	  -0.00648	   0.00342	  -0.00162	   0.00649	   0.00659
                     60	  -0.00897	  -0.00290	  -0.00361	  -0.00030	  -0.01050	  -0.00002	  -0.00044	   0.00016	   0.00962	   0.00167	   0.00286	   0.00327	   0.00987
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              </tableData>
              <tableData breakPoint="-15">
                              -20	       -15	       -10	        -7	        -5	        -2	         0	         2	         5	         7	        10	        15	        20
                    -20	   0.00211	   0.00151	   0.00089	   0.00067	   0.00119	   0.00014	   0.00000	  -0.00023	  -0.00121	  -0.00066	  -0.00092	  -0.00137	  -0.00221
                      0	  -0.00017	  -0.00021	  -0.00013	  -0.00010	  -0.00007	  -0.00004	   0.00000	   0.00004	   0.00007	   0.00010	   0.00014	   0.00017	   0.00025
                      8	  -0.00103	  -0.00106	  -0.00069	  -0.00057	  -0.00029	  -0.00055	  -0.00003	   0.00014	   0.00030	   0.00049	   0.00069	   0.00113	   0.00061
                     16	  -0.00235	  -0.00151	  -0.00160	  -0.00105	  -0.00080	  -0.00051	   0.00003	   0.00038	   0.00091	   0.00000	   0.00124	   0.00196	   0.00232
                     28	  -0.00352	  -0.00282	  -0.00610	  -0.00103	  -0.00142	  -0.00072	  -0.00242	   0.00150	   0.00136	   0.00076	   0.00234	   0.00274	   0.00321
                     50	  -0.00680	  -0.01069	   0.00148	  -0.00578	   0.00421	  -0.00077	  -0.00152	  -0.00033	  -0.00648	   0.00342	  -0.00162	   0.00649	   0.00659
                     60	  -0.00897	  -0.00290	  -0.00361	  -0.00030	  -0.01050	  -0.00002	  -0.00044	   0.00016	   0.00962	   0.00167	   0.00286	   0.00327	   0.00987
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              </tableData>
              <tableData breakPoint="-10">
                              -20	       -15	       -10	        -7	        -5	        -2	         0	         2	         5	         7	        10	        15	        20
                    -20	   0.00211	   0.00151	   0.00089	   0.00067	   0.00119	   0.00014	   0.00000	  -0.00023	  -0.00121	  -0.00066	  -0.00092	  -0.00137	  -0.00221
                      0	  -0.00017	  -0.00021	  -0.00013	  -0.00010	  -0.00007	  -0.00004	   0.00000	   0.00004	   0.00007	   0.00010	   0.00014	   0.00017	   0.00025
                      8	  -0.00103	  -0.00106	  -0.00069	  -0.00057	  -0.00029	  -0.00055	  -0.00003	   0.00014	   0.00030	   0.00049	   0.00069	   0.00113	   0.00061
                     16	  -0.00235	  -0.00151	  -0.00160	  -0.00105	  -0.00080	  -0.00051	   0.00003	   0.00038	   0.00091	   0.00000	   0.00124	   0.00196	   0.00232
                     28	  -0.00352	  -0.00282	  -0.00610	  -0.00103	  -0.00142	  -0.00072	  -0.00242	   0.00150	   0.00136	   0.00076	   0.00234	   0.00274	   0.00321
                     50	  -0.00680	  -0.01069	   0.00148	  -0.00578	   0.00421	  -0.00077	  -0.00152	  -0.00033	  -0.00648	   0.00342	  -0.00162	   0.00649	   0.00659
                     60	  -0.00897	  -0.00290	  -0.00361	  -0.00030	  -0.01050	  -0.00002	  -0.00044	   0.00016	   0.00962	   0.00167	   0.00286	   0.00327	   0.00987
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              </tableData>
              <tableData breakPoint="-5">
                              -20	       -15	       -10	        -7	        -5	        -2	         0	         2	         5	         7	        10	        15	        20
                    -20	   0.00211	   0.00151	   0.00089	   0.00067	   0.00119	   0.00014	   0.00000	  -0.00023	  -0.00121	  -0.00066	  -0.00092	  -0.00137	  -0.00221
                      0	  -0.00017	  -0.00021	  -0.00013	  -0.00010	  -0.00007	  -0.00004	   0.00000	   0.00004	   0.00007	   0.00010	   0.00014	   0.00017	   0.00025
                      8	  -0.00103	  -0.00106	  -0.00069	  -0.00057	  -0.00029	  -0.00055	  -0.00003	   0.00014	   0.00030	   0.00049	   0.00069	   0.00113	   0.00061
                     16	  -0.00235	  -0.00151	  -0.00160	  -0.00105	  -0.00080	  -0.00051	   0.00003	   0.00038	   0.00091	   0.00000	   0.00124	   0.00196	   0.00232
                     28	  -0.00352	  -0.00282	  -0.00610	  -0.00103	  -0.00142	  -0.00072	  -0.00242	   0.00150	   0.00136	   0.00076	   0.00234	   0.00274	   0.00321
                     50	  -0.00680	  -0.01069	   0.00148	  -0.00578	   0.00421	  -0.00077	  -0.00152	  -0.00033	  -0.00648	   0.00342	  -0.00162	   0.00649	   0.00659
                     60	  -0.00897	  -0.00290	  -0.00361	  -0.00030	  -0.01050	  -0.00002	  -0.00044	   0.00016	   0.00962	   0.00167	   0.00286	   0.00327	   0.00987
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              </tableData>
              <tableData breakPoint="0">
                              -20	       -15	       -10	        -7	        -5	        -2	         0	         2	         5	         7	        10	        15	        20
                    -20	   0.00211	   0.00151	   0.00089	   0.00067	   0.00119	   0.00014	   0.00000	  -0.00023	  -0.00121	  -0.00066	  -0.00092	  -0.00137	  -0.00221
                      0	  -0.00017	  -0.00021	  -0.00013	  -0.00010	  -0.00007	  -0.00004	   0.00000	   0.00004	   0.00007	   0.00010	   0.00014	   0.00017	   0.00025
                      8	  -0.00103	  -0.00106	  -0.00069	  -0.00057	  -0.00029	  -0.00055	  -0.00003	   0.00014	   0.00030	   0.00049	   0.00069	   0.00113	   0.00061
                     16	  -0.00235	  -0.00151	  -0.00160	  -0.00105	  -0.00080	  -0.00051	   0.00003	   0.00038	   0.00091	   0.00000	   0.00124	   0.00196	   0.00232
                     28	  -0.00352	  -0.00282	  -0.00610	  -0.00103	  -0.00142	  -0.00072	  -0.00242	   0.00150	   0.00136	   0.00076	   0.00234	   0.00274	   0.00321
                     50	  -0.00680	  -0.01069	   0.00148	  -0.00578	   0.00421	  -0.00077	  -0.00152	  -0.00033	  -0.00648	   0.00342	  -0.00162	   0.00649	   0.00659
                     60	  -0.00897	  -0.00290	  -0.00361	  -0.00030	  -0.01050	  -0.00002	  -0.00044	   0.00016	   0.00962	   0.00167	   0.00286	   0.00327	   0.00987
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              </tableData>
              <tableData breakPoint="5">
                              -20	       -15	       -10	        -7	        -5	        -2	         0	         2	         5	         7	        10	        15	        20
                    -20	   0.00211	   0.00151	   0.00089	   0.00067	   0.00119	   0.00014	   0.00000	  -0.00023	  -0.00121	  -0.00066	  -0.00092	  -0.00137	  -0.00221
                      0	  -0.00017	  -0.00021	  -0.00013	  -0.00010	  -0.00007	  -0.00004	   0.00000	   0.00004	   0.00007	   0.00010	   0.00014	   0.00017	   0.00025
                      8	  -0.00103	  -0.00106	  -0.00069	  -0.00057	  -0.00029	  -0.00055	  -0.00003	   0.00014	   0.00030	   0.00049	   0.00069	   0.00113	   0.00061
                     16	  -0.00235	  -0.00151	  -0.00160	  -0.00105	  -0.00080	  -0.00051	   0.00003	   0.00038	   0.00091	   0.00000	   0.00124	   0.00196	   0.00232
                     28	  -0.00352	  -0.00282	  -0.00610	  -0.00103	  -0.00142	  -0.00072	  -0.00242	   0.00150	   0.00136	   0.00076	   0.00234	   0.00274	   0.00321
                     50	  -0.00680	  -0.01069	   0.00148	  -0.00578	   0.00421	  -0.00077	  -0.00152	  -0.00033	  -0.00648	   0.00342	  -0.00162	   0.00649	   0.00659
                     60	  -0.00897	  -0.00290	  -0.00361	  -0.00030	  -0.01050	  -0.00002	  -0.00044	   0.00016	   0.00962	   0.00167	   0.00286	   0.00327	   0.00987
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              </tableData>
              <tableData breakPoint="10">
                              -20	       -15	       -10	        -7	        -5	        -2	         0	         2	         5	         7	        10	        15	        20
                    -20	   0.00211	   0.00151	   0.00089	   0.00067	   0.00119	   0.00014	   0.00000	  -0.00023	  -0.00121	  -0.00066	  -0.00092	  -0.00137	  -0.00221
                      0	  -0.00017	  -0.00021	  -0.00013	  -0.00010	  -0.00007	  -0.00004	   0.00000	   0.00004	   0.00007	   0.00010	   0.00014	   0.00017	   0.00025
                      8	  -0.00103	  -0.00106	  -0.00069	  -0.00057	  -0.00029	  -0.00055	  -0.00003	   0.00014	   0.00030	   0.00049	   0.00069	   0.00113	   0.00061
                     16	  -0.00235	  -0.00151	  -0.00160	  -0.00105	  -0.00080	  -0.00051	   0.00003	   0.00038	   0.00091	   0.00000	   0.00124	   0.00196	   0.00232
                     28	  -0.00352	  -0.00282	  -0.00610	  -0.00103	  -0.00142	  -0.00072	  -0.00242	   0.00150	   0.00136	   0.00076	   0.00234	   0.00274	   0.00321
                     50	  -0.00680	  -0.01069	   0.00148	  -0.00578	   0.00421	  -0.00077	  -0.00152	  -0.00033	  -0.00648	   0.00342	  -0.00162	   0.00649	   0.00659
                     60	  -0.00897	  -0.00290	  -0.00361	  -0.00030	  -0.01050	  -0.00002	  -0.00044	   0.00016	   0.00962	   0.00167	   0.00286	   0.00327	   0.00987
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              </tableData>
              <tableData breakPoint="15">
                              -20	       -15	       -10	        -7	        -5	        -2	         0	         2	         5	         7	        10	        15	        20
                    -20	   0.00211	   0.00151	   0.00089	   0.00067	   0.00119	   0.00014	   0.00000	  -0.00023	  -0.00121	  -0.00066	  -0.00092	  -0.00137	  -0.00221
                      0	  -0.00017	  -0.00021	  -0.00013	  -0.00010	  -0.00007	  -0.00004	   0.00000	   0.00004	   0.00007	   0.00010	   0.00014	   0.00017	   0.00025
                      8	  -0.00103	  -0.00106	  -0.00069	  -0.00057	  -0.00029	  -0.00055	  -0.00003	   0.00014	   0.00030	   0.00049	   0.00069	   0.00113	   0.00061
                     16	  -0.00235	  -0.00151	  -0.00160	  -0.00105	  -0.00080	  -0.00051	   0.00003	   0.00038	   0.00091	   0.00000	   0.00124	   0.00196	   0.00232
                     28	  -0.00352	  -0.00282	  -0.00610	  -0.00103	  -0.00142	  -0.00072	  -0.00242	   0.00150	   0.00136	   0.00076	   0.00234	   0.00274	   0.00321
                     50	  -0.00680	  -0.01069	   0.00148	  -0.00578	   0.00421	  -0.00077	  -0.00152	  -0.00033	  -0.00648	   0.00342	  -0.00162	   0.00649	   0.00659
                     60	  -0.00897	  -0.00290	  -0.00361	  -0.00030	  -0.01050	  -0.00002	  -0.00044	   0.00016	   0.00962	   0.00167	   0.00286	   0.00327	   0.00987
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              </tableData>
          </table>
       </product>
    </function>
    <function name="aero/c/CFYTANKL">
    <description>SIDEFORCE INCREMENT DUE TO LEFT WING TANK</description>
    <product>
          <property>inertia/tank-wing-left-fitted</property>
          <table>
            <independentVar lookup="row">aero/alpha-deg</independentVar>
            <independentVar lookup="column">aero/beta-deg</independentVar>
            <independentVar lookup="table">fcs/pitch-pos-deg</independentVar>
              <tableData breakPoint="-25">
                              -20	       -15	       -10	        -7	        -5	        -2	         0	         2	         5	         7	        10	        15	        20
                    -20	  -0.10265	  -0.08142	  -0.05826	  -0.04041	  -0.02899	  -0.01121	   0.00003	   0.01135	   0.02880	   0.04027	   0.05836	   0.08119	   0.10255
                      0	  -0.06290	  -0.05246	  -0.03709	  -0.02679	  -0.01900	  -0.00766	   0.00000	   0.00764	   0.01896	   0.02680	   0.03704	   0.05260	   0.06284
                      8	  -0.04133	  -0.03354	  -0.02749	  -0.02013	  -0.01626	  -0.00120	   0.00120	  -0.00232	   0.01643	   0.01994	   0.02752	   0.03413	   0.04154
                     16	  -0.01810	  -0.02010	  -0.01505	  -0.00830	  -0.00663	  -0.00408	   0.00026	   0.00262	   0.00687	   0.00801	   0.01504	   0.02200	   0.01872
                     28	   0.01849	   0.01082	   0.00277	   0.00631	   0.00221	  -0.00025	  -0.00168	  -0.00013	  -0.00181	  -0.00599	  -0.00457	  -0.01190	  -0.01886
                     50	   0.09449	   0.06882	   0.05725	   0.03836	   0.03885	   0.01286	  -0.00045	  -0.01130	  -0.03776	  -0.03640	  -0.05749	  -0.07405	  -0.09541
                     60	   0.10516	   0.08012	   0.05818	   0.03312	   0.03388	   0.01399	  -0.00137	  -0.01469	  -0.03313	  -0.03482	  -0.05906	  -0.08199	  -0.10538
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              </tableData>
              <tableData breakPoint="-20">
                              -20	       -15	       -10	        -7	        -5	        -2	         0	         2	         5	         7	        10	        15	        20
                    -20	  -0.08501	  -0.06863	  -0.04923	  -0.03435	  -0.02418	  -0.00953	  -0.00004	   0.00952	   0.02399	   0.03413	   0.04933	   0.06879	   0.08514
                      0	  -0.04445	  -0.03604	  -0.02578	  -0.01772	  -0.01324	  -0.00625	  -0.00001	   0.00624	   0.01326	   0.01771	   0.02582	   0.03608	   0.04435
                      8	  -0.03308	  -0.02452	  -0.01603	  -0.00957	  -0.00798	   0.00102	   0.00016	  -0.00380	   0.00832	   0.01036	   0.01617	   0.02450	   0.03297
                     16	  -0.00944	  -0.01231	  -0.00636	  -0.00474	  -0.00575	  -0.00613	   0.00076	   0.00668	   0.00650	   0.00431	   0.00658	   0.01244	   0.00934
                     28	   0.02475	   0.01734	   0.00933	   0.00794	   0.00375	   0.00084	  -0.00281	  -0.00186	  -0.00430	  -0.00849	  -0.01121	  -0.01689	  -0.02490
                     50	   0.08213	   0.06090	   0.04484	   0.03530	   0.03551	   0.01306	  -0.00356	  -0.01388	  -0.03397	  -0.03673	  -0.04420	  -0.06436	  -0.08205
                     60	   0.08708	   0.06926	   0.05055	   0.03285	   0.02854	   0.00808	  -0.00003	  -0.02081	  -0.02850	  -0.02865	  -0.05050	  -0.06947	  -0.08942
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              </tableData>
              <tableData breakPoint="-15">
                              -20	       -15	       -10	        -7	        -5	        -2	         0	         2	         5	         7	        10	        15	        20
                    -20	  -0.05997	  -0.04624	  -0.03358	  -0.02407	  -0.01666	  -0.00775	  -0.00009	   0.00783	   0.01655	   0.02411	   0.03380	   0.04631	   0.05989
                      0	  -0.02314	  -0.01939	  -0.01349	  -0.00870	  -0.00582	  -0.00313	   0.00004	   0.00311	   0.00581	   0.00871	   0.01349	   0.01942	   0.02325
                      8	  -0.01436	  -0.01083	  -0.01219	  -0.00746	  -0.00432	  -0.00709	  -0.00013	   0.00718	   0.00394	   0.00765	   0.01188	   0.01057	   0.01434
                     16	   0.00266	  -0.00138	   0.00019	  -0.00023	  -0.00025	  -0.00087	  -0.00028	   0.00083	   0.00013	  -0.00025	  -0.00030	   0.00200	  -0.00266
                     28	   0.02616	   0.02005	   0.00867	   0.00972	   0.00585	   0.00164	  -0.00336	  -0.00237	  -0.00564	  -0.01058	  -0.00856	  -0.02091	  -0.02651
                     50	   0.06523	   0.04732	   0.03521	   0.02974	   0.02158	   0.01050	   0.00510	  -0.01299	  -0.02119	  -0.03071	  -0.03646	  -0.05123	  -0.06505
                     60	   0.07079	   0.05355	   0.04285	   0.02177	   0.02076	   0.01884	  -0.00031	  -0.02085	  -0.01172	  -0.02254	  -0.04515	  -0.05300	  -0.06944
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              </tableData>
              <tableData breakPoint="-10">
                              -20	       -15	       -10	        -7	        -5	        -2	         0	         2	         5	         7	        10	        15	        20
                    -20	  -0.03519	  -0.02673	  -0.02066	  -0.01504	  -0.01044	  -0.00504	   0.00001	   0.00475	   0.01051	   0.01492	   0.02077	   0.02694	   0.03511
                      0	  -0.01040	  -0.00836	  -0.00616	  -0.00353	  -0.00342	  -0.00140	   0.00000	   0.00138	   0.00319	   0.00353	   0.00615	   0.00836	   0.01047
                      8	  -0.00369	  -0.00090	  -0.00121	  -0.00170	  -0.00265	  -0.00302	  -0.00010	   0.00324	   0.00249	   0.00156	   0.00119	   0.00088	   0.00368
                     16	   0.00753	   0.00443	   0.00354	   0.00237	   0.00199	   0.00064	   0.00029	  -0.00099	  -0.00184	  -0.00266	  -0.00363	  -0.00411	  -0.00754
                     28	   0.02137	   0.01581	   0.00606	   0.00909	   0.00346	   0.00140	  -0.00293	  -0.00256	  -0.00334	  -0.00855	  -0.00970	  -0.01705	  -0.02159
                     50	   0.04584	   0.03106	   0.02405	   0.02360	   0.01671	   0.00503	   0.00400	  -0.00841	  -0.01628	  -0.02595	  -0.02411	  -0.03664	  -0.04606
                     60	   0.05330	   0.04018	   0.03401	   0.01239	   0.00286	   0.01455	   0.00069	  -0.01597	  -0.01875	  -0.01336	  -0.03538	  -0.04061	  -0.05358
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              </tableData>
              <tableData breakPoint="-5">
                              -20	       -15	       -10	        -7	        -5	        -2	         0	         2	         5	         7	        10	        15	        20
                    -20	  -0.01509	  -0.01102	  -0.00802	  -0.00653	  -0.00478	  -0.00217	  -0.00007	   0.00234	   0.00474	   0.00675	   0.00809	   0.01124	   0.01513
                      0	  -0.00349	  -0.00254	  -0.00235	  -0.00184	  -0.00103	  -0.00047	   0.00000	   0.00050	   0.00103	   0.00184	   0.00234	   0.00251	   0.00352
                      8	   0.00036	   0.00148	   0.00039	  -0.00012	   0.00024	   0.00031	   0.00013	  -0.00046	  -0.00023	  -0.00010	  -0.00040	  -0.00145	  -0.00028
                     16	   0.00518	   0.00370	   0.00259	   0.00151	   0.00160	   0.00059	  -0.00015	  -0.00064	  -0.00139	  -0.00169	  -0.00262	  -0.00315	  -0.00518
                     28	   0.01307	   0.00921	   0.00606	   0.00399	   0.00294	   0.00033	   0.00008	  -0.00149	  -0.00193	  -0.00475	  -0.00599	  -0.01127	  -0.01310
                     50	   0.02828	   0.01645	   0.01695	   0.00868	   0.01098	   0.00277	   0.00189	  -0.00493	  -0.00998	  -0.01108	  -0.02064	  -0.02261	  -0.02653
                     60	   0.03444	   0.02267	   0.01591	   0.01003	   0.01433	   0.00571	  -0.00916	  -0.00559	  -0.00880	  -0.00853	  -0.01908	  -0.01579	  -0.03402
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              </tableData>
              <tableData breakPoint="0">
                              -20	       -15	       -10	        -7	        -5	        -2	         0	         2	         5	         7	        10	        15	        20
                    -20	  -0.00001	  -0.00012	   0.00002	  -0.00026	   0.00002	  -0.00004	  -0.00036	   0.00010	  -0.00056	   0.00000	   0.00001	   0.00005	   0.00002
                      0	  -0.00001	  -0.00003	   0.00001	   0.00000	   0.00000	   0.00000	   0.00000	   0.00000	   0.00000	   0.00000	   0.00000	  -0.00003	   0.00004
                      8	  -0.00001	  -0.00003	   0.00004	  -0.00001	   0.00000	  -0.00001	  -0.00001	  -0.00001	   0.00001	  -0.00022	  -0.00001	   0.00001	   0.00005
                     16	  -0.00001	   0.00068	  -0.00018	  -0.00023	   0.00023	  -0.00039	   0.00005	  -0.00004	   0.00026	   0.00006	  -0.00006	   0.00005	   0.00003
                     28	  -0.00001	  -0.00004	  -0.00204	   0.00041	   0.00014	  -0.00014	  -0.00208	  -0.00107	   0.00094	  -0.00115	   0.00142	   0.00090	  -0.00012
                     50	   0.00014	  -0.00425	   0.00388	  -0.00357	   0.01029	  -0.00073	  -0.00462	  -0.00115	  -0.00138	  -0.00143	  -0.00022	  -0.00082	  -0.00060
                     60	   0.00206	   0.00091	   0.00937	   0.00042	   0.00345	   0.00201	  -0.00045	  -0.00426	  -0.00453	  -0.00106	  -0.00197	   0.00012	   0.00151
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              </tableData>
              <tableData breakPoint="5">
                              -20	       -15	       -10	        -7	        -5	        -2	         0	         2	         5	         7	        10	        15	        20
                    -20	   0.01033	   0.00792	   0.00566	   0.00427	   0.00369	   0.00119	  -0.00002	  -0.00120	  -0.00220	  -0.00433	  -0.00562	  -0.00777	  -0.01031
                      0	   0.00066	   0.00051	  -0.00035	   0.00011	   0.00016	  -0.00009	   0.00000	   0.00008	  -0.00016	  -0.00011	   0.00035	  -0.00051	  -0.00065
                      8	  -0.00622	  -0.00309	  -0.00196	  -0.00148	  -0.00141	   0.00115	  -0.00005	  -0.00050	   0.00138	   0.00125	   0.00195	   0.00309	   0.00622
                     16	  -0.00872	  -0.00658	  -0.00478	  -0.00376	  -0.00067	  -0.00162	   0.00007	   0.00162	   0.00129	   0.00250	   0.00468	   0.00743	   0.00863
                     28	  -0.01579	  -0.01163	  -0.01041	  -0.00476	  -0.00315	  -0.00172	  -0.00204	   0.00027	   0.00353	   0.00451	   0.00887	   0.01189	   0.01488
                     50	  -0.01528	  -0.01821	  -0.00171	  -0.00862	  -0.00022	  -0.00004	   0.00384	   0.00385	   0.00034	  -0.00145	   0.00187	   0.01352	   0.01449
                     60	  -0.00663	  -0.00463	  -0.00619	  -0.00179	  -0.00156	  -0.00071	  -0.00570	  -0.00311	   0.00403	   0.00133	  -0.00782	   0.00378	   0.00639
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              </tableData>
              <tableData breakPoint="10">
                              -20	       -15	       -10	        -7	        -5	        -2	         0	         2	         5	         7	        10	        15	        20
                    -20	   0.01672	   0.01296	   0.00887	   0.00683	   0.00471	   0.00195	  -0.00003	  -0.00191	  -0.00537	  -0.00697	  -0.00886	  -0.01281	  -0.01668
                      0	  -0.00456	  -0.00366	  -0.00294	  -0.00195	  -0.00143	  -0.00047	   0.00000	   0.00047	   0.00143	   0.00196	   0.00293	   0.00363	   0.00458
                      8	  -0.01673	  -0.00926	  -0.00662	  -0.00427	  -0.00294	   0.00078	  -0.00004	  -0.00069	   0.00300	   0.00411	   0.00661	   0.00929	   0.01674
                     16	  -0.02145	  -0.01742	  -0.01202	  -0.00799	  -0.00503	  -0.00085	  -0.00004	   0.00112	   0.00466	   0.00631	   0.01223	   0.01808	   0.02154
                     28	  -0.03196	  -0.02460	  -0.02019	  -0.01222	  -0.00697	  -0.00300	  -0.00369	   0.00132	   0.00753	   0.01111	   0.01604	   0.02555	   0.03146
                     50	  -0.02368	  -0.02687	  -0.00889	  -0.00519	  -0.00264	  -0.00236	  -0.00026	   0.00262	   0.00533	   0.01405	   0.01004	   0.02255	   0.02373
                     60	  -0.00580	  -0.00882	  -0.00020	  -0.00426	   0.00040	  -0.00238	  -0.00374	   0.00060	   0.00363	   0.00433	   0.00028	   0.00844	   0.00672
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              </tableData>
              <tableData breakPoint="15">
                              -20	       -15	       -10	        -7	        -5	        -2	         0	         2	         5	         7	        10	        15	        20
                    -20	   0.01974	   0.01553	   0.01124	   0.00727	   0.00540	   0.00229	   0.00014	  -0.00230	  -0.00552	  -0.00750	  -0.01119	  -0.01549	  -0.01925
                      0	  -0.01266	  -0.00941	  -0.00716	  -0.00445	  -0.00353	  -0.00097	   0.00002	   0.00096	   0.00353	   0.00444	   0.00716	   0.00933	   0.01267
                      8	  -0.02771	  -0.01790	  -0.01331	  -0.00879	  -0.00621	  -0.00117	  -0.00004	   0.00114	   0.00642	   0.00887	   0.01329	   0.01787	   0.02776
                     16	  -0.03705	  -0.02978	  -0.01975	  -0.01362	  -0.00992	  -0.00266	   0.00000	   0.00280	   0.01010	   0.01537	   0.01987	   0.03045	   0.03709
                     28	  -0.04372	  -0.03703	  -0.03317	  -0.01999	  -0.01231	  -0.00519	  -0.00317	   0.00367	   0.01254	   0.01952	   0.02976	   0.03852	   0.04485
                     50	  -0.02521	  -0.02777	  -0.01150	  -0.01289	  -0.00761	  -0.01093	  -0.00407	   0.00638	   0.00665	   0.01242	   0.01336	   0.02624	   0.02529
                     60	   0.00137	   0.00056	   0.01219	  -0.00348	  -0.00834	  -0.00834	  -0.00362	   0.00831	   0.00884	  -0.00238	  -0.00932	   0.00687	  -0.00007
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              </tableData>
          </table>
       </product>
    </function>
    <function name="aero/c/CFYTANKR">
    <description>SIDEFORCE INCREMENT DUE TO RIGHT WING TANK</description>
    <product>
          <property>inertia/tank-wing-right-fitted</property>
          <table>
            <independentVar lookup="row">aero/alpha-deg</independentVar>
            <independentVar lookup="column">aero/beta-deg</independentVar>
            <independentVar lookup="table">fcs/pitch-pos-deg</independentVar>
              <tableData breakPoint="-25">
                              -20	       -15	       -10	        -7	        -5	        -2	         0	         2	         5	         7	        10	        15	        20
                    -20	   0.10265	   0.08142	   0.05826	   0.04041	   0.02899	   0.01121	  -0.00003	  -0.01135	  -0.02880	  -0.04027	  -0.05836	  -0.08119	  -0.10255
                      0	   0.06290	   0.05246	   0.03709	   0.02679	   0.01900	   0.00766	   0.00000	  -0.00764	  -0.01896	  -0.02680	  -0.03704	  -0.05260	  -0.06284
                      8	   0.04133	   0.03354	   0.02749	   0.02013	   0.01626	   0.00120	  -0.00120	   0.00232	  -0.01643	  -0.01994	  -0.02752	  -0.03413	  -0.04154
                     16	   0.01810	   0.02010	   0.01505	   0.00830	   0.00663	   0.00408	  -0.00026	  -0.00262	  -0.00687	  -0.00801	  -0.01504	  -0.02200	  -0.01872
                     28	  -0.01849	  -0.01082	  -0.00277	  -0.00631	  -0.00221	   0.00025	   0.00168	   0.00013	   0.00181	   0.00599	   0.00457	   0.01190	   0.01886
                     50	  -0.09449	  -0.06882	  -0.05725	  -0.03836	  -0.03885	  -0.01286	   0.00045	   0.01130	   0.03776	   0.03640	   0.05749	   0.07405	   0.09541
                     60	  -0.10516	  -0.08012	  -0.05818	  -0.03312	  -0.03388	  -0.01399	   0.00137	   0.01469	   0.03313	   0.03482	   0.05906	   0.08199	   0.10538
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              </tableData>
              <tableData breakPoint="-20">
                              -20	       -15	       -10	        -7	        -5	        -2	         0	         2	         5	         7	        10	        15	        20
                    -20	   0.08501	   0.06863	   0.04923	   0.03435	   0.02418	   0.00953	   0.00004	  -0.00952	  -0.02399	  -0.03413	  -0.04933	  -0.06879	  -0.08514
                      0	   0.04445	   0.03604	   0.02578	   0.01772	   0.01324	   0.00625	   0.00001	  -0.00624	  -0.01326	  -0.01771	  -0.02582	  -0.03608	  -0.04435
                      8	   0.03308	   0.02452	   0.01603	   0.00957	   0.00798	  -0.00102	  -0.00016	   0.00380	  -0.00832	  -0.01036	  -0.01617	  -0.02450	  -0.03297
                     16	   0.00944	   0.01231	   0.00636	   0.00474	   0.00575	   0.00613	  -0.00076	  -0.00668	  -0.00650	  -0.00431	  -0.00658	  -0.01244	  -0.00934
                     28	  -0.02475	  -0.01734	  -0.00933	  -0.00794	  -0.00375	  -0.00084	   0.00281	   0.00186	   0.00430	   0.00849	   0.01121	   0.01689	   0.02490
                     50	  -0.08213	  -0.06090	  -0.04484	  -0.03530	  -0.03551	  -0.01306	   0.00356	   0.01388	   0.03397	   0.03673	   0.04420	   0.06436	   0.08205
                     60	  -0.08708	  -0.06926	  -0.05055	  -0.03285	  -0.02854	  -0.00808	   0.00003	   0.02081	   0.02850	   0.02865	   0.05050	   0.06947	   0.08942
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              </tableData>
              <tableData breakPoint="-15">
                              -20	       -15	       -10	        -7	        -5	        -2	         0	         2	         5	         7	        10	        15	        20
                    -20	   0.05997	   0.04624	   0.03358	   0.02407	   0.01666	   0.00775	   0.00009	  -0.00783	  -0.01655	  -0.02411	  -0.03380	  -0.04631	  -0.05989
                      0	   0.02314	   0.01939	   0.01349	   0.00870	   0.00582	   0.00313	  -0.00004	  -0.00311	  -0.00581	  -0.00871	  -0.01349	  -0.01942	  -0.02325
                      8	   0.01436	   0.01083	   0.01219	   0.00746	   0.00432	   0.00709	   0.00013	  -0.00718	  -0.00394	  -0.00765	  -0.01188	  -0.01057	  -0.01434
                     16	  -0.00266	   0.00138	  -0.00019	   0.00023	   0.00025	   0.00087	   0.00028	  -0.00083	  -0.00013	   0.00025	   0.00030	  -0.00200	   0.00266
                     28	  -0.02616	  -0.02005	  -0.00867	  -0.00972	  -0.00585	  -0.00164	   0.00336	   0.00237	   0.00564	   0.01058	   0.00856	   0.02091	   0.02651
                     50	  -0.06523	  -0.04732	  -0.03521	  -0.02974	  -0.02158	  -0.01050	  -0.00510	   0.01299	   0.02119	   0.03071	   0.03646	   0.05123	   0.06505
                     60	  -0.07079	  -0.05355	  -0.04285	  -0.02177	  -0.02076	  -0.01884	   0.00031	   0.02085	   0.01172	   0.02254	   0.04515	   0.05300	   0.06944
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              </tableData>
              <tableData breakPoint="-10">
                              -20	       -15	       -10	        -7	        -5	        -2	         0	         2	         5	         7	        10	        15	        20
                    -20	   0.03519	   0.02673	   0.02066	   0.01504	   0.01044	   0.00504	  -0.00001	  -0.00475	  -0.01051	  -0.01492	  -0.02077	  -0.02694	  -0.03511
                      0	   0.01040	   0.00836	   0.00616	   0.00353	   0.00342	   0.00140	   0.00000	  -0.00138	  -0.00319	  -0.00353	  -0.00615	  -0.00836	  -0.01047
                      8	   0.00369	   0.00090	   0.00121	   0.00170	   0.00265	   0.00302	   0.00010	  -0.00324	  -0.00249	  -0.00156	  -0.00119	  -0.00088	  -0.00368
                     16	  -0.00753	  -0.00443	  -0.00354	  -0.00237	  -0.00199	  -0.00064	  -0.00029	   0.00099	   0.00184	   0.00266	   0.00363	   0.00411	   0.00754
                     28	  -0.02137	  -0.01581	  -0.00606	  -0.00909	  -0.00346	  -0.00140	   0.00293	   0.00256	   0.00334	   0.00855	   0.00970	   0.01705	   0.02159
                     50	  -0.04584	  -0.03106	  -0.02405	  -0.02360	  -0.01671	  -0.00503	  -0.00400	   0.00841	   0.01628	   0.02595	   0.02411	   0.03664	   0.04606
                     60	  -0.05330	  -0.04018	  -0.03401	  -0.01239	  -0.00286	  -0.01455	  -0.00069	   0.01597	   0.01875	   0.01336	   0.03538	   0.04061	   0.05358
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              </tableData>
              <tableData breakPoint="-5">
                              -20	       -15	       -10	        -7	        -5	        -2	         0	         2	         5	         7	        10	        15	        20
                    -20	   0.01509	   0.01102	   0.00802	   0.00653	   0.00478	   0.00217	   0.00007	  -0.00234	  -0.00474	  -0.00675	  -0.00809	  -0.01124	  -0.01513
                      0	   0.00349	   0.00254	   0.00235	   0.00184	   0.00103	   0.00047	   0.00000	  -0.00050	  -0.00103	  -0.00184	  -0.00234	  -0.00251	  -0.00352
                      8	  -0.00036	  -0.00148	  -0.00039	   0.00012	  -0.00024	  -0.00031	  -0.00013	   0.00046	   0.00023	   0.00010	   0.00040	   0.00145	   0.00028
                     16	  -0.00518	  -0.00370	  -0.00259	  -0.00151	  -0.00160	  -0.00059	   0.00015	   0.00064	   0.00139	   0.00169	   0.00262	   0.00315	   0.00518
                     28	  -0.01307	  -0.00921	  -0.00606	  -0.00399	  -0.00294	  -0.00033	  -0.00008	   0.00149	   0.00193	   0.00475	   0.00599	   0.01127	   0.01310
                     50	  -0.02828	  -0.01645	  -0.01695	  -0.00868	  -0.01098	  -0.00277	  -0.00189	   0.00493	   0.00998	   0.01108	   0.02064	   0.02261	   0.02653
                     60	  -0.03444	  -0.02267	  -0.01591	  -0.01003	  -0.01433	  -0.00571	   0.00916	   0.00559	   0.00880	   0.00853	   0.01908	   0.01579	   0.03402
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              </tableData>
              <tableData breakPoint="0">
                              -20	       -15	       -10	        -7	        -5	        -2	         0	         2	         5	         7	        10	        15	        20
                    -20	   0.00001	   0.00012	  -0.00002	   0.00026	  -0.00002	   0.00004	   0.00036	  -0.00010	   0.00056	   0.00000	  -0.00001	  -0.00005	  -0.00002
                      0	   0.00001	   0.00003	  -0.00001	   0.00000	   0.00000	   0.00000	   0.00000	   0.00000	   0.00000	   0.00000	   0.00000	   0.00003	  -0.00004
                      8	   0.00001	   0.00003	  -0.00004	   0.00001	   0.00000	   0.00001	   0.00001	   0.00001	  -0.00001	   0.00022	   0.00001	  -0.00001	  -0.00005
                     16	   0.00001	  -0.00068	   0.00018	   0.00023	  -0.00023	   0.00039	  -0.00005	   0.00004	  -0.00026	  -0.00006	   0.00006	  -0.00005	  -0.00003
                     28	   0.00001	   0.00004	   0.00204	  -0.00041	  -0.00014	   0.00014	   0.00208	   0.00107	  -0.00094	   0.00115	  -0.00142	  -0.00090	   0.00012
                     50	  -0.00014	   0.00425	  -0.00388	   0.00357	  -0.01029	   0.00073	   0.00462	   0.00115	   0.00138	   0.00143	   0.00022	   0.00082	   0.00060
                     60	  -0.00206	  -0.00091	  -0.00937	  -0.00042	  -0.00345	  -0.00201	   0.00045	   0.00426	   0.00453	   0.00106	   0.00197	  -0.00012	  -0.00151
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              </tableData>
              <tableData breakPoint="5">
                              -20	       -15	       -10	        -7	        -5	        -2	         0	         2	         5	         7	        10	        15	        20
                    -20	  -0.01033	  -0.00792	  -0.00566	  -0.00427	  -0.00369	  -0.00119	   0.00002	   0.00120	   0.00220	   0.00433	   0.00562	   0.00777	   0.01031
                      0	  -0.00066	  -0.00051	   0.00035	  -0.00011	  -0.00016	   0.00009	   0.00000	  -0.00008	   0.00016	   0.00011	  -0.00035	   0.00051	   0.00065
                      8	   0.00622	   0.00309	   0.00196	   0.00148	   0.00141	  -0.00115	   0.00005	   0.00050	  -0.00138	  -0.00125	  -0.00195	  -0.00309	  -0.00622
                     16	   0.00872	   0.00658	   0.00478	   0.00376	   0.00067	   0.00162	  -0.00007	  -0.00162	  -0.00129	  -0.00250	  -0.00468	  -0.00743	  -0.00863
                     28	   0.01579	   0.01163	   0.01041	   0.00476	   0.00315	   0.00172	   0.00204	  -0.00027	  -0.00353	  -0.00451	  -0.00887	  -0.01189	  -0.01488
                     50	   0.01528	   0.01821	   0.00171	   0.00862	   0.00022	   0.00004	  -0.00384	  -0.00385	  -0.00034	   0.00145	  -0.00187	  -0.01352	  -0.01449
                     60	   0.00663	   0.00463	   0.00619	   0.00179	   0.00156	   0.00071	   0.00570	   0.00311	  -0.00403	  -0.00133	   0.00782	  -0.00378	  -0.00639
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              </tableData>
              <tableData breakPoint="10">
                              -20	       -15	       -10	        -7	        -5	        -2	         0	         2	         5	         7	        10	        15	        20
                    -20	  -0.01672	  -0.01296	  -0.00887	  -0.00683	  -0.00471	  -0.00195	   0.00003	   0.00191	   0.00537	   0.00697	   0.00886	   0.01281	   0.01668
                      0	   0.00456	   0.00366	   0.00294	   0.00195	   0.00143	   0.00047	   0.00000	  -0.00047	  -0.00143	  -0.00196	  -0.00293	  -0.00363	  -0.00458
                      8	   0.01673	   0.00926	   0.00662	   0.00427	   0.00294	  -0.00078	   0.00004	   0.00069	  -0.00300	  -0.00411	  -0.00661	  -0.00929	  -0.01674
                     16	   0.02145	   0.01742	   0.01202	   0.00799	   0.00503	   0.00085	   0.00004	  -0.00112	  -0.00466	  -0.00631	  -0.01223	  -0.01808	  -0.02154
                     28	   0.03196	   0.02460	   0.02019	   0.01222	   0.00697	   0.00300	   0.00369	  -0.00132	  -0.00753	  -0.01111	  -0.01604	  -0.02555	  -0.03146
                     50	   0.02368	   0.02687	   0.00889	   0.00519	   0.00264	   0.00236	   0.00026	  -0.00262	  -0.00533	  -0.01405	  -0.01004	  -0.02255	  -0.02373
                     60	   0.00580	   0.00882	   0.00020	   0.00426	  -0.00040	   0.00238	   0.00374	  -0.00060	  -0.00363	  -0.00433	  -0.00028	  -0.00844	  -0.00672
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              </tableData>
              <tableData breakPoint="15">
                              -20	       -15	       -10	        -7	        -5	        -2	         0	         2	         5	         7	        10	        15	        20
                    -20	  -0.01974	  -0.01553	  -0.01124	  -0.00727	  -0.00540	  -0.00229	  -0.00014	   0.00230	   0.00552	   0.00750	   0.01119	   0.01549	   0.01925
                      0	   0.01266	   0.00941	   0.00716	   0.00445	   0.00353	   0.00097	  -0.00002	  -0.00096	  -0.00353	  -0.00444	  -0.00716	  -0.00933	  -0.01267
                      8	   0.02771	   0.01790	   0.01331	   0.00879	   0.00621	   0.00117	   0.00004	  -0.00114	  -0.00642	  -0.00887	  -0.01329	  -0.01787	  -0.02776
                     16	   0.03705	   0.02978	   0.01975	   0.01362	   0.00992	   0.00266	   0.00000	  -0.00280	  -0.01010	  -0.01537	  -0.01987	  -0.03045	  -0.03709
                     28	   0.04372	   0.03703	   0.03317	   0.01999	   0.01231	   0.00519	   0.00317	  -0.00367	  -0.01254	  -0.01952	  -0.02976	  -0.03852	  -0.04485
                     50	   0.02521	   0.02777	   0.01150	   0.01289	   0.00761	   0.01093	   0.00407	  -0.00638	  -0.00665	  -0.01242	  -0.01336	  -0.02624	  -0.02529
                     60	  -0.00137	  -0.00056	  -0.01219	   0.00348	   0.00834	   0.00834	   0.00362	  -0.00831	  -0.00884	   0.00238	   0.00932	  -0.00687	   0.00007
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              </tableData>
          </table>
       </product>
    </function>
    <function name="aero/c/CYDRD">
    <description>SIDE FORCE DUE TO RUDDER DEFLECTION</description>
    <product>
          <property>fcs/rudder-deg</property>
          <table>
            <independentVar lookup="row">aero/alpha-deg</independentVar>
            <independentVar lookup="column">aero/beta-deg</independentVar>
            <tableData>
                                -20	        -15	        -10	         -7	         -5	         -2	          0	          2	          5	          7	         10	         15	         20
                    -20	  -0.00342	  -0.00347	  -0.00345	  -0.00343	  -0.00344	  -0.00342	  -0.00340	  -0.00336	  -0.00329	  -0.00326	  -0.00317	  -0.00305	  -0.00279
                      0	  -0.00324	  -0.00335	  -0.00336	  -0.00335	  -0.00331	  -0.00327	  -0.00327	  -0.00319	  -0.00321	  -0.00317	  -0.00312	  -0.00297	  -0.00276
                      8	  -0.00307	  -0.00316	  -0.00314	  -0.00319	  -0.00316	  -0.00295	  -0.00286	  -0.00289	  -0.00314	  -0.00298	  -0.00290	  -0.00282	  -0.00240
                     16	  -0.00270	  -0.00287	  -0.00299	  -0.00303	  -0.00295	  -0.00289	  -0.00281	  -0.00277	  -0.00293	  -0.00281	  -0.00272	  -0.00255	  -0.00218
                     28	  -0.00242	  -0.00256	  -0.00274	  -0.00253	  -0.00257	  -0.00259	  -0.00266	  -0.00225	  -0.00237	  -0.00243	  -0.00235	  -0.00216	  -0.00183
                     50	  -0.00142	  -0.00154	  -0.00155	  -0.00160	  -0.00152	  -0.00177	  -0.00187	  -0.00141	  -0.00117	  -0.00131	  -0.00140	  -0.00113	  -0.00116
                     60	  -0.00077	  -0.00081	  -0.00074	  -0.00087	  -0.00090	  -0.00081	  -0.00093	  -0.00111	  -0.00033	  -0.00072	  -0.00070	  -0.00064	  -0.00051
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            </tableData>
          </table>
       </product>
    </function>
    <function name="aero/c/CYDRDMN">
    <description>SIDEFORCE CHANGE DUE TO MACH DUE TO TO RUDDER DEFLECTION</description>
    <product>
          <property>fcs/rudder-deg</property>
          <table>
            <independentVar lookup="row">velocities/mach</independentVar>
            <independentVar lookup="column">aero/alpha-deg</independentVar>
            <tableData>
                                -10	         -5	         -2	       0.01	          1	          2	          6	          7	         10
                    0.2	   0.00024	   0.00025	   0.00026	   0.00027	   0.00028	   0.00027	   0.00024	   0.00016	   0.00032
                    0.8	  -0.00036	  -0.00033	  -0.00036	  -0.00033	  -0.00032	  -0.00036	  -0.00043	  -0.00044	  -0.00006
                   0.91	  -0.00076	  -0.00073	  -0.00072	  -0.00067	  -0.00066	  -0.00072	  -0.00066	  -0.00097	  -0.00066
                   0.99	  -0.00135	  -0.00136	  -0.00137	  -0.00133	  -0.00132	  -0.00136	  -0.00138	  -0.00155	  -0.00147
                      2	   0.00242	   0.00127	   0.00104	   0.00103	   0.00104	   0.00097	   0.00101	   0.00076	   0.00065
                    2.4	   0.00220	   0.00162	   0.00147	   0.00147	   0.00147	   0.00140	   0.00144	   0.00121	   0.00128
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            </tableData>
          </table>
       </product>
    </function>
    <function name="aero/c/CYDSL">
    <description>SIDE FORCE DUE TO SLATS</description>
    <product>
          <property>aero/beta-deg</property>
          <table>
            <independentVar lookup="row">aero/alpha-deg</independentVar>
            <independentVar lookup="column">fcs/slats-deg</independentVar>
            <tableData>
                                  0	         10	         23
                    -20	   0.00000	  -0.00005	  -0.00008
                      0	   0.00000	   0.00000	   0.00001
                      8	   0.00000	  -0.00001	  -0.00001
                     16	   0.00000	   0.00000	  -0.00014
                     28	   0.00000	  -0.00219	  -0.00265
                     50	   0.00000	  -0.00075	  -0.00274
                     60	   0.00000	  -0.00260	  -0.00634
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            </tableData>
          </table>
       </product>
    </function>
    <function name="aero/c/CMN1">
    <description>BASE YAWING MOMENT</description>
          <table>
            <independentVar lookup="row">aero/alpha-deg</independentVar>
            <independentVar lookup="column">aero/beta-deg</independentVar>
            <independentVar lookup="table">fcs/pitch-pos-deg</independentVar>
              <tableData breakPoint="-25">
                              -20	       -15	       -10	        -7	        -5	        -2	         0	         2	         5	         7	        10	        15	        20
                    -20	   0.07748	   0.06733	   0.04916	   0.03485	   0.02605	   0.01045	  -0.00001	  -0.01045	  -0.02602	  -0.03488	  -0.04899	  -0.06727	  -0.07738
                      0	   0.00704	   0.00955	   0.00875	   0.00750	   0.00530	   0.00227	   0.00000	  -0.00225	  -0.00533	  -0.00751	  -0.00873	  -0.00966	  -0.00698
                      8	  -0.00516	  -0.00442	   0.00163	   0.00377	   0.00407	   0.00038	   0.00029	   0.00003	  -0.00413	  -0.00387	  -0.00157	   0.00484	   0.00518
                     16	  -0.00566	  -0.00065	   0.00034	  -0.00003	   0.00187	  -0.00039	  -0.00010	  -0.00042	  -0.00190	   0.00075	  -0.00049	   0.00060	   0.00529
                     28	  -0.00191	  -0.00475	  -0.00591	  -0.00422	  -0.00217	  -0.00060	  -0.00004	   0.00041	   0.00217	   0.00426	   0.00594	   0.00504	   0.00195
                     50	   0.03097	   0.01691	   0.00798	   0.00683	   0.00389	  -0.00051	  -0.00067	   0.00053	  -0.00425	  -0.00668	  -0.00803	  -0.01694	  -0.03106
                     60	   0.05552	   0.04182	   0.02489	   0.01552	   0.01099	   0.00392	  -0.00008	  -0.00556	  -0.01090	  -0.01567	  -0.02560	  -0.04248	  -0.05706
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              </tableData>
              <tableData breakPoint="-20">
                              -20	       -15	       -10	        -7	        -5	        -2	         0	         2	         5	         7	        10	        15	        20
                    -20	   0.06924	   0.06089	   0.04405	   0.03180	   0.02333	   0.00942	   0.00002	  -0.00940	  -0.02328	  -0.03176	  -0.04404	  -0.06095	  -0.06943
                      0	  -0.00350	  -0.00054	   0.00188	   0.00165	   0.00192	   0.00149	   0.00000	  -0.00149	  -0.00197	  -0.00165	  -0.00190	   0.00041	   0.00355
                      8	  -0.01462	  -0.01167	  -0.00664	  -0.00216	  -0.00223	  -0.00113	   0.00004	  -0.00144	   0.00224	   0.00235	   0.00675	   0.01171	   0.01462
                     16	  -0.01298	  -0.00936	  -0.00651	  -0.00332	  -0.00175	  -0.00024	  -0.00003	   0.00002	   0.00150	   0.00377	   0.00652	   0.00936	   0.01308
                     28	  -0.00786	  -0.01129	  -0.01092	  -0.00807	  -0.00517	  -0.00104	   0.00010	   0.00132	   0.00522	   0.00792	   0.01117	   0.01131	   0.00786
                     50	   0.03519	   0.01886	   0.01010	   0.00773	   0.00405	   0.00056	  -0.00107	   0.00036	  -0.00352	  -0.00763	  -0.01069	  -0.01892	  -0.03517
                     60	   0.06494	   0.04606	   0.02637	   0.01745	   0.01383	   0.00762	   0.00015	  -0.00577	  -0.01264	  -0.01716	  -0.02789	  -0.04536	  -0.06454
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              </tableData>
              <tableData breakPoint="-15">
                              -20	       -15	       -10	        -7	        -5	        -2	         0	         2	         5	         7	        10	        15	        20
                    -20	   0.05559	   0.04735	   0.03421	   0.02521	   0.01858	   0.00862	  -0.00005	  -0.00865	  -0.01864	  -0.02522	  -0.03430	  -0.04736	  -0.05546
                      0	  -0.01657	  -0.01114	  -0.00611	  -0.00431	  -0.00303	  -0.00041	   0.00000	   0.00044	   0.00302	   0.00431	   0.00611	   0.01114	   0.01658
                      8	  -0.02582	  -0.01916	  -0.01268	  -0.00795	  -0.00586	  -0.00311	   0.00007	   0.00324	   0.00638	   0.00764	   0.01266	   0.01921	   0.02580
                     16	  -0.02163	  -0.01665	  -0.01213	  -0.00810	  -0.00529	  -0.00149	   0.00016	   0.00151	   0.00521	   0.00806	   0.01215	   0.01666	   0.02176
                     28	  -0.01129	  -0.01550	  -0.01324	  -0.01074	  -0.00673	  -0.00256	   0.00006	   0.00249	   0.00671	   0.01063	   0.01323	   0.01542	   0.01134
                     50	   0.04167	   0.02484	   0.01468	   0.00899	   0.00672	   0.00162	   0.00070	  -0.00093	  -0.00631	  -0.00910	  -0.01442	  -0.02440	  -0.04194
                     60	   0.07055	   0.05292	   0.03030	   0.02144	   0.01470	   0.00389	   0.00007	  -0.00547	  -0.01471	  -0.02213	  -0.03095	  -0.05293	  -0.07090
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              </tableData>
              <tableData breakPoint="-10">
                              -20	       -15	       -10	        -7	        -5	        -2	         0	         2	         5	         7	        10	        15	        20
                    -20	   0.04079	   0.03594	   0.02652	   0.01985	   0.01484	   0.00687	   0.00006	  -0.00682	  -0.01479	  -0.01979	  -0.02655	  -0.03606	  -0.04069
                      0	  -0.02452	  -0.01873	  -0.01152	  -0.00783	  -0.00472	  -0.00130	   0.00000	   0.00131	   0.00488	   0.00782	   0.01152	   0.01874	   0.02451
                      8	  -0.03221	  -0.02625	  -0.01757	  -0.01164	  -0.00863	  -0.00296	   0.00002	   0.00285	   0.00869	   0.01158	   0.01758	   0.02629	   0.03217
                     16	  -0.02604	  -0.02161	  -0.01544	  -0.01053	  -0.00750	  -0.00131	   0.00000	   0.00144	   0.00751	   0.01047	   0.01546	   0.02157	   0.02605
                     28	  -0.01099	  -0.01609	  -0.01416	  -0.01034	  -0.00683	  -0.00297	   0.00020	   0.00303	   0.00698	   0.01031	   0.01433	   0.01603	   0.01096
                     50	   0.05035	   0.02981	   0.01953	   0.01202	   0.00915	   0.00535	  -0.00032	  -0.00312	  -0.00900	  -0.01171	  -0.01967	  -0.02982	  -0.05032
                     60	   0.07496	   0.05705	   0.03373	   0.02507	   0.01834	   0.00873	   0.00049	  -0.00775	  -0.01771	  -0.02424	  -0.03395	  -0.05707	  -0.07545
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              </tableData>
              <tableData breakPoint="-5">
                              -20	       -15	       -10	        -7	        -5	        -2	         0	         2	         5	         7	        10	        15	        20
                    -20	   0.02970	   0.02699	   0.01904	   0.01489	   0.01154	   0.00513	   0.00003	  -0.00514	  -0.01154	  -0.01499	  -0.01907	  -0.02697	  -0.02969
                      0	  -0.02842	  -0.02200	  -0.01447	  -0.00936	  -0.00656	  -0.00254	   0.00000	   0.00254	   0.00656	   0.00936	   0.01447	   0.02200	   0.02843
                      8	  -0.03578	  -0.02856	  -0.01903	  -0.01293	  -0.00962	  -0.00352	   0.00001	   0.00345	   0.00961	   0.01294	   0.01902	   0.02855	   0.03574
                     16	  -0.02629	  -0.02237	  -0.01635	  -0.01126	  -0.00745	  -0.00178	  -0.00001	   0.00183	   0.00757	   0.01130	   0.01635	   0.02251	   0.02629
                     28	  -0.00821	  -0.01468	  -0.01370	  -0.00924	  -0.00734	  -0.00317	   0.00009	   0.00310	   0.00725	   0.00924	   0.01384	   0.01450	   0.00813
                     50	   0.05710	   0.03662	   0.02353	   0.01816	   0.01242	   0.00507	  -0.00007	  -0.00602	  -0.01234	  -0.01842	  -0.02279	  -0.03700	  -0.05691
                     60	   0.08144	   0.06268	   0.04056	   0.02805	   0.01924	   0.00928	  -0.00066	  -0.00982	  -0.01943	  -0.02648	  -0.03997	  -0.06270	  -0.08151
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              </tableData>
              <tableData breakPoint="0">
                              -20	       -15	       -10	        -7	        -5	        -2	         0	         2	         5	         7	        10	        15	        20
                    -20	   0.02252	   0.02149	   0.01491	   0.01150	   0.00887	   0.00384	   0.00005	  -0.00380	  -0.00896	  -0.01150	  -0.01490	  -0.02150	  -0.02250
                      0	  -0.03082	  -0.02384	  -0.01579	  -0.01067	  -0.00753	  -0.00288	   0.00000	   0.00287	   0.00753	   0.01067	   0.01579	   0.02382	   0.03083
                      8	  -0.03641	  -0.02888	  -0.01957	  -0.01360	  -0.00975	  -0.00346	   0.00000	   0.00345	   0.00975	   0.01360	   0.01955	   0.02890	   0.03641
                     16	  -0.02493	  -0.02208	  -0.01596	  -0.01102	  -0.00743	  -0.00161	   0.00007	   0.00164	   0.00752	   0.01100	   0.01594	   0.02206	   0.02491
                     28	  -0.00313	  -0.01020	  -0.01089	  -0.00808	  -0.00597	  -0.00261	  -0.00003	   0.00231	   0.00616	   0.00803	   0.01110	   0.00984	   0.00312
                     50	   0.06941	   0.04639	   0.03183	   0.02238	   0.01669	   0.00603	   0.00076	  -0.00588	  -0.01745	  -0.02216	  -0.03157	  -0.04741	  -0.06880
                     60	   0.09817	   0.07388	   0.04883	   0.03246	   0.02270	   0.01196	   0.00088	  -0.01295	  -0.02377	  -0.03283	  -0.04694	  -0.07396	  -0.09781
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              </tableData>
              <tableData breakPoint="5">
                              -20	       -15	       -10	        -7	        -5	        -2	         0	         2	         5	         7	        10	        15	        20
                    -20	   0.01831	   0.01826	   0.01255	   0.00962	   0.00769	   0.00332	   0.00005	  -0.00333	  -0.00768	  -0.00962	  -0.01255	  -0.01827	  -0.01832
                      0	  -0.03127	  -0.02479	  -0.01579	  -0.01070	  -0.00757	  -0.00275	   0.00000	   0.00275	   0.00757	   0.01070	   0.01580	   0.02479	   0.03126
                      8	  -0.03405	  -0.02785	  -0.01941	  -0.01385	  -0.00971	  -0.00378	   0.00004	   0.00369	   0.00971	   0.01384	   0.01939	   0.02789	   0.03405
                     16	  -0.02181	  -0.01953	  -0.01457	  -0.01067	  -0.00692	  -0.00081	  -0.00002	   0.00097	   0.00690	   0.01070	   0.01461	   0.01956	   0.02177
                     28	   0.00324	  -0.00465	  -0.00748	  -0.00655	  -0.00483	  -0.00225	   0.00024	   0.00238	   0.00490	   0.00615	   0.00723	   0.00466	  -0.00314
                     50	   0.07463	   0.05113	   0.03435	   0.02612	   0.01875	   0.00580	  -0.00036	  -0.00521	  -0.01891	  -0.02592	  -0.03395	  -0.05102	  -0.07458
                     60	   0.09652	   0.07218	   0.04658	   0.03199	   0.02483	   0.01182	  -0.00071	  -0.01090	  -0.02464	  -0.03459	  -0.04702	  -0.07180	  -0.09634
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              </tableData>
              <tableData breakPoint="10">
                              -20	       -15	       -10	        -7	        -5	        -2	         0	         2	         5	         7	        10	        15	        20
                    -20	   0.01606	   0.01634	   0.01137	   0.00857	   0.00694	   0.00302	   0.00000	  -0.00303	  -0.00682	  -0.00858	  -0.01138	  -0.01633	  -0.01600
                      0	  -0.02820	  -0.02309	  -0.01456	  -0.01003	  -0.00706	  -0.00285	   0.00000	   0.00284	   0.00706	   0.01003	   0.01456	   0.02309	   0.02819
                      8	  -0.02930	  -0.02480	  -0.01719	  -0.01292	  -0.00923	  -0.00327	   0.00000	   0.00327	   0.00924	   0.01291	   0.01718	   0.02478	   0.02929
                     16	  -0.01575	  -0.01472	  -0.01089	  -0.00784	  -0.00484	  -0.00110	   0.00002	   0.00111	   0.00488	   0.00781	   0.01091	   0.01461	   0.01574
                     28	   0.00971	   0.00157	  -0.00418	  -0.00273	  -0.00295	  -0.00155	   0.00001	   0.00159	   0.00300	   0.00293	   0.00384	  -0.00184	  -0.00983
                     50	   0.07528	   0.05433	   0.03608	   0.02647	   0.01929	   0.00569	  -0.00005	  -0.00435	  -0.01911	  -0.02715	  -0.03625	  -0.05505	  -0.07494
                     60	   0.08893	   0.06988	   0.04467	   0.03031	   0.02225	   0.01153	   0.00039	  -0.01070	  -0.02133	  -0.03044	  -0.04504	  -0.06952	  -0.08891
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              </tableData>
              <tableData breakPoint="15">
                              -20	       -15	       -10	        -7	        -5	        -2	         0	         2	         5	         7	        10	        15	        20
                    -20	   0.01566	   0.01571	   0.01047	   0.00877	   0.00691	   0.00287	   0.00001	  -0.00287	  -0.00679	  -0.00877	  -0.01047	  -0.01570	  -0.01563
                      0	  -0.02400	  -0.01970	  -0.01267	  -0.00915	  -0.00650	  -0.00329	   0.00000	   0.00330	   0.00650	   0.00915	   0.01267	   0.01971	   0.02400
                      8	  -0.02417	  -0.02071	  -0.01404	  -0.01059	  -0.00738	  -0.00104	   0.00001	   0.00108	   0.00739	   0.01051	   0.01404	   0.02075	   0.02419
                     16	  -0.00901	  -0.00888	  -0.00766	  -0.00513	  -0.00303	  -0.00024	   0.00005	   0.00042	   0.00312	   0.00521	   0.00769	   0.00891	   0.00875
                     28	   0.01412	   0.00730	   0.00318	   0.00137	  -0.00115	  -0.00078	   0.00067	   0.00093	   0.00103	  -0.00139	  -0.00260	  -0.00713	  -0.01419
                     50	   0.07271	   0.05290	   0.03539	   0.02552	   0.01868	   0.00642	  -0.00026	  -0.00668	  -0.01808	  -0.02537	  -0.03564	  -0.05253	  -0.07267
                     60	   0.07961	   0.06256	   0.03827	   0.02725	   0.01997	   0.01125	  -0.00055	  -0.01095	  -0.01974	  -0.02677	  -0.03696	  -0.06266	  -0.07878
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              </tableData>
          </table>
    </function>
    <function name="aero/c/CMNBETADOT">
    <description>YAW DERIVATIVE MOMENT DUE TO BETADOT</description>
    <product>
          <property>aero/betadot-rad_sec</property>
          <table>
            <independentVar lookup="row">aero/alpha-deg</independentVar>
            <independentVar lookup="column">aero/beta-deg</independentVar>
            <tableData>
                                -20	        -15	        -10	         -7	         -5	         -2	          0	          2	          5	          7	         10	         15	         20
                    -20	  -0.04052	  -0.05398	  -0.09940	  -0.06163	  -0.10996	  -0.11044	  -0.10889	  -0.10236	  -0.09048	   0.00360	  -0.05928	  -0.03331	  -0.05521
                      0	   0.06586	   0.06886	   0.11777	   0.09229	   0.08397	   0.11100	   0.05359	   0.08622	   0.08772	   0.08796	   0.09588	   0.08369	   0.04049
                      8	   0.09525	   0.08448	   0.09975	   0.09320	   0.12015	   0.11547	   0.08384	   0.07601	   0.13070	   0.10889	   0.12077	   0.04245	   0.04595
                     16	   0.01925	   0.05883	   0.08983	   0.08986	   0.10356	   0.02620	   0.05069	   0.10690	   0.11290	   0.09321	   0.07744	   0.05452	   0.06933
                     28	  -0.08321	  -0.07143	   0.04698	   0.04259	   0.04971	   0.07920	   0.04975	   0.10387	   0.06972	   0.03315	   0.03684	  -0.06925	  -0.12257
                     50	  -0.18197	  -0.18854	  -0.21607	  -0.06479	  -0.29189	  -0.30008	  -0.06151	  -0.18764	  -0.28406	  -0.25496	  -0.17225	  -0.39933	  -0.13610
                     60	  -0.23835	  -0.27452	  -0.30701	  -0.30900	  -0.08439	  -0.39756	  -0.33929	  -0.30547	  -0.22061	  -0.23176	  -0.30021	  -0.20864	   0.02180
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            </tableData>
          </table>
       </product>
    </function>
    <function name="aero/c/CMNDRD">
    <description>YAWING MOMENT DUE TO RUDDER DEFLECTION</description>
    <product>
          <property>fcs/rudder-deg</property>
          <table>
            <independentVar lookup="row">aero/alpha-deg</independentVar>
            <independentVar lookup="column">aero/beta-deg</independentVar>
            <tableData>
                                -20	        -15	        -10	         -7	         -5	         -2	          0	          2	          5	          7	         10	         15	         20
                    -20	   0.00251	   0.00258	   0.00258	   0.00258	   0.00259	   0.00259	   0.00256	   0.00254	   0.00249	   0.00247	   0.00240	   0.00230	   0.00208
                      0	   0.00234	   0.00245	   0.00249	   0.00249	   0.00247	   0.00245	   0.00244	   0.00240	   0.00241	   0.00238	   0.00234	   0.00220	   0.00201
                      8	   0.00220	   0.00230	   0.00235	   0.00237	   0.00233	   0.00228	   0.00223	   0.00220	   0.00228	   0.00229	   0.00218	   0.00207	   0.00175
                     16	   0.00195	   0.00210	   0.00220	   0.00221	   0.00219	   0.00218	   0.00212	   0.00213	   0.00215	   0.00209	   0.00204	   0.00186	   0.00161
                     28	   0.00178	   0.00195	   0.00200	   0.00192	   0.00194	   0.00190	   0.00192	   0.00187	   0.00179	   0.00181	   0.00179	   0.00163	   0.00139
                     50	   0.00113	   0.00117	   0.00120	   0.00120	   0.00120	   0.00123	   0.00121	   0.00112	   0.00102	   0.00103	   0.00100	   0.00092	   0.00084
                     60	   0.00062	   0.00062	   0.00062	   0.00070	   0.00066	   0.00065	   0.00068	   0.00066	   0.00048	   0.00055	   0.00055	   0.00047	   0.00040
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            </tableData>
          </table>
       </product>
    </function>
    <function name="aero/c/CMNDRDMN">
    <description>YAWING MOMENT CHANGE DUE TO MACH DUE TO RUDDER DEFLECTION</description>
    <product>
          <property>fcs/rudder-deg</property>
          <table>
            <independentVar lookup="row">velocities/mach</independentVar>
            <independentVar lookup="column">aero/alpha-deg</independentVar>
            <tableData>
                                -10	         -5	         -2	       0.01	          1	          2	          6	          7	         10
                    0.2	  -0.00020	  -0.00021	  -0.00021	  -0.00022	  -0.00023	  -0.00021	  -0.00019	  -0.00018	  -0.00022
                    0.8	   0.00031	   0.00029	   0.00029	   0.00029	   0.00027	   0.00027	   0.00023	   0.00023	   0.00028
                   0.91	   0.00065	   0.00062	   0.00062	   0.00056	   0.00055	   0.00053	   0.00058	   0.00061	   0.00060
                   0.99	   0.00115	   0.00115	   0.00116	   0.00111	   0.00110	   0.00109	   0.00119	   0.00122	   0.00123
                      2	  -0.00102	  -0.00070	  -0.00061	  -0.00062	  -0.00061	  -0.00059	  -0.00060	  -0.00060	  -0.00068
                    2.4	  -0.00109	  -0.00101	  -0.00096	  -0.00098	  -0.00096	  -0.00094	  -0.00091	  -0.00090	  -0.00097
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            </tableData>
          </table>
       </product>
    </function>
    <function name="aero/c/CMNDSPL">
    <description>YAWING MOMENT DUE TO SPOILERS LEFT</description>
          <table>
            <independentVar lookup="row">aero/alpha-deg</independentVar>
            <independentVar lookup="column">aero/beta-deg</independentVar>
            <independentVar lookup="table">fcs/spoiler-left-deg</independentVar>
              <tableData breakPoint="0">
                              -20	       -15	       -10	        -7	        -5	        -2	         0	         2	         5	         7	        10	        15	        20
                    -20	   0.00000	   0.00000	   0.00000	   0.00000	   0.00000	   0.00000	   0.00000	   0.00000	   0.00000	   0.00000	   0.00000	   0.00000	   0.00000
                      0	   0.00000	   0.00000	   0.00000	   0.00000	   0.00000	   0.00000	   0.00000	   0.00000	   0.00000	   0.00000	   0.00000	   0.00000	   0.00000
                      8	   0.00000	   0.00000	   0.00000	   0.00000	   0.00000	   0.00000	   0.00000	   0.00000	   0.00000	   0.00000	   0.00000	   0.00000	   0.00000
                     16	   0.00000	   0.00000	   0.00000	   0.00000	   0.00000	   0.00000	   0.00000	   0.00000	   0.00000	   0.00000	   0.00000	   0.00000	   0.00000
                     28	   0.00000	   0.00000	   0.00000	   0.00000	   0.00000	   0.00000	   0.00000	   0.00000	   0.00000	   0.00000	   0.00000	   0.00000	   0.00000
                     50	   0.00000	   0.00000	   0.00000	   0.00000	   0.00000	   0.00000	   0.00000	   0.00000	   0.00000	   0.00000	   0.00000	   0.00000	   0.00000
                     60	   0.00000	   0.00000	   0.00000	   0.00000	   0.00000	   0.00000	   0.00000	   0.00000	   0.00000	   0.00000	   0.00000	   0.00000	   0.00000
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              </tableData>
              <tableData breakPoint="20">
                              -20	       -15	       -10	        -7	        -5	        -2	         0	         2	         5	         7	        10	        15	        20
                    -20	  -0.00377	  -0.00275	  -0.00088	  -0.00156	  -0.00254	  -0.00261	  -0.00285	  -0.00365	  -0.00401	  -0.00519	  -0.00487	  -0.00543	  -0.00576
                      0	  -0.00366	  -0.00568	  -0.00667	  -0.00633	  -0.00747	  -0.00787	  -0.00798	  -0.00820	  -0.00856	  -0.00854	  -0.00806	  -0.00736	  -0.00725
                      8	  -0.00248	  -0.00500	  -0.00769	  -0.00976	  -0.00996	  -0.00927	  -0.00941	  -0.00942	  -0.00939	  -0.00941	  -0.00853	  -0.00751	  -0.00778
                     16	  -0.00323	  -0.00518	  -0.00818	  -0.00977	  -0.00998	  -0.01049	  -0.01093	  -0.01002	  -0.00955	  -0.00960	  -0.00923	  -0.00770	  -0.00635
                     28	   0.01033	   0.00871	   0.00739	   0.00470	   0.00320	   0.00235	   0.00241	   0.00173	  -0.00234	  -0.00314	  -0.00645	  -0.00655	  -0.00525
                     50	   0.00812	   0.01082	   0.00899	   0.01097	   0.00993	   0.00761	   0.00933	   0.00715	   0.00586	   0.00343	   0.00420	  -0.00263	  -0.00108
                     60	   0.00247	   0.00435	   0.00704	   0.00633	   0.00727	   0.00295	   0.00298	   0.00324	   0.00231	   0.00278	   0.00242	  -0.00032	   0.00282
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              </tableData>
              <tableData breakPoint="50">
                              -20	       -15	       -10	        -7	        -5	        -2	         0	         2	         5	         7	        10	        15	        20
                    -20	  -0.00650	  -0.00655	  -0.00360	  -0.00406	  -0.00399	  -0.00537	  -0.00606	  -0.00713	  -0.00817	  -0.00969	  -0.00925	  -0.01051	  -0.01056
                      0	  -0.00685	  -0.00977	  -0.01204	  -0.01208	  -0.01312	  -0.01461	  -0.01532	  -0.01555	  -0.01607	  -0.01644	  -0.01589	  -0.01449	  -0.01440
                      8	  -0.00339	  -0.00898	  -0.01494	  -0.01796	  -0.01860	  -0.01854	  -0.01830	  -0.01785	  -0.01826	  -0.01837	  -0.01702	  -0.01531	  -0.01547
                     16	  -0.00686	  -0.00957	  -0.01538	  -0.01863	  -0.01965	  -0.02060	  -0.02045	  -0.01912	  -0.01896	  -0.01897	  -0.01833	  -0.01603	  -0.01341
                     28	   0.01126	   0.00908	   0.00592	   0.00140	  -0.00123	  -0.00380	  -0.00420	  -0.00487	  -0.00995	  -0.01157	  -0.01466	  -0.01473	  -0.01190
                     50	   0.01392	   0.01783	   0.01606	   0.01858	   0.01582	   0.01642	   0.01539	   0.01110	   0.00800	   0.00540	   0.00234	  -0.00637	  -0.00299
                     60	   0.00356	   0.00741	   0.00894	   0.01364	   0.01087	   0.00732	   0.00534	   0.00624	   0.00526	   0.00230	  -0.00002	  -0.00238	   0.00370
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              </tableData>
          </table>
    </function>
    <function name="aero/c/CMNDSPR">
    <description>YAWING MOMENT DUE TO SPOILERS RIGHT</description>
          <table>
            <independentVar lookup="row">aero/alpha-deg</independentVar>
            <independentVar lookup="column">aero/beta-deg</independentVar>
            <independentVar lookup="table">fcs/spoiler-right-deg</independentVar>
              <tableData breakPoint="0">
                              -20	       -15	       -10	        -7	        -5	        -2	         0	         2	         5	         7	        10	        15	        20
                    -20	   0.00000	   0.00000	   0.00000	   0.00000	   0.00000	   0.00000	   0.00000	   0.00000	   0.00000	   0.00000	   0.00000	   0.00000	   0.00000
                      0	   0.00000	   0.00000	   0.00000	   0.00000	   0.00000	   0.00000	   0.00000	   0.00000	   0.00000	   0.00000	   0.00000	   0.00000	   0.00000
                      8	   0.00000	   0.00000	   0.00000	   0.00000	   0.00000	   0.00000	   0.00000	   0.00000	   0.00000	   0.00000	   0.00000	   0.00000	   0.00000
                     16	   0.00000	   0.00000	   0.00000	   0.00000	   0.00000	   0.00000	   0.00000	   0.00000	   0.00000	   0.00000	   0.00000	   0.00000	   0.00000
                     28	   0.00000	   0.00000	   0.00000	   0.00000	   0.00000	   0.00000	   0.00000	   0.00000	   0.00000	   0.00000	   0.00000	   0.00000	   0.00000
                     50	   0.00000	   0.00000	   0.00000	   0.00000	   0.00000	   0.00000	   0.00000	   0.00000	   0.00000	   0.00000	   0.00000	   0.00000	   0.00000
                     60	   0.00000	   0.00000	   0.00000	   0.00000	   0.00000	   0.00000	   0.00000	   0.00000	   0.00000	   0.00000	   0.00000	   0.00000	   0.00000
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              </tableData>
              <tableData breakPoint="20">
                              -20	       -15	       -10	        -7	        -5	        -2	         0	         2	         5	         7	        10	        15	        20
                    -20	   0.00377	   0.00275	   0.00088	   0.00156	   0.00254	   0.00261	   0.00285	   0.00365	   0.00401	   0.00519	   0.00487	   0.00543	   0.00576
                      0	   0.00366	   0.00568	   0.00667	   0.00633	   0.00747	   0.00787	   0.00798	   0.00820	   0.00856	   0.00854	   0.00806	   0.00736	   0.00725
                      8	   0.00248	   0.00500	   0.00769	   0.00976	   0.00996	   0.00927	   0.00941	   0.00942	   0.00939	   0.00941	   0.00853	   0.00751	   0.00778
                     16	   0.00323	   0.00518	   0.00818	   0.00977	   0.00998	   0.01049	   0.01093	   0.01002	   0.00955	   0.00960	   0.00923	   0.00770	   0.00635
                     28	  -0.01033	  -0.00871	  -0.00739	  -0.00470	  -0.00320	  -0.00235	  -0.00241	  -0.00173	   0.00234	   0.00314	   0.00645	   0.00655	   0.00525
                     50	  -0.00812	  -0.01082	  -0.00899	  -0.01097	  -0.00993	  -0.00761	  -0.00933	  -0.00715	  -0.00586	  -0.00343	  -0.00420	   0.00263	   0.00108
                     60	  -0.00247	  -0.00435	  -0.00704	  -0.00633	  -0.00727	  -0.00295	  -0.00298	  -0.00324	  -0.00231	  -0.00278	  -0.00242	   0.00032	  -0.00282
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              </tableData>
              <tableData breakPoint="50">
                              -20	       -15	       -10	        -7	        -5	        -2	         0	         2	         5	         7	        10	        15	        20
                    -20	   0.00650	   0.00655	   0.00360	   0.00406	   0.00399	   0.00537	   0.00606	   0.00713	   0.00817	   0.00969	   0.00925	   0.01051	   0.01056
                      0	   0.00685	   0.00977	   0.01204	   0.01208	   0.01312	   0.01461	   0.01532	   0.01555	   0.01607	   0.01644	   0.01589	   0.01449	   0.01440
                      8	   0.00339	   0.00898	   0.01494	   0.01796	   0.01860	   0.01854	   0.01830	   0.01785	   0.01826	   0.01837	   0.01702	   0.01531	   0.01547
                     16	   0.00686	   0.00957	   0.01538	   0.01863	   0.01965	   0.02060	   0.02045	   0.01912	   0.01896	   0.01897	   0.01833	   0.01603	   0.01341
                     28	  -0.01126	  -0.00908	  -0.00592	  -0.00140	   0.00123	   0.00380	   0.00420	   0.00487	   0.00995	   0.01157	   0.01466	   0.01473	   0.01190
                     50	  -0.01392	  -0.01783	  -0.01606	  -0.01858	  -0.01582	  -0.01642	  -0.01539	  -0.01110	  -0.00800	  -0.00540	  -0.00234	   0.00637	   0.00299
                     60	  -0.00356	  -0.00741	  -0.00894	  -0.01364	  -0.01087	  -0.00732	  -0.00534	  -0.00624	  -0.00526	  -0.00230	   0.00002	   0.00238	  -0.00370
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              </tableData>
          </table>
    </function>
    <function name="aero/c/CMNDTD">
    <description>YAWING MOMENT DUE TO DIFFERENTIAL TAIL DEFLECTION</description>
    <product>
          <property>fcs/differential-elevator-pos-deg</property>
          <table>
            <independentVar lookup="row">aero/alpha-deg</independentVar>
            <independentVar lookup="column">fcs/pitch-pos-deg</independentVar>
            <tableData>
                                -25	        -20	        -15	        -10	         -5	          0	          5	         10	         15
                    -20	   0.00122	   0.00155	   0.00181	   0.00205	   0.00226	   0.00243	   0.00246	   0.00216	   0.00138
                      0	   0.00125	   0.00147	   0.00223	   0.00214	   0.00211	   0.00238	   0.00261	   0.00231	   0.00155
                      8	   0.00143	   0.00163	   0.00181	   0.00192	   0.00234	   0.00240	   0.00245	   0.00241	   0.00200
                     16	   0.00128	   0.00157	   0.00192	   0.00212	   0.00232	   0.00253	   0.00260	   0.00250	   0.00213
                     28	   0.00097	   0.00111	   0.00183	   0.00218	   0.00255	   0.00274	   0.00274	   0.00279	   0.00256
                     50	  -0.00066	  -0.00034	   0.00059	   0.00109	   0.00150	   0.00249	   0.00333	   0.00314	   0.00348
                     60	  -0.00104	  -0.00108	   0.00003	  -0.00006	   0.00062	   0.00229	   0.00300	   0.00261	   0.00270
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            </tableData>
          </table>
       </product>
    </function>
    <function name="aero/c/CMNGEAR">
    <description>YAWING MOMENT DUE TO GEAR</description>
    <product>
          <property>gear/gear-pos-norm</property>
          <table>
            <independentVar lookup="row">aero/alpha-deg</independentVar>
            <independentVar lookup="column">aero/beta-deg</independentVar>
            <tableData>
                                -20	        -15	        -10	         -7	         -5	         -2	          0	          2	          5	          7	         10	         15	         20
                    -20	  -0.01144	  -0.01215	  -0.01044	  -0.00750	  -0.00545	  -0.00222	  -0.00002	   0.00219	   0.00536	   0.00743	   0.01041	   0.01219	   0.01155
                      0	  -0.01156	  -0.01194	  -0.01034	  -0.00742	  -0.00537	  -0.00218	   0.00000	   0.00218	   0.00537	   0.00743	   0.01034	   0.01193	   0.01156
                      8	  -0.01145	  -0.01136	  -0.00974	  -0.00701	  -0.00507	  -0.00205	   0.00001	   0.00207	   0.00507	   0.00698	   0.00976	   0.01136	   0.01145
                     16	  -0.01072	  -0.01108	  -0.00905	  -0.00653	  -0.00468	  -0.00182	  -0.00007	   0.00177	   0.00477	   0.00661	   0.00908	   0.01116	   0.01071
                     28	  -0.00995	  -0.01028	  -0.00841	  -0.00535	  -0.00377	  -0.00172	  -0.00015	   0.00101	   0.00403	   0.00544	   0.00773	   0.01070	   0.00997
                     50	  -0.00713	  -0.00642	  -0.00358	  -0.00328	  -0.00054	  -0.00145	  -0.00030	   0.00012	   0.00071	   0.00316	   0.00393	   0.00559	   0.00736
                     60	  -0.00376	  -0.00258	  -0.00329	  -0.00341	  -0.00223	   0.00086	  -0.00138	   0.00039	   0.00124	   0.00193	   0.00102	   0.00363	   0.00440
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            </tableData>
          </table>
       </product>
    </function>
    <function name="aero/c/CMNMN">
    <description>YAWING MOMENT DUE TO MACH</description>
          <table>
            <independentVar lookup="row">velocities/mach</independentVar>
            <independentVar lookup="column">aero/alpha-deg</independentVar>
            <tableData>
                                -10	         -5	         -2	       0.01	          1	          2	          6	          7	         10
                    0.2	   0.00000	   0.00000	   0.00000	   0.00000	   0.00000	   0.00000	   0.00001	   0.00002	   0.00001
                    0.8	   0.00000	   0.00000	  -0.00003	   0.00000	   0.00000	  -0.00001	  -0.00003	   0.00001	   0.00002
                   0.91	   0.00003	   0.00000	   0.00000	   0.00000	   0.00000	   0.00000	   0.00000	   0.00004	   0.00001
                   0.99	   0.00000	   0.00000	   0.00000	   0.00000	   0.00000	   0.00000	   0.00000	   0.00001	   0.00002
                      2	   0.00802	   0.00197	   0.00050	   0.00011	   0.00004	   0.00002	   0.00013	   0.00014	  -0.00028
                    2.4	   0.00110	   0.00027	   0.00005	   0.00000	  -0.00001	   0.00000	   0.00011	   0.00017	   0.00034
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            </tableData>
          </table>
    </function>
    <function name="aero/c/CMNP">
    <description>YAW DERIVATIVE MOMENT DUE TO ROLL RATE</description>
    <product>
          <property>aero/pb</property>
          <table>
            <independentVar lookup="row">aero/alpha-deg</independentVar>
            <independentVar lookup="column">aero/beta-deg</independentVar>
            <tableData>
                                -20	        -15	        -10	         -7	         -5	         -2	          0	          2	          5	          7	         10	         15	         20
                    -20	   0.16626	   0.18088	   0.19778	   0.21342	   0.20107	   0.19629	   0.20303	   0.20230	   0.20665	   0.20857	   0.19276	   0.18819	   0.15777
                      0	   0.00992	   0.00046	  -0.01095	  -0.01363	  -0.02085	  -0.02155	  -0.02784	  -0.02526	  -0.02489	  -0.02293	  -0.01869	  -0.01215	  -0.00476
                      8	  -0.09431	  -0.12335	  -0.15598	  -0.16583	  -0.17895	  -0.17343	  -0.18253	  -0.17847	  -0.17921	  -0.17182	  -0.15637	  -0.14565	  -0.15422
                     16	  -0.19208	  -0.23036	  -0.27279	  -0.28343	  -0.30567	  -0.32158	  -0.33013	  -0.30617	  -0.28745	  -0.28389	  -0.27467	  -0.23807	  -0.18811
                     28	  -0.20650	  -0.25910	  -0.27126	  -0.27318	  -0.27343	  -0.28597	  -0.29366	  -0.28660	  -0.27855	  -0.26009	  -0.27932	  -0.24096	  -0.20013
                     50	  -0.17813	  -0.19683	  -0.26705	  -0.28091	  -0.30110	  -0.30176	  -0.25666	  -0.30113	  -0.34002	  -0.32020	  -0.26306	  -0.23512	  -0.16441
                     60	  -0.17123	  -0.14092	  -0.25221	  -0.21832	  -0.17786	  -0.28529	  -0.24219	  -0.20331	  -0.21608	  -0.23001	  -0.20677	  -0.20184	  -0.16618
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            </tableData>
          </table>
       </product>
    </function>
    <function name="aero/c/CMNR">
    <description>YAW DAMPING DERIVATIVE</description>
    <product>
          <property>aero/rb</property>
          <table>
            <independentVar lookup="row">aero/alpha-deg</independentVar>
            <independentVar lookup="column">aero/beta-deg</independentVar>
            <tableData>
                                -20	        -15	        -10	         -7	         -5	         -2	          0	          2	          5	          7	         10	         15	         20
                    -20	  -0.26404	  -0.37458	  -0.39610	  -0.42164	  -0.41067	  -0.38922	  -0.37335	  -0.37226	  -0.37894	  -0.39398	  -0.35318	  -0.30761	  -0.33011
                      0	  -0.39796	  -0.47061	  -0.51170	  -0.50555	  -0.51087	  -0.50800	  -0.50061	  -0.49474	  -0.49930	  -0.49056	  -0.50084	  -0.45976	  -0.42171
                      8	  -0.34453	  -0.41941	  -0.49270	  -0.50724	  -0.49128	  -0.49901	  -0.47248	  -0.45228	  -0.48408	  -0.46323	  -0.46766	  -0.44979	  -0.42251
                     16	  -0.34118	  -0.34925	  -0.41691	  -0.44350	  -0.43217	  -0.46019	  -0.39089	  -0.37913	  -0.42431	  -0.41085	  -0.40986	  -0.36451	  -0.31385
                     28	  -0.12785	  -0.19769	  -0.29594	  -0.29594	  -0.28298	  -0.28379	  -0.33137	  -0.31348	  -0.28310	  -0.27634	  -0.28788	  -0.23080	  -0.19662
                     50	   0.07572	   0.18181	  -0.00744	   0.07434	   0.06560	   0.08026	   0.11033	   0.09776	   0.09591	   0.00879	   0.04007	   0.06833	   0.09330
                     60	   0.01849	   0.31357	   0.32504	   0.33349	   0.32319	   0.29444	   0.37390	   0.38257	   0.28646	   0.36367	   0.29760	   0.35131	   0.23073
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            </tableData>
          </table>
       </product>
    </function>
    <function name="aero/c/CMNTANKC">
    <description>YAWING MOMENT INCREMENT DUE TO CENTRE TANK</description>
    <product>
          <property>inertia/tank-centre-fitted</property>
          <table>
            <independentVar lookup="row">aero/alpha-deg</independentVar>
            <independentVar lookup="column">aero/beta-deg</independentVar>
            <independentVar lookup="table">fcs/pitch-pos-deg</independentVar>
              <tableData breakPoint="-25">
                              -20	       -15	       -10	        -7	        -5	        -2	         0	         2	         5	         7	        10	        15	        20
                    -20	  -0.00442	  -0.00368	  -0.00260	  -0.00186	  -0.00123	  -0.00055	   0.00004	   0.00054	   0.00124	   0.00184	   0.00260	   0.00372	   0.00436
                      0	  -0.00390	  -0.00320	  -0.00229	  -0.00163	  -0.00119	  -0.00048	   0.00000	   0.00049	   0.00119	   0.00163	   0.00229	   0.00318	   0.00389
                      8	  -0.00364	  -0.00292	  -0.00208	  -0.00147	  -0.00107	  -0.00045	   0.00000	   0.00045	   0.00108	   0.00147	   0.00208	   0.00293	   0.00356
                     16	  -0.00318	  -0.00254	  -0.00193	  -0.00140	  -0.00105	  -0.00060	  -0.00005	   0.00046	   0.00094	   0.00127	   0.00187	   0.00258	   0.00315
                     28	  -0.00210	  -0.00184	  -0.00240	  -0.00055	  -0.00043	  -0.00033	  -0.00024	   0.00026	   0.00072	   0.00087	   0.00117	   0.00187	   0.00210
                     50	  -0.00088	  -0.00164	   0.00022	  -0.00076	   0.00037	  -0.00011	  -0.00055	  -0.00014	  -0.00095	   0.00033	  -0.00035	   0.00086	   0.00094
                     60	  -0.00098	   0.00016	  -0.00180	  -0.00067	  -0.00091	   0.00016	  -0.00070	  -0.00005	   0.00150	   0.00067	  -0.00009	  -0.00006	   0.00064
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              </tableData>
              <tableData breakPoint="-20">
                              -20	       -15	       -10	        -7	        -5	        -2	         0	         2	         5	         7	        10	        15	        20
                    -20	  -0.00442	  -0.00368	  -0.00260	  -0.00186	  -0.00123	  -0.00055	   0.00004	   0.00054	   0.00124	   0.00184	   0.00260	   0.00372	   0.00436
                      0	  -0.00390	  -0.00320	  -0.00229	  -0.00163	  -0.00119	  -0.00048	   0.00000	   0.00049	   0.00119	   0.00163	   0.00229	   0.00318	   0.00389
                      8	  -0.00364	  -0.00292	  -0.00208	  -0.00147	  -0.00107	  -0.00045	   0.00000	   0.00045	   0.00108	   0.00147	   0.00208	   0.00293	   0.00356
                     16	  -0.00318	  -0.00254	  -0.00193	  -0.00140	  -0.00105	  -0.00060	  -0.00005	   0.00046	   0.00094	   0.00127	   0.00187	   0.00258	   0.00315
                     28	  -0.00210	  -0.00184	  -0.00240	  -0.00055	  -0.00043	  -0.00033	  -0.00024	   0.00026	   0.00072	   0.00087	   0.00117	   0.00187	   0.00210
                     50	  -0.00088	  -0.00164	   0.00022	  -0.00076	   0.00037	  -0.00011	  -0.00055	  -0.00014	  -0.00095	   0.00033	  -0.00035	   0.00086	   0.00094
                     60	  -0.00098	   0.00016	  -0.00180	  -0.00067	  -0.00091	   0.00016	  -0.00070	  -0.00005	   0.00150	   0.00067	  -0.00009	  -0.00006	   0.00064
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              </tableData>
              <tableData breakPoint="-15">
                              -20	       -15	       -10	        -7	        -5	        -2	         0	         2	         5	         7	        10	        15	        20
                    -20	  -0.00442	  -0.00368	  -0.00260	  -0.00186	  -0.00123	  -0.00055	   0.00004	   0.00054	   0.00124	   0.00184	   0.00260	   0.00372	   0.00436
                      0	  -0.00390	  -0.00320	  -0.00229	  -0.00163	  -0.00119	  -0.00048	   0.00000	   0.00049	   0.00119	   0.00163	   0.00229	   0.00318	   0.00389
                      8	  -0.00364	  -0.00292	  -0.00208	  -0.00147	  -0.00107	  -0.00045	   0.00000	   0.00045	   0.00108	   0.00147	   0.00208	   0.00293	   0.00356
                     16	  -0.00318	  -0.00254	  -0.00193	  -0.00140	  -0.00105	  -0.00060	  -0.00005	   0.00046	   0.00094	   0.00127	   0.00187	   0.00258	   0.00315
                     28	  -0.00210	  -0.00184	  -0.00240	  -0.00055	  -0.00043	  -0.00033	  -0.00024	   0.00026	   0.00072	   0.00087	   0.00117	   0.00187	   0.00210
                     50	  -0.00088	  -0.00164	   0.00022	  -0.00076	   0.00037	  -0.00011	  -0.00055	  -0.00014	  -0.00095	   0.00033	  -0.00035	   0.00086	   0.00094
                     60	  -0.00098	   0.00016	  -0.00180	  -0.00067	  -0.00091	   0.00016	  -0.00070	  -0.00005	   0.00150	   0.00067	  -0.00009	  -0.00006	   0.00064
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              </tableData>
              <tableData breakPoint="-10">
                              -20	       -15	       -10	        -7	        -5	        -2	         0	         2	         5	         7	        10	        15	        20
                    -20	  -0.00442	  -0.00368	  -0.00260	  -0.00186	  -0.00123	  -0.00055	   0.00004	   0.00054	   0.00124	   0.00184	   0.00260	   0.00372	   0.00436
                      0	  -0.00390	  -0.00320	  -0.00229	  -0.00163	  -0.00119	  -0.00048	   0.00000	   0.00049	   0.00119	   0.00163	   0.00229	   0.00318	   0.00389
                      8	  -0.00364	  -0.00292	  -0.00208	  -0.00147	  -0.00107	  -0.00045	   0.00000	   0.00045	   0.00108	   0.00147	   0.00208	   0.00293	   0.00356
                     16	  -0.00318	  -0.00254	  -0.00193	  -0.00140	  -0.00105	  -0.00060	  -0.00005	   0.00046	   0.00094	   0.00127	   0.00187	   0.00258	   0.00315
                     28	  -0.00210	  -0.00184	  -0.00240	  -0.00055	  -0.00043	  -0.00033	  -0.00024	   0.00026	   0.00072	   0.00087	   0.00117	   0.00187	   0.00210
                     50	  -0.00088	  -0.00164	   0.00022	  -0.00076	   0.00037	  -0.00011	  -0.00055	  -0.00014	  -0.00095	   0.00033	  -0.00035	   0.00086	   0.00094
                     60	  -0.00098	   0.00016	  -0.00180	  -0.00067	  -0.00091	   0.00016	  -0.00070	  -0.00005	   0.00150	   0.00067	  -0.00009	  -0.00006	   0.00064
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              </tableData>
              <tableData breakPoint="-5">
                              -20	       -15	       -10	        -7	        -5	        -2	         0	         2	         5	         7	        10	        15	        20
                    -20	  -0.00442	  -0.00368	  -0.00260	  -0.00186	  -0.00123	  -0.00055	   0.00004	   0.00054	   0.00124	   0.00184	   0.00260	   0.00372	   0.00436
                      0	  -0.00390	  -0.00320	  -0.00229	  -0.00163	  -0.00119	  -0.00048	   0.00000	   0.00049	   0.00119	   0.00163	   0.00229	   0.00318	   0.00389
                      8	  -0.00364	  -0.00292	  -0.00208	  -0.00147	  -0.00107	  -0.00045	   0.00000	   0.00045	   0.00108	   0.00147	   0.00208	   0.00293	   0.00356
                     16	  -0.00318	  -0.00254	  -0.00193	  -0.00140	  -0.00105	  -0.00060	  -0.00005	   0.00046	   0.00094	   0.00127	   0.00187	   0.00258	   0.00315
                     28	  -0.00210	  -0.00184	  -0.00240	  -0.00055	  -0.00043	  -0.00033	  -0.00024	   0.00026	   0.00072	   0.00087	   0.00117	   0.00187	   0.00210
                     50	  -0.00088	  -0.00164	   0.00022	  -0.00076	   0.00037	  -0.00011	  -0.00055	  -0.00014	  -0.00095	   0.00033	  -0.00035	   0.00086	   0.00094
                     60	  -0.00098	   0.00016	  -0.00180	  -0.00067	  -0.00091	   0.00016	  -0.00070	  -0.00005	   0.00150	   0.00067	  -0.00009	  -0.00006	   0.00064
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              </tableData>
              <tableData breakPoint="0">
                              -20	       -15	       -10	        -7	        -5	        -2	         0	         2	         5	         7	        10	        15	        20
                    -20	  -0.00442	  -0.00368	  -0.00260	  -0.00186	  -0.00123	  -0.00055	   0.00004	   0.00054	   0.00124	   0.00184	   0.00260	   0.00372	   0.00436
                      0	  -0.00390	  -0.00320	  -0.00229	  -0.00163	  -0.00119	  -0.00048	   0.00000	   0.00049	   0.00119	   0.00163	   0.00229	   0.00318	   0.00389
                      8	  -0.00364	  -0.00292	  -0.00208	  -0.00147	  -0.00107	  -0.00045	   0.00000	   0.00045	   0.00108	   0.00147	   0.00208	   0.00293	   0.00356
                     16	  -0.00318	  -0.00254	  -0.00193	  -0.00140	  -0.00105	  -0.00060	  -0.00005	   0.00046	   0.00094	   0.00127	   0.00187	   0.00258	   0.00315
                     28	  -0.00210	  -0.00184	  -0.00240	  -0.00055	  -0.00043	  -0.00033	  -0.00024	   0.00026	   0.00072	   0.00087	   0.00117	   0.00187	   0.00210
                     50	  -0.00088	  -0.00164	   0.00022	  -0.00076	   0.00037	  -0.00011	  -0.00055	  -0.00014	  -0.00095	   0.00033	  -0.00035	   0.00086	   0.00094
                     60	  -0.00098	   0.00016	  -0.00180	  -0.00067	  -0.00091	   0.00016	  -0.00070	  -0.00005	   0.00150	   0.00067	  -0.00009	  -0.00006	   0.00064
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              </tableData>
              <tableData breakPoint="5">
                              -20	       -15	       -10	        -7	        -5	        -2	         0	         2	         5	         7	        10	        15	        20
                    -20	  -0.00442	  -0.00368	  -0.00260	  -0.00186	  -0.00123	  -0.00055	   0.00004	   0.00054	   0.00124	   0.00184	   0.00260	   0.00372	   0.00436
                      0	  -0.00390	  -0.00320	  -0.00229	  -0.00163	  -0.00119	  -0.00048	   0.00000	   0.00049	   0.00119	   0.00163	   0.00229	   0.00318	   0.00389
                      8	  -0.00364	  -0.00292	  -0.00208	  -0.00147	  -0.00107	  -0.00045	   0.00000	   0.00045	   0.00108	   0.00147	   0.00208	   0.00293	   0.00356
                     16	  -0.00318	  -0.00254	  -0.00193	  -0.00140	  -0.00105	  -0.00060	  -0.00005	   0.00046	   0.00094	   0.00127	   0.00187	   0.00258	   0.00315
                     28	  -0.00210	  -0.00184	  -0.00240	  -0.00055	  -0.00043	  -0.00033	  -0.00024	   0.00026	   0.00072	   0.00087	   0.00117	   0.00187	   0.00210
                     50	  -0.00088	  -0.00164	   0.00022	  -0.00076	   0.00037	  -0.00011	  -0.00055	  -0.00014	  -0.00095	   0.00033	  -0.00035	   0.00086	   0.00094
                     60	  -0.00098	   0.00016	  -0.00180	  -0.00067	  -0.00091	   0.00016	  -0.00070	  -0.00005	   0.00150	   0.00067	  -0.00009	  -0.00006	   0.00064
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              </tableData>
              <tableData breakPoint="10">
                              -20	       -15	       -10	        -7	        -5	        -2	         0	         2	         5	         7	        10	        15	        20
                    -20	  -0.00442	  -0.00368	  -0.00260	  -0.00186	  -0.00123	  -0.00055	   0.00004	   0.00054	   0.00124	   0.00184	   0.00260	   0.00372	   0.00436
                      0	  -0.00390	  -0.00320	  -0.00229	  -0.00163	  -0.00119	  -0.00048	   0.00000	   0.00049	   0.00119	   0.00163	   0.00229	   0.00318	   0.00389
                      8	  -0.00364	  -0.00292	  -0.00208	  -0.00147	  -0.00107	  -0.00045	   0.00000	   0.00045	   0.00108	   0.00147	   0.00208	   0.00293	   0.00356
                     16	  -0.00318	  -0.00254	  -0.00193	  -0.00140	  -0.00105	  -0.00060	  -0.00005	   0.00046	   0.00094	   0.00127	   0.00187	   0.00258	   0.00315
                     28	  -0.00210	  -0.00184	  -0.00240	  -0.00055	  -0.00043	  -0.00033	  -0.00024	   0.00026	   0.00072	   0.00087	   0.00117	   0.00187	   0.00210
                     50	  -0.00088	  -0.00164	   0.00022	  -0.00076	   0.00037	  -0.00011	  -0.00055	  -0.00014	  -0.00095	   0.00033	  -0.00035	   0.00086	   0.00094
                     60	  -0.00098	   0.00016	  -0.00180	  -0.00067	  -0.00091	   0.00016	  -0.00070	  -0.00005	   0.00150	   0.00067	  -0.00009	  -0.00006	   0.00064
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              </tableData>
              <tableData breakPoint="15">
                              -20	       -15	       -10	        -7	        -5	        -2	         0	         2	         5	         7	        10	        15	        20
                    -20	  -0.00442	  -0.00368	  -0.00260	  -0.00186	  -0.00123	  -0.00055	   0.00004	   0.00054	   0.00124	   0.00184	   0.00260	   0.00372	   0.00436
                      0	  -0.00390	  -0.00320	  -0.00229	  -0.00163	  -0.00119	  -0.00048	   0.00000	   0.00049	   0.00119	   0.00163	   0.00229	   0.00318	   0.00389
                      8	  -0.00364	  -0.00292	  -0.00208	  -0.00147	  -0.00107	  -0.00045	   0.00000	   0.00045	   0.00108	   0.00147	   0.00208	   0.00293	   0.00356
                     16	  -0.00318	  -0.00254	  -0.00193	  -0.00140	  -0.00105	  -0.00060	  -0.00005	   0.00046	   0.00094	   0.00127	   0.00187	   0.00258	   0.00315
                     28	  -0.00210	  -0.00184	  -0.00240	  -0.00055	  -0.00043	  -0.00033	  -0.00024	   0.00026	   0.00072	   0.00087	   0.00117	   0.00187	   0.00210
                     50	  -0.00088	  -0.00164	   0.00022	  -0.00076	   0.00037	  -0.00011	  -0.00055	  -0.00014	  -0.00095	   0.00033	  -0.00035	   0.00086	   0.00094
                     60	  -0.00098	   0.00016	  -0.00180	  -0.00067	  -0.00091	   0.00016	  -0.00070	  -0.00005	   0.00150	   0.00067	  -0.00009	  -0.00006	   0.00064
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              </tableData>
          </table>
       </product>
    </function>
    <function name="aero/c/CMNTANKL">
    <description>YAWING MOMENT INCREMENT DUE TO LEFT WING TANK</description>
    <product>
          <property>inertia/tank-wing-left-fitted</property>
          <table>
            <independentVar lookup="row">aero/alpha-deg</independentVar>
            <independentVar lookup="column">aero/beta-deg</independentVar>
            <independentVar lookup="table">fcs/pitch-pos-deg</independentVar>
              <tableData breakPoint="-25">
                              -20	       -15	       -10	        -7	        -5	        -2	         0	         2	         5	         7	        10	        15	        20
                    -20	  -0.05500	  -0.04596	  -0.03411	  -0.02335	  -0.01714	  -0.00664	   0.00002	   0.00673	   0.01706	   0.02332	   0.03414	   0.04576	   0.05494
                      0	  -0.03789	  -0.03338	  -0.02454	  -0.01818	  -0.01284	  -0.00515	   0.00000	   0.00514	   0.01281	   0.01819	   0.02452	   0.03348	   0.03782
                      8	  -0.03129	  -0.02435	  -0.02110	  -0.01739	  -0.01382	  -0.00372	  -0.00028	   0.00336	   0.01385	   0.01743	   0.02109	   0.02401	   0.03126
                     16	  -0.01923	  -0.02142	  -0.01637	  -0.01018	  -0.00937	  -0.00262	   0.00068	   0.00131	   0.00909	   0.01009	   0.01633	   0.02186	   0.01976
                     28	  -0.00107	  -0.00520	  -0.00575	  -0.00332	  -0.00377	  -0.00182	   0.00022	   0.00175	   0.00397	   0.00353	   0.00505	   0.00487	   0.00114
                     50	   0.03859	   0.02945	   0.02395	   0.01528	   0.01383	   0.00632	  -0.00053	  -0.00585	  -0.01406	  -0.01565	  -0.02365	  -0.03047	  -0.03890
                     60	   0.04105	   0.03230	   0.02213	   0.01679	   0.01331	   0.00779	  -0.00089	  -0.00774	  -0.01311	  -0.01725	  -0.02348	  -0.03224	  -0.03976
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              </tableData>
              <tableData breakPoint="-20">
                              -20	       -15	       -10	        -7	        -5	        -2	         0	         2	         5	         7	        10	        15	        20
                    -20	  -0.04668	  -0.03939	  -0.02920	  -0.02029	  -0.01449	  -0.00557	   0.00003	   0.00559	   0.01438	   0.02021	   0.02927	   0.03944	   0.04674
                      0	  -0.02733	  -0.02333	  -0.01769	  -0.01233	  -0.00947	  -0.00437	  -0.00001	   0.00437	   0.00949	   0.01232	   0.01771	   0.02340	   0.02726
                      8	  -0.02178	  -0.01722	  -0.01300	  -0.01115	  -0.00757	  -0.00416	  -0.00122	   0.00596	   0.00765	   0.01145	   0.01299	   0.01719	   0.02179
                     16	  -0.01202	  -0.01272	  -0.00939	  -0.00773	  -0.00571	  -0.00135	  -0.00011	   0.00190	   0.00581	   0.00757	   0.00951	   0.01266	   0.01193
                     28	   0.00481	   0.00155	  -0.00025	   0.00002	  -0.00085	  -0.00137	  -0.00012	   0.00087	   0.00117	   0.00000	  -0.00038	  -0.00139	  -0.00475
                     50	   0.03414	   0.02774	   0.02081	   0.01422	   0.01364	   0.00584	  -0.00094	  -0.00632	  -0.01349	  -0.01471	  -0.02097	  -0.02811	  -0.03424
                     60	   0.03288	   0.02811	   0.01855	   0.01493	   0.01085	   0.00564	  -0.00009	  -0.00763	  -0.01126	  -0.01457	  -0.02043	  -0.02768	  -0.03430
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              </tableData>
              <tableData breakPoint="-15">
                              -20	       -15	       -10	        -7	        -5	        -2	         0	         2	         5	         7	        10	        15	        20
                    -20	  -0.03305	  -0.02589	  -0.01938	  -0.01375	  -0.00969	  -0.00480	   0.00004	   0.00484	   0.00966	   0.01383	   0.01954	   0.02594	   0.03296
                      0	  -0.01420	  -0.01269	  -0.00968	  -0.00635	  -0.00451	  -0.00247	  -0.00001	   0.00247	   0.00450	   0.00635	   0.00968	   0.01268	   0.01425
                      8	  -0.01065	  -0.00976	  -0.00687	  -0.00570	  -0.00397	  -0.00029	  -0.00006	   0.00026	   0.00356	   0.00594	   0.00673	   0.00968	   0.01066
                     16	  -0.00339	  -0.00535	  -0.00384	  -0.00287	  -0.00212	  -0.00008	  -0.00014	   0.00028	   0.00206	   0.00293	   0.00379	   0.00544	   0.00334
                     28	   0.00826	   0.00609	   0.00157	   0.00289	   0.00093	  -0.00002	  -0.00048	  -0.00060	  -0.00077	  -0.00287	  -0.00169	  -0.00626	  -0.00845
                     50	   0.02744	   0.02179	   0.01736	   0.01273	   0.01094	   0.00481	   0.00047	  -0.00558	  -0.01101	  -0.01318	  -0.01772	  -0.02247	  -0.02758
                     60	   0.02783	   0.02111	   0.01637	   0.01033	   0.00969	   0.00724	  -0.00030	  -0.00728	  -0.00766	  -0.01057	  -0.01833	  -0.02100	  -0.02735
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              </tableData>
              <tableData breakPoint="-10">
                              -20	       -15	       -10	        -7	        -5	        -2	         0	         2	         5	         7	        10	        15	        20
                    -20	  -0.01822	  -0.01445	  -0.01160	  -0.00827	  -0.00588	  -0.00303	   0.00002	   0.00297	   0.00589	   0.00825	   0.01167	   0.01456	   0.01820
                      0	  -0.00631	  -0.00511	  -0.00427	  -0.00284	  -0.00281	  -0.00159	  -0.00001	   0.00158	   0.00265	   0.00284	   0.00427	   0.00510	   0.00632
                      8	  -0.00425	  -0.00265	  -0.00195	  -0.00216	  -0.00115	  -0.00048	  -0.00002	   0.00062	   0.00105	   0.00214	   0.00195	   0.00261	   0.00426
                     16	   0.00109	  -0.00052	  -0.00052	  -0.00054	  -0.00008	  -0.00032	   0.00011	   0.00003	  -0.00010	   0.00055	   0.00051	   0.00050	  -0.00110
                     28	   0.00793	   0.00616	   0.00208	   0.00262	   0.00098	   0.00043	  -0.00020	  -0.00090	  -0.00077	  -0.00245	  -0.00316	  -0.00631	  -0.00784
                     50	   0.01936	   0.01571	   0.01241	   0.00989	   0.00854	   0.00148	   0.00024	  -0.00264	  -0.00853	  -0.01060	  -0.01237	  -0.01682	  -0.01926
                     60	   0.02310	   0.01720	   0.01325	   0.00752	   0.00550	   0.00515	   0.00007	  -0.00484	  -0.00798	  -0.00760	  -0.01516	  -0.01687	  -0.02294
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              </tableData>
              <tableData breakPoint="-5">
                              -20	       -15	       -10	        -7	        -5	        -2	         0	         2	         5	         7	        10	        15	        20
                    -20	  -0.00716	  -0.00545	  -0.00414	  -0.00341	  -0.00260	  -0.00130	   0.00000	   0.00132	   0.00258	   0.00353	   0.00419	   0.00554	   0.00718
                      0	  -0.00243	  -0.00184	  -0.00132	  -0.00131	  -0.00097	  -0.00033	   0.00000	   0.00035	   0.00097	   0.00131	   0.00132	   0.00182	   0.00241
                      8	  -0.00066	  -0.00033	  -0.00051	  -0.00069	  -0.00014	  -0.00004	   0.00012	   0.00002	   0.00014	   0.00064	   0.00051	   0.00032	   0.00070
                     16	   0.00133	   0.00043	   0.00042	   0.00012	   0.00013	   0.00016	  -0.00002	  -0.00019	  -0.00013	   0.00001	  -0.00040	  -0.00035	  -0.00134
                     28	   0.00516	   0.00432	   0.00259	   0.00141	   0.00138	   0.00029	   0.00011	  -0.00107	  -0.00111	  -0.00133	  -0.00266	  -0.00476	  -0.00517
                     50	   0.01266	   0.00915	   0.00860	   0.00419	   0.00584	   0.00083	  -0.00056	  -0.00134	  -0.00548	  -0.00509	  -0.00877	  -0.01036	  -0.01250
                     60	   0.01666	   0.01061	   0.00722	   0.00494	   0.00545	   0.00379	  -0.00179	  -0.00294	  -0.00373	  -0.00513	  -0.00950	  -0.00975	  -0.01693
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              </tableData>
              <tableData breakPoint="0">
                              -20	       -15	       -10	        -7	        -5	        -2	         0	         2	         5	         7	        10	        15	        20
                    -20	   0.00000	  -0.00003	   0.00000	  -0.00005	  -0.00001	  -0.00001	  -0.00008	   0.00003	  -0.00010	   0.00002	   0.00001	   0.00002	   0.00001
                      0	   0.00000	  -0.00002	   0.00000	   0.00000	   0.00000	   0.00000	   0.00000	   0.00001	   0.00000	   0.00000	   0.00000	  -0.00002	   0.00000
                      8	  -0.00001	   0.00001	   0.00003	   0.00001	   0.00000	   0.00000	   0.00000	   0.00000	   0.00000	  -0.00006	   0.00000	  -0.00002	   0.00003
                     16	  -0.00001	   0.00011	  -0.00002	  -0.00005	   0.00003	   0.00003	   0.00001	  -0.00006	  -0.00005	   0.00005	  -0.00002	   0.00002	   0.00002
                     28	   0.00002	   0.00008	  -0.00062	   0.00010	   0.00030	  -0.00032	   0.00029	  -0.00046	   0.00000	  -0.00033	   0.00000	   0.00031	   0.00000
                     50	   0.00009	  -0.00084	   0.00095	  -0.00118	   0.00149	  -0.00014	  -0.00119	  -0.00047	  -0.00078	  -0.00051	   0.00023	  -0.00008	  -0.00014
                     60	   0.00049	   0.00052	   0.00022	   0.00004	   0.00080	   0.00128	  -0.00049	  -0.00034	  -0.00071	  -0.00048	  -0.00087	   0.00012	  -0.00022
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              </tableData>
              <tableData breakPoint="5">
                              -20	       -15	       -10	        -7	        -5	        -2	         0	         2	         5	         7	        10	        15	        20
                    -20	   0.00420	   0.00322	   0.00236	   0.00188	   0.00145	   0.00048	   0.00003	  -0.00049	  -0.00114	  -0.00190	  -0.00233	  -0.00317	  -0.00417
                      0	   0.00044	   0.00095	   0.00000	   0.00003	   0.00004	  -0.00013	   0.00000	   0.00013	  -0.00004	  -0.00003	  -0.00001	  -0.00097	  -0.00044
                      8	  -0.00237	  -0.00101	  -0.00014	   0.00020	  -0.00005	   0.00034	   0.00000	  -0.00024	   0.00004	  -0.00025	   0.00015	   0.00100	   0.00238
                     16	  -0.00317	  -0.00251	  -0.00140	  -0.00055	  -0.00062	  -0.00057	   0.00002	   0.00064	   0.00065	   0.00046	   0.00139	   0.00263	   0.00312
                     28	  -0.00642	  -0.00511	  -0.00409	  -0.00137	  -0.00104	  -0.00028	   0.00008	  -0.00059	   0.00116	   0.00172	   0.00357	   0.00514	   0.00615
                     50	  -0.00508	  -0.00511	  -0.00192	  -0.00380	  -0.00154	   0.00056	   0.00045	  -0.00028	   0.00099	   0.00246	   0.00206	   0.00440	   0.00474
                     60	   0.00078	   0.00123	   0.00018	  -0.00119	   0.00017	   0.00059	  -0.00137	  -0.00207	   0.00100	   0.00132	  -0.00253	  -0.00147	  -0.00148
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              </tableData>
              <tableData breakPoint="10">
                              -20	       -15	       -10	        -7	        -5	        -2	         0	         2	         5	         7	        10	        15	        20
                    -20	   0.00645	   0.00515	   0.00354	   0.00290	   0.00200	   0.00081	   0.00002	  -0.00080	  -0.00214	  -0.00293	  -0.00352	  -0.00511	  -0.00642
                      0	  -0.00264	  -0.00075	  -0.00124	  -0.00064	  -0.00047	  -0.00003	   0.00000	   0.00004	   0.00047	   0.00064	   0.00123	   0.00073	   0.00265
                      8	  -0.00713	  -0.00412	  -0.00235	  -0.00072	  -0.00052	  -0.00018	   0.00000	   0.00018	   0.00052	   0.00070	   0.00225	   0.00409	   0.00714
                     16	  -0.00922	  -0.00739	  -0.00502	  -0.00329	  -0.00270	  -0.00054	  -0.00006	   0.00049	   0.00279	   0.00298	   0.00512	   0.00750	   0.00926
                     28	  -0.01279	  -0.01138	  -0.00795	  -0.00518	  -0.00296	  -0.00132	  -0.00078	   0.00025	   0.00321	   0.00507	   0.00680	   0.01161	   0.01289
                     50	  -0.00575	  -0.00871	  -0.00426	  -0.00437	  -0.00155	   0.00089	  -0.00039	  -0.00096	   0.00101	   0.00557	   0.00446	   0.00789	   0.00582
                     60	   0.00850	   0.00416	   0.00175	   0.00180	   0.00192	   0.00075	  -0.00089	  -0.00113	  -0.00116	  -0.00222	  -0.00365	  -0.00392	  -0.00840
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              </tableData>
              <tableData breakPoint="15">
                              -20	       -15	       -10	        -7	        -5	        -2	         0	         2	         5	         7	        10	        15	        20
                    -20	   0.00689	   0.00577	   0.00441	   0.00269	   0.00214	   0.00093	   0.00008	  -0.00094	  -0.00219	  -0.00275	  -0.00440	  -0.00575	  -0.00682
                      0	  -0.00683	  -0.00417	  -0.00313	  -0.00153	  -0.00103	   0.00041	   0.00000	  -0.00042	   0.00103	   0.00152	   0.00312	   0.00411	   0.00683
                      8	  -0.01223	  -0.00817	  -0.00552	  -0.00308	  -0.00235	  -0.00238	   0.00000	   0.00238	   0.00238	   0.00308	   0.00551	   0.00814	   0.01228
                     16	  -0.01610	  -0.01320	  -0.00830	  -0.00587	  -0.00425	  -0.00138	  -0.00001	   0.00132	   0.00411	   0.00621	   0.00827	   0.01327	   0.01613
                     28	  -0.01718	  -0.01648	  -0.01465	  -0.00929	  -0.00478	  -0.00198	   0.00005	   0.00153	   0.00509	   0.00932	   0.01385	   0.01683	   0.01766
                     50	  -0.00293	  -0.00633	  -0.00251	  -0.00336	  -0.00013	  -0.00061	  -0.00116	  -0.00004	  -0.00042	   0.00334	   0.00353	   0.00565	   0.00306
                     60	   0.01906	   0.01115	   0.00899	   0.00538	   0.00387	   0.00293	  -0.00094	  -0.00197	  -0.00395	  -0.00569	  -0.01142	  -0.00973	  -0.01905
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              </tableData>
          </table>
       </product>
    </function>
    <function name="aero/c/CMNTANKR">
    <description>YAWING MOMENT INCREMENT DUE TO RIGHT WING TANK</description>
    <product>
          <property>inertia/tank-wing-right-fitted</property>
          <table>
            <independentVar lookup="row">aero/alpha-deg</independentVar>
            <independentVar lookup="column">aero/beta-deg</independentVar>
            <independentVar lookup="table">fcs/pitch-pos-deg</independentVar>
              <tableData breakPoint="-25">
                              -20	       -15	       -10	        -7	        -5	        -2	         0	         2	         5	         7	        10	        15	        20
                    -20	   0.05500	   0.04596	   0.03411	   0.02335	   0.01714	   0.00664	  -0.00002	  -0.00673	  -0.01706	  -0.02332	  -0.03414	  -0.04576	  -0.05494
                      0	   0.03789	   0.03338	   0.02454	   0.01818	   0.01284	   0.00515	   0.00000	  -0.00514	  -0.01281	  -0.01819	  -0.02452	  -0.03348	  -0.03782
                      8	   0.03129	   0.02435	   0.02110	   0.01739	   0.01382	   0.00372	   0.00028	  -0.00336	  -0.01385	  -0.01743	  -0.02109	  -0.02401	  -0.03126
                     16	   0.01923	   0.02142	   0.01637	   0.01018	   0.00937	   0.00262	  -0.00068	  -0.00131	  -0.00909	  -0.01009	  -0.01633	  -0.02186	  -0.01976
                     28	   0.00107	   0.00520	   0.00575	   0.00332	   0.00377	   0.00182	  -0.00022	  -0.00175	  -0.00397	  -0.00353	  -0.00505	  -0.00487	  -0.00114
                     50	  -0.03859	  -0.02945	  -0.02395	  -0.01528	  -0.01383	  -0.00632	   0.00053	   0.00585	   0.01406	   0.01565	   0.02365	   0.03047	   0.03890
                     60	  -0.04105	  -0.03230	  -0.02213	  -0.01679	  -0.01331	  -0.00779	   0.00089	   0.00774	   0.01311	   0.01725	   0.02348	   0.03224	   0.03976
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              </tableData>
              <tableData breakPoint="-20">
                              -20	       -15	       -10	        -7	        -5	        -2	         0	         2	         5	         7	        10	        15	        20
                    -20	   0.04668	   0.03939	   0.02920	   0.02029	   0.01449	   0.00557	  -0.00003	  -0.00559	  -0.01438	  -0.02021	  -0.02927	  -0.03944	  -0.04674
                      0	   0.02733	   0.02333	   0.01769	   0.01233	   0.00947	   0.00437	   0.00001	  -0.00437	  -0.00949	  -0.01232	  -0.01771	  -0.02340	  -0.02726
                      8	   0.02178	   0.01722	   0.01300	   0.01115	   0.00757	   0.00416	   0.00122	  -0.00596	  -0.00765	  -0.01145	  -0.01299	  -0.01719	  -0.02179
                     16	   0.01202	   0.01272	   0.00939	   0.00773	   0.00571	   0.00135	   0.00011	  -0.00190	  -0.00581	  -0.00757	  -0.00951	  -0.01266	  -0.01193
                     28	  -0.00481	  -0.00155	   0.00025	  -0.00002	   0.00085	   0.00137	   0.00012	  -0.00087	  -0.00117	   0.00000	   0.00038	   0.00139	   0.00475
                     50	  -0.03414	  -0.02774	  -0.02081	  -0.01422	  -0.01364	  -0.00584	   0.00094	   0.00632	   0.01349	   0.01471	   0.02097	   0.02811	   0.03424
                     60	  -0.03288	  -0.02811	  -0.01855	  -0.01493	  -0.01085	  -0.00564	   0.00009	   0.00763	   0.01126	   0.01457	   0.02043	   0.02768	   0.03430
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              </tableData>
              <tableData breakPoint="-15">
                              -20	       -15	       -10	        -7	        -5	        -2	         0	         2	         5	         7	        10	        15	        20
                    -20	   0.03305	   0.02589	   0.01938	   0.01375	   0.00969	   0.00480	  -0.00004	  -0.00484	  -0.00966	  -0.01383	  -0.01954	  -0.02594	  -0.03296
                      0	   0.01420	   0.01269	   0.00968	   0.00635	   0.00451	   0.00247	   0.00001	  -0.00247	  -0.00450	  -0.00635	  -0.00968	  -0.01268	  -0.01425
                      8	   0.01065	   0.00976	   0.00687	   0.00570	   0.00397	   0.00029	   0.00006	  -0.00026	  -0.00356	  -0.00594	  -0.00673	  -0.00968	  -0.01066
                     16	   0.00339	   0.00535	   0.00384	   0.00287	   0.00212	   0.00008	   0.00014	  -0.00028	  -0.00206	  -0.00293	  -0.00379	  -0.00544	  -0.00334
                     28	  -0.00826	  -0.00609	  -0.00157	  -0.00289	  -0.00093	   0.00002	   0.00048	   0.00060	   0.00077	   0.00287	   0.00169	   0.00626	   0.00845
                     50	  -0.02744	  -0.02179	  -0.01736	  -0.01273	  -0.01094	  -0.00481	  -0.00047	   0.00558	   0.01101	   0.01318	   0.01772	   0.02247	   0.02758
                     60	  -0.02783	  -0.02111	  -0.01637	  -0.01033	  -0.00969	  -0.00724	   0.00030	   0.00728	   0.00766	   0.01057	   0.01833	   0.02100	   0.02735
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              </tableData>
              <tableData breakPoint="-10">
                              -20	       -15	       -10	        -7	        -5	        -2	         0	         2	         5	         7	        10	        15	        20
                    -20	   0.01822	   0.01445	   0.01160	   0.00827	   0.00588	   0.00303	  -0.00002	  -0.00297	  -0.00589	  -0.00825	  -0.01167	  -0.01456	  -0.01820
                      0	   0.00631	   0.00511	   0.00427	   0.00284	   0.00281	   0.00159	   0.00001	  -0.00158	  -0.00265	  -0.00284	  -0.00427	  -0.00510	  -0.00632
                      8	   0.00425	   0.00265	   0.00195	   0.00216	   0.00115	   0.00048	   0.00002	  -0.00062	  -0.00105	  -0.00214	  -0.00195	  -0.00261	  -0.00426
                     16	  -0.00109	   0.00052	   0.00052	   0.00054	   0.00008	   0.00032	  -0.00011	  -0.00003	   0.00010	  -0.00055	  -0.00051	  -0.00050	   0.00110
                     28	  -0.00793	  -0.00616	  -0.00208	  -0.00262	  -0.00098	  -0.00043	   0.00020	   0.00090	   0.00077	   0.00245	   0.00316	   0.00631	   0.00784
                     50	  -0.01936	  -0.01571	  -0.01241	  -0.00989	  -0.00854	  -0.00148	  -0.00024	   0.00264	   0.00853	   0.01060	   0.01237	   0.01682	   0.01926
                     60	  -0.02310	  -0.01720	  -0.01325	  -0.00752	  -0.00550	  -0.00515	  -0.00007	   0.00484	   0.00798	   0.00760	   0.01516	   0.01687	   0.02294
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              </tableData>
              <tableData breakPoint="-5">
                              -20	       -15	       -10	        -7	        -5	        -2	         0	         2	         5	         7	        10	        15	        20
                    -20	   0.00716	   0.00545	   0.00414	   0.00341	   0.00260	   0.00130	   0.00000	  -0.00132	  -0.00258	  -0.00353	  -0.00419	  -0.00554	  -0.00718
                      0	   0.00243	   0.00184	   0.00132	   0.00131	   0.00097	   0.00033	   0.00000	  -0.00035	  -0.00097	  -0.00131	  -0.00132	  -0.00182	  -0.00241
                      8	   0.00066	   0.00033	   0.00051	   0.00069	   0.00014	   0.00004	  -0.00012	  -0.00002	  -0.00014	  -0.00064	  -0.00051	  -0.00032	  -0.00070
                     16	  -0.00133	  -0.00043	  -0.00042	  -0.00012	  -0.00013	  -0.00016	   0.00002	   0.00019	   0.00013	  -0.00001	   0.00040	   0.00035	   0.00134
                     28	  -0.00516	  -0.00432	  -0.00259	  -0.00141	  -0.00138	  -0.00029	  -0.00011	   0.00107	   0.00111	   0.00133	   0.00266	   0.00476	   0.00517
                     50	  -0.01266	  -0.00915	  -0.00860	  -0.00419	  -0.00584	  -0.00083	   0.00056	   0.00134	   0.00548	   0.00509	   0.00877	   0.01036	   0.01250
                     60	  -0.01666	  -0.01061	  -0.00722	  -0.00494	  -0.00545	  -0.00379	   0.00179	   0.00294	   0.00373	   0.00513	   0.00950	   0.00975	   0.01693
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              </tableData>
              <tableData breakPoint="0">
                              -20	       -15	       -10	        -7	        -5	        -2	         0	         2	         5	         7	        10	        15	        20
                    -20	   0.00000	   0.00003	   0.00000	   0.00005	   0.00001	   0.00001	   0.00008	  -0.00003	   0.00010	  -0.00002	  -0.00001	  -0.00002	  -0.00001
                      0	   0.00000	   0.00002	   0.00000	   0.00000	   0.00000	   0.00000	   0.00000	  -0.00001	   0.00000	   0.00000	   0.00000	   0.00002	   0.00000
                      8	   0.00001	  -0.00001	  -0.00003	  -0.00001	   0.00000	   0.00000	   0.00000	   0.00000	   0.00000	   0.00006	   0.00000	   0.00002	  -0.00003
                     16	   0.00001	  -0.00011	   0.00002	   0.00005	  -0.00003	  -0.00003	  -0.00001	   0.00006	   0.00005	  -0.00005	   0.00002	  -0.00002	  -0.00002
                     28	  -0.00002	  -0.00008	   0.00062	  -0.00010	  -0.00030	   0.00032	  -0.00029	   0.00046	   0.00000	   0.00033	   0.00000	  -0.00031	   0.00000
                     50	  -0.00009	   0.00084	  -0.00095	   0.00118	  -0.00149	   0.00014	   0.00119	   0.00047	   0.00078	   0.00051	  -0.00023	   0.00008	   0.00014
                     60	  -0.00049	  -0.00052	  -0.00022	  -0.00004	  -0.00080	  -0.00128	   0.00049	   0.00034	   0.00071	   0.00048	   0.00087	  -0.00012	   0.00022
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              </tableData>
              <tableData breakPoint="5">
                              -20	       -15	       -10	        -7	        -5	        -2	         0	         2	         5	         7	        10	        15	        20
                    -20	  -0.00420	  -0.00322	  -0.00236	  -0.00188	  -0.00145	  -0.00048	  -0.00003	   0.00049	   0.00114	   0.00190	   0.00233	   0.00317	   0.00417
                      0	  -0.00044	  -0.00095	   0.00000	  -0.00003	  -0.00004	   0.00013	   0.00000	  -0.00013	   0.00004	   0.00003	   0.00001	   0.00097	   0.00044
                      8	   0.00237	   0.00101	   0.00014	  -0.00020	   0.00005	  -0.00034	   0.00000	   0.00024	  -0.00004	   0.00025	  -0.00015	  -0.00100	  -0.00238
                     16	   0.00317	   0.00251	   0.00140	   0.00055	   0.00062	   0.00057	  -0.00002	  -0.00064	  -0.00065	  -0.00046	  -0.00139	  -0.00263	  -0.00312
                     28	   0.00642	   0.00511	   0.00409	   0.00137	   0.00104	   0.00028	  -0.00008	   0.00059	  -0.00116	  -0.00172	  -0.00357	  -0.00514	  -0.00615
                     50	   0.00508	   0.00511	   0.00192	   0.00380	   0.00154	  -0.00056	  -0.00045	   0.00028	  -0.00099	  -0.00246	  -0.00206	  -0.00440	  -0.00474
                     60	  -0.00078	  -0.00123	  -0.00018	   0.00119	  -0.00017	  -0.00059	   0.00137	   0.00207	  -0.00100	  -0.00132	   0.00253	   0.00147	   0.00148
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              </tableData>
              <tableData breakPoint="10">
                              -20	       -15	       -10	        -7	        -5	        -2	         0	         2	         5	         7	        10	        15	        20
                    -20	  -0.00645	  -0.00515	  -0.00354	  -0.00290	  -0.00200	  -0.00081	  -0.00002	   0.00080	   0.00214	   0.00293	   0.00352	   0.00511	   0.00642
                      0	   0.00264	   0.00075	   0.00124	   0.00064	   0.00047	   0.00003	   0.00000	  -0.00004	  -0.00047	  -0.00064	  -0.00123	  -0.00073	  -0.00265
                      8	   0.00713	   0.00412	   0.00235	   0.00072	   0.00052	   0.00018	   0.00000	  -0.00018	  -0.00052	  -0.00070	  -0.00225	  -0.00409	  -0.00714
                     16	   0.00922	   0.00739	   0.00502	   0.00329	   0.00270	   0.00054	   0.00006	  -0.00049	  -0.00279	  -0.00298	  -0.00512	  -0.00750	  -0.00926
                     28	   0.01279	   0.01138	   0.00795	   0.00518	   0.00296	   0.00132	   0.00078	  -0.00025	  -0.00321	  -0.00507	  -0.00680	  -0.01161	  -0.01289
                     50	   0.00575	   0.00871	   0.00426	   0.00437	   0.00155	  -0.00089	   0.00039	   0.00096	  -0.00101	  -0.00557	  -0.00446	  -0.00789	  -0.00582
                     60	  -0.00850	  -0.00416	  -0.00175	  -0.00180	  -0.00192	  -0.00075	   0.00089	   0.00113	   0.00116	   0.00222	   0.00365	   0.00392	   0.00840
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              </tableData>
              <tableData breakPoint="15">
                              -20	       -15	       -10	        -7	        -5	        -2	         0	         2	         5	         7	        10	        15	        20
                    -20	  -0.00689	  -0.00577	  -0.00441	  -0.00269	  -0.00214	  -0.00093	  -0.00008	   0.00094	   0.00219	   0.00275	   0.00440	   0.00575	   0.00682
                      0	   0.00683	   0.00417	   0.00313	   0.00153	   0.00103	  -0.00041	   0.00000	   0.00042	  -0.00103	  -0.00152	  -0.00312	  -0.00411	  -0.00683
                      8	   0.01223	   0.00817	   0.00552	   0.00308	   0.00235	   0.00238	   0.00000	  -0.00238	  -0.00238	  -0.00308	  -0.00551	  -0.00814	  -0.01228
                     16	   0.01610	   0.01320	   0.00830	   0.00587	   0.00425	   0.00138	   0.00001	  -0.00132	  -0.00411	  -0.00621	  -0.00827	  -0.01327	  -0.01613
                     28	   0.01718	   0.01648	   0.01465	   0.00929	   0.00478	   0.00198	  -0.00005	  -0.00153	  -0.00509	  -0.00932	  -0.01385	  -0.01683	  -0.01766
                     50	   0.00293	   0.00633	   0.00251	   0.00336	   0.00013	   0.00061	   0.00116	   0.00004	   0.00042	  -0.00334	  -0.00353	  -0.00565	  -0.00306
                     60	  -0.01906	  -0.01115	  -0.00899	  -0.00538	  -0.00387	  -0.00293	   0.00094	   0.00197	   0.00395	   0.00569	   0.01142	   0.00973	   0.01905
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              </tableData>
          </table>
       </product>
    </function>
  <axis name="LIFT">
    <function name="aero/coefficients/CLIFT">
      <sum>
          <property>aero/c/CFZB</property>
          <property>aero/c/CFZBRK</property>
          <property>aero/c/CFZDGE</property>
          <property>aero/c/CFZDRD</property>
          <property>aero/c/CFZDRDMN</property>
          <property>aero/c/CFZDSL</property>
          <property>aero/c/CFZDSPL</property>
          <property>aero/c/CFZDSPR</property>
          <property>aero/c/CFZFLAPS</property>
          <property>aero/c/CFZFLAPSOB</property>
          <property>aero/c/CFZGEAR</property>
          <property>aero/c/CFZMN</property>
          <property>aero/c/CFZTANKC</property>
          <property>aero/c/CFZTANKL</property>
          <property>aero/c/CFZTANKR</property>
       </sum>
    </function>
    <function name="aero/force/LIFT">
    <product>
          <property>aero/qbar-psf</property>
          <property>metrics/Sw-sqft</property>
          <property>aero/coefficients/CLIFT</property>
       </product>
    </function>
  </axis>
  <axis name="DRAG">
    <function name="aero/coefficients/CDRAG">
      <sum>
          <property>aero/c/CFXB</property>
          <property>aero/c/CFXBRK</property>
          <property>aero/c/CFXDGE</property>
          <property>aero/c/CFXDRD</property>
          <property>aero/c/CFXDRDMN</property>
          <property>aero/c/CFXDSL</property>
          <property>aero/c/CFXDSPL</property>
          <property>aero/c/CFXDSPR</property>
          <property>aero/c/CFXFLAPS</property>
          <property>aero/c/CFXFLAPSOB</property>
          <property>aero/c/CFXGEAR</property>
          <property>aero/c/CFXMN</property>
          <property>aero/c/CFXTANKC</property>
          <property>aero/c/CFXTANKL</property>
          <property>aero/c/CFXTANKR</property>
       </sum>
    </function>
    <function name="aero/force/DRAG">
    <product>
          <property>aero/qbar-psf</property>
          <property>metrics/Sw-sqft</property>
          <property>aero/coefficients/CDRAG</property>
       </product>
    </function>
  </axis>
  <axis name="SIDE">
    <function name="aero/coefficients/CSIDE">
      <sum>
          <property>aero/c/CFYB</property>
          <property>aero/c/CFYDSPL</property>
          <property>aero/c/CFYDSPR</property>
          <property>aero/c/CFYDTD</property>
          <property>aero/c/CFYGEAR</property>
          <property>aero/c/CFYMN</property>
          <property>aero/c/CFYP</property>
          <property>aero/c/CFYR</property>
          <property>aero/c/CFYTANKC</property>
          <property>aero/c/CFYTANKL</property>
          <property>aero/c/CFYTANKR</property>
          <property>aero/c/CYDRD</property>
          <property>aero/c/CYDRDMN</property>
          <property>aero/c/CYDSL</property>
       </sum>
    </function>
    <function name="aero/force/SIDE">
    <product>
          <property>aero/qbar-psf</property>
          <property>metrics/Sw-sqft</property>
          <property>aero/coefficients/CSIDE</property>
       </product>
    </function>
  </axis>
  <axis name="PITCH">
    <function name="aero/coefficients/CPITCH">
      <sum>
          <property>aero/c/CMM1</property>
          <property>aero/c/CMMALPHADOT</property>
          <property>aero/c/CMMBRK</property>
          <property>aero/c/CMMDGE</property>
          <property>aero/c/CMMDRD</property>
          <property>aero/c/CMMDRDMN</property>
          <property>aero/c/CMMDSL</property>
          <property>aero/c/CMMDSPL</property>
          <property>aero/c/CMMDSPR</property>
          <property>aero/c/CMMFLAPS</property>
          <property>aero/c/CMMFLAPSOB</property>
          <property>aero/c/CMMGEAR</property>
          <property>aero/c/CMMMN</property>
          <property>aero/c/CMMQ</property>
          <property>aero/c/CMMTANKC</property>
          <property>aero/c/CMMTANKL</property>
          <property>aero/c/CMMTANKR</property>
       </sum>
    </function>
    <function name="aero/force/PITCH">
    <product>
          <property>aero/qbar-psf</property>
          <property>metrics/Sw-sqft</property>
          <property>metrics/cbarw-ft</property>
          <property>aero/coefficients/CPITCH</property>
       </product>
    </function>
  </axis>
  <axis name="ROLL">
    <function name="aero/coefficients/CROLL">
      <sum>
          <property>aero/c/CML1</property>
          <property>aero/c/CMLBETADOT</property>
          <property>aero/c/CMLDRD</property>
          <property>aero/c/CMLDRDMN</property>
          <property>aero/c/CMLDSL</property>
          <property>aero/c/CMLDSPL</property>
          <property>aero/c/CMLDSPR</property>
          <property>aero/c/CMLDTD</property>
          <property>aero/c/CMLGEAR</property>
          <property>aero/c/CMLMN</property>
          <property>aero/c/CMLP</property>
          <property>aero/c/CMLR</property>
          <property>aero/c/CMLTANKC</property>
          <property>aero/c/CMLTANKL</property>
          <property>aero/c/CMLTANKR</property>
       </sum>
    </function>
    <function name="aero/force/ROLL">
    <product>
          <property>aero/qbar-psf</property>
          <property>metrics/Sw-sqft</property>
          <property>metrics/bw-ft</property>
          <property>aero/coefficients/CROLL</property>
       </product>
    </function>
  </axis>
  <axis name="YAW">
    <function name="aero/coefficients/CYAW">
      <sum>
          <property>aero/c/CMN1</property>
          <property>aero/c/CMNBETADOT</property>
          <property>aero/c/CMNDRD</property>
          <property>aero/c/CMNDRDMN</property>
          <property>aero/c/CMNDSPL</property>
          <property>aero/c/CMNDSPR</property>
          <property>aero/c/CMNDTD</property>
          <property>aero/c/CMNGEAR</property>
          <property>aero/c/CMNMN</property>
          <property>aero/c/CMNP</property>
          <property>aero/c/CMNR</property>
          <property>aero/c/CMNTANKC</property>
          <property>aero/c/CMNTANKL</property>
          <property>aero/c/CMNTANKR</property>
       </sum>
    </function>
    <function name="aero/force/YAW">
    <product>
          <property>aero/qbar-psf</property>
          <property>metrics/Sw-sqft</property>
          <property>metrics/bw-ft</property>
          <property>aero/coefficients/CYAW</property>
       </product>
    </function>
  </axis>
</aerodynamics>
    <output name="c:/temp/JSBOut.csv" type="CSV" rate="10">
        <property caption="alpha-deg">aero/alpha-deg</property>
        <property caption="alphadot-rad_sec">aero/alphadot-rad_sec</property>
        <property caption="beta-deg">aero/beta-deg</property>
        <property caption="betadot-rad_sec">aero/betadot-rad_sec</property>
        <property caption="CFXB">aero/c/CFXB</property>
        <property caption="CFXBRK">aero/c/CFXBRK</property>
        <property caption="CFXDGE">aero/c/CFXDGE</property>
        <property caption="CFXDRD">aero/c/CFXDRD</property>
        <property caption="CFXDRDMN">aero/c/CFXDRDMN</property>
        <property caption="CFXDSL">aero/c/CFXDSL</property>
        <property caption="CFXDSPL">aero/c/CFXDSPL</property>
        <property caption="CFXDSPR">aero/c/CFXDSPR</property>
        <property caption="CFXFLAPS">aero/c/CFXFLAPS</property>
        <property caption="CFXFLAPSOB">aero/c/CFXFLAPSOB</property>
        <property caption="CFXGEAR">aero/c/CFXGEAR</property>
        <property caption="CFXMN">aero/c/CFXMN</property>
        <property caption="CFXTANKC">aero/c/CFXTANKC</property>
        <property caption="CFXTANKL">aero/c/CFXTANKL</property>
        <property caption="CFXTANKR">aero/c/CFXTANKR</property>
        <property caption="CFYB">aero/c/CFYB</property>
        <property caption="CFYDSPL">aero/c/CFYDSPL</property>
        <property caption="CFYDSPR">aero/c/CFYDSPR</property>
        <property caption="CFYDTD">aero/c/CFYDTD</property>
        <property caption="CFYGEAR">aero/c/CFYGEAR</property>
        <property caption="CFYMN">aero/c/CFYMN</property>
        <property caption="CFYP">aero/c/CFYP</property>
        <property caption="CFYR">aero/c/CFYR</property>
        <property caption="CFYTANKC">aero/c/CFYTANKC</property>
        <property caption="CFYTANKL">aero/c/CFYTANKL</property>
        <property caption="CFYTANKR">aero/c/CFYTANKR</property>
        <property caption="CFZB">aero/c/CFZB</property>
        <property caption="CFZBRK">aero/c/CFZBRK</property>
        <property caption="CFZDGE">aero/c/CFZDGE</property>
        <property caption="CFZDRD">aero/c/CFZDRD</property>
        <property caption="CFZDRDMN">aero/c/CFZDRDMN</property>
        <property caption="CFZDSL">aero/c/CFZDSL</property>
        <property caption="CFZDSPL">aero/c/CFZDSPL</property>
        <property caption="CFZDSPR">aero/c/CFZDSPR</property>
        <property caption="CFZFLAPS">aero/c/CFZFLAPS</property>
        <property caption="CFZFLAPSOB">aero/c/CFZFLAPSOB</property>
        <property caption="CFZGEAR">aero/c/CFZGEAR</property>
        <property caption="CFZMN">aero/c/CFZMN</property>
        <property caption="CFZTANKC">aero/c/CFZTANKC</property>
        <property caption="CFZTANKL">aero/c/CFZTANKL</property>
        <property caption="CFZTANKR">aero/c/CFZTANKR</property>
        <property caption="CML1">aero/c/CML1</property>
        <property caption="CMLBETADOT">aero/c/CMLBETADOT</property>
        <property caption="CMLDRD">aero/c/CMLDRD</property>
        <property caption="CMLDRDMN">aero/c/CMLDRDMN</property>
        <property caption="CMLDSL">aero/c/CMLDSL</property>
        <property caption="CMLDSPL">aero/c/CMLDSPL</property>
        <property caption="CMLDSPR">aero/c/CMLDSPR</property>
        <property caption="CMLDTD">aero/c/CMLDTD</property>
        <property caption="CMLGEAR">aero/c/CMLGEAR</property>
        <property caption="CMLMN">aero/c/CMLMN</property>
        <property caption="CMLP">aero/c/CMLP</property>
        <property caption="CMLR">aero/c/CMLR</property>
        <property caption="CMLTANKC">aero/c/CMLTANKC</property>
        <property caption="CMLTANKL">aero/c/CMLTANKL</property>
        <property caption="CMLTANKR">aero/c/CMLTANKR</property>
        <property caption="CMM1">aero/c/CMM1</property>
        <property caption="CMMALPHADOT">aero/c/CMMALPHADOT</property>
        <property caption="CMMBRK">aero/c/CMMBRK</property>
        <property caption="CMMDGE">aero/c/CMMDGE</property>
        <property caption="CMMDRD">aero/c/CMMDRD</property>
        <property caption="CMMDRDMN">aero/c/CMMDRDMN</property>
        <property caption="CMMDSL">aero/c/CMMDSL</property>
        <property caption="CMMDSPL">aero/c/CMMDSPL</property>
        <property caption="CMMDSPR">aero/c/CMMDSPR</property>
        <property caption="CMMFLAPS">aero/c/CMMFLAPS</property>
        <property caption="CMMFLAPSOB">aero/c/CMMFLAPSOB</property>
        <property caption="CMMGEAR">aero/c/CMMGEAR</property>
        <property caption="CMMMN">aero/c/CMMMN</property>
        <property caption="CMMQ">aero/c/CMMQ</property>
        <property caption="CMMTANKC">aero/c/CMMTANKC</property>
        <property caption="CMMTANKL">aero/c/CMMTANKL</property>
        <property caption="CMMTANKR">aero/c/CMMTANKR</property>
        <property caption="CMN1">aero/c/CMN1</property>
        <property caption="CMNBETADOT">aero/c/CMNBETADOT</property>
        <property caption="CMNDRD">aero/c/CMNDRD</property>
        <property caption="CMNDRDMN">aero/c/CMNDRDMN</property>
        <property caption="CMNDSPL">aero/c/CMNDSPL</property>
        <property caption="CMNDSPR">aero/c/CMNDSPR</property>
        <property caption="CMNDTD">aero/c/CMNDTD</property>
        <property caption="CMNGEAR">aero/c/CMNGEAR</property>
        <property caption="CMNMN">aero/c/CMNMN</property>
        <property caption="CMNP">aero/c/CMNP</property>
        <property caption="CMNR">aero/c/CMNR</property>
        <property caption="CMNTANKC">aero/c/CMNTANKC</property>
        <property caption="CMNTANKL">aero/c/CMNTANKL</property>
        <property caption="CMNTANKR">aero/c/CMNTANKR</property>
        <property caption="CYDRD">aero/c/CYDRD</property>
        <property caption="CYDRDMN">aero/c/CYDRDMN</property>
        <property caption="CYDSL">aero/c/CYDSL</property>
        <property caption="CDRAG">aero/coefficients/CDRAG</property>
        <property caption="CLIFT">aero/coefficients/CLIFT</property>
        <property caption="CPITCH">aero/coefficients/CPITCH</property>
        <property caption="CROLL">aero/coefficients/CROLL</property>
        <property caption="CSIDE">aero/coefficients/CSIDE</property>
        <property caption="CYAW">aero/coefficients/CYAW</property>
        <property caption="pb">aero/pb</property>
        <property caption="qb">aero/qb</property>
        <property caption="qbar-psf">aero/qbar-psf</property>
        <property caption="rb">aero/rb</property>
        <property caption="phi-deg">attitude/phi-deg</property>
        <property caption="psi-deg">attitude/psi-deg</property>
        <property caption="theta-deg">attitude/theta-deg</property>
        <property caption="differential-elevator-pos-deg">fcs/differential-elevator-pos-deg</property>
        <property caption="flap-ob-pos-deg">fcs/flap-ob-pos-deg</property>
        <property caption="flap-pos-deg">fcs/flap-pos-deg</property>
        <property caption="pitch-pos-deg">fcs/pitch-pos-deg</property>
        <property caption="rudder-deg">fcs/rudder-deg</property>
        <property caption="slats-deg">fcs/slats-deg</property>
        <property caption="speedbrake-pos-norm">fcs/speedbrake-pos-norm</property>
        <property caption="spoiler-left-deg">fcs/spoiler-left-deg</property>
        <property caption="spoiler-right-deg">fcs/spoiler-right-deg</property>
        <property caption="fbx-total-lbs">forces/fbx-total-lbs</property>
        <property caption="fby-total-lbs">forces/fby-total-lbs</property>
        <property caption="fbz-total-lbs">forces/fbz-total-lbs</property>
        <property caption="gear-pos-norm">gear/gear-pos-norm</property>
        <property caption="tank-centre-fitted">inertia/tank-centre-fitted</property>
        <property caption="tank-wing-left-fitted">inertia/tank-wing-left-fitted</property>
        <property caption="tank-wing-right-fitted">inertia/tank-wing-right-fitted</property>
        <property caption="l-total-lbsft">moments/l-total-lbsft</property>
        <property caption="m-total-lbsft">moments/m-total-lbsft</property>
        <property caption="n-total-lbsft">moments/n-total-lbsft</property>
        <property caption="h-agl-m">position/h-agl-m</property>
        <property caption="mach">velocities/mach</property>
        <property caption="p-aero-rad_sec">velocities/p-aero-rad_sec</property>
        <property caption="q-aero-rad_sec">velocities/q-aero-rad_sec</property>
        <property caption="r-aero-rad_sec">velocities/r-aero-rad_sec</property>
        <property caption="vt-fps">velocities/vt-fps</property>
    </output>
</fdm_config>
